# Control de Deflexiones por Flexión en Vigas
# Método en Base a la Norma E.060
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# 01. Datos Pre-Liminares / De Entrada
# 01.01. Propiedades Geométricas de la Sección
b := 0.30 m  # Ancho de la Viga
h := 0.70 m  # Peralte Total de la Viga
Núm__Capas := 1  # Número de Capas de la Sección: A) 1, B) 2 & C) 3
r :=
    if Núm__Capas == 1
        6 cm
    else if Núm__Capas == 2
        9 cm
    else if Núm__Capas == 3
        12 cm
    = 0.06 m
r = 0.06 m  # Recubrimiento Inferior de la Viga
d := h - r = 0.64 m  # Peralte Efectivo de la Viga
d' := 0.06 m  # Recubrimiento Superior de la Viga
L := 7.00 m  # Longitud de la Viga
A_Tributario := 7.00 m  # Ancho Tributario de la Viga
# 01.02. Propiedades Mecánicas de los Materiales
f'_c := 210 kgf/cm^2  # Resistencia a la Compresión del Concreto
E_c := 15000*sqrt(f'_c*kgf/cm^2)
E_c = 217371 kgf/cm^2  # Módulo de Elasticidad del Concreto
f_y := 4200 kgf/cm^2  # Esfuerzo Cedente del Acero Corrugado
E_s := 2.1*10^6 kgf/cm^2  # Módulo de Elasticidad del Acero Corrugado
ε_c := 0.003  # Deformación Unitaria del Concreto a Compresión
ε_sy := 0.0021  # Deformación Unitaria del Acero a Fluencia
β_1 :=
    if 170*kgf/cm^2 ≤ f'_c ≤ 280*kgf/cm^2
        0.85
    else if f'_c ≤ 350*kgf/cm^2
        0.80
    else if f'_c ≤ 420*kgf/cm^2
        0.75
    else if f'_c ≤ 490*kgf/cm^2
        0.70
    else if f'_c > 490*kgf/cm^2
        0.65
    = 0.85
n := E_s/E_c
β_1 = 0.85  # Factor de Relación de Profundidad del Bloque Rectangular Equivalente de Esfuerzos de Compresión
γ_c := 2.40 tonnef/m^3  # Peso Específico del Concreto
n = 9.66092  # Razón Modular de la Sección
# 01.03. Aceros de Refuerzo
ϕ_db_1 := (5/8) in
A_db_1 := π*ϕ_db_1^2/4 = 1.97933 cm^2
As := 4*A_db_1 = 7.9173 cm^2
ϕ_db_2 := (5/8) in
A_db_2 := π*ϕ_db_2^2/4 = 1.97933 cm^2
A's := 3*A_db_2 = 5.93798 cm^2
# 01.04. Cargas Actuantes
# 01.04.01. Metrado de Carga Muerta
Peso__Propio_Viga := γ_c*b*h = 0.504 tonnef/m
Peso__Acabados := 0.100 tonnef/m^2
Peso__Losa_Aligerada := 0.300 tonnef/m^2
Peso__Tabiquería := 0.120 tonnef/m^2
w_cm := (Peso__Losa_Aligerada + Peso__Acabados + Peso__Tabiquería)*A_Tributario + Peso__Propio_Viga
w_cm = 4.144 tonnef/m  # Metrado de Carga Muerta Distribuida por Metro
p_cm := 0.000 tonnef  # Metrado de Carga Muerta Puntual
# 01.04.02. Metrado de Carga Viva
Peso__Sobrecarga_de_Uso := 0.400 tonnef/m^2
w_cv := Peso__Sobrecarga_de_Uso*A_Tributario
w_cv = 2.8 tonnef/m  # Metrado de Carga Viva Distribuida
p_cv := 0.000 tonnef  # Metrado de Carga Viva Puntual
# 02. Cálculo de Inercias: Secciones Transformadas
# 02.01. Sección Antes del Agrietamiento
# 02.01.01. Sección Netamente de Concreto
I_g1 := b*h^3/12 = 857500 cm^4  # Inercia de la Sección Bruta
# 02.01.02. Considerando el Aporte del Concreto
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Y_cg := (b*h*h/2 + As*(n - 1)*d + A's*(n - 1)*r)/(b*h + As*(n - 1) + A's*(n - 1))
I_g2 := b*h^3/12 + b*h*(h/2 - Y_cg)^2 + (n - 1)*A's*(h - Y_cg - d)^2 + (n - 1)*As*(Y_cg - r)^2
Y_cg = 0.352239 m  # Centroide de la Sección Transformada
I_g2 = 960089 cm^4  # Inercia Bruta de la Sección Transformada
# 02.02. Sección Después del Agrietamiento
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c_i := 0 == b*c*(c/2) + (n - 1)*A's*(c - d') - n*As*(d - c) solve, c → [
    (-6.66666666667*((7.34288897971*cm^2*cm^2*kgf*m*m + (0.516296881386*cm^2*cm^2*kgf*m^2 - 397.413289634*cm^2*cm^4*kgf))*(kgf^2/cm^4)^(1/2.0) + (4488.08822184*cm^4*kgf^2 - 0.0534418044361*cm^2*kgf^2*m^2))^(1/2.0) + (19.7932609022*cm^2*cm^2*(kgf^2/cm^4)^(1/2.0) - 446.182490087*cm^2*kgf))/(cm^2*m*(kgf^2/cm^4)^(1/2.0));
    (6.66666666667*((7.34288897971*cm^2*cm^2*kgf*m*m + (0.516296881386*cm^2*cm^2*kgf*m^2 - 397.413289634*cm^2*cm^4*kgf))*(kgf^2/cm^4)^(1/2.0) + (4488.08822184*cm^4*kgf^2 - 0.0534418044361*cm^2*kgf^2*m^2))^(1/2.0) + (19.7932609022*cm^2*cm^2*(kgf^2/cm^4)^(1/2.0) - 446.182490087*cm^2*kgf))/(cm^2*m*(kgf^2/cm^4)^(1/2.0))
]
c_i = [-0.233716; 0.148438] m
c := max(c_i) = 0.148438 m
I_cr := b*c^3/3 + n*As*(d - c)^2 + (2*n - 1)*A's*(c - d')^2
c = 0.148438 m  # Eje Neutro de la Sección Transformada
I_cr = 226037 cm^4  # Inercia de la Sección Fisurada
# 03. Momento de Agrietamiento (Capítulo 9.6.2.3.)
Ι_g := I_g2 = 960089 cm^4  # Inercia Bruta de la Sección
Y_t := h/2
f_r := 2*sqrt(f'_c*kgf/cm^2)
M_cr := f_r*Ι_g/Y_t
Y_t = 0.35 m  # Centroide de la Sección
f_r = 28.9828 kgf/cm^2  # Módulo de Rotura de la Sección
M_cr = 7.9503 tonnef*m  # Momento de Agrietamiento de la Sección
# 04. Cálculo de la Inercia Efectiva
M_a := 10.5753 tonnef*m  # Momento de Servicio Actuante
I_e :=
    if (M_cr/M_a)^3*Ι_g + (1 - (M_cr/M_a)^3)*I_cr ≤ Ι_g
        Ι_g
    (M_cr/M_a)^3*Ι_g + (1 - (M_cr/M_a)^3)*I_cr
I_e = 537925 cm^4  # Inercia Efectiva de la Sección
# 05. Cálculo de Deflexiones
# 05.01. Deflexiones Inmediatas
Casos_de_Carga := "Caso I"  # Casos de Carga: A) Caso I, B) Caso II, C) Caso III & D) Caso IV
δ_inst_cm :=
    if Casos_de_Carga == "Caso I"
        5*w_cm*L^4/(384*E_c*I_e)
    else if Casos_de_Carga == "Caso II"
        w_cm*L^4/(8*E_c*I_e)
    else if Casos_de_Carga == "Caso III"
        p_cm*L^3/(3*E_c*I_e)
    else if Casos_de_Carga == "Caso IV"
        w_cm*L^4/(384*E_c*I_e)
δ_inst_cv :=
    if Casos_de_Carga == "Caso I"
        5*w_cv*L^4/(384*E_c*I_e)
    else if Casos_de_Carga == "Caso II"
        w_cv*L^4/(8*E_c*I_e)
    else if Casos_de_Carga == "Caso III"
        p_cv*L^3/(3*E_c*I_e)
    else if Casos_de_Carga == "Caso IV"
        w_cv*L^4/(384*E_c*I_e)
ρ' := A's/(b*d)
δ_inst_cm = 1.10797 cm  # Deflexión Inmediata Debido a la Carga Muerta
# 05.02. Deflexiones Diferidas (Artículo 9.6.2.5.)
δ_inst_cv = 0.748628 cm  # Deflexión Inmediata Debido a la Carga Viva
ρ' = 0.0030927  # Cuantía de la Sección a Compresión
ξ := 2.00  # Factor Dependiente del Tiempo para Cargas Sostenidas
λΔ := ξ/(1 + 50*ρ')
λΔ = 1.73215  # Factor para Deflexiones Adicionales debidas a Efectos de Largo Plazo
# 05.03. Deflexiones Últimas
δ_Etabs := 0.2395 cm  # Deflexión Total del Etabs
δ_Manual := δ_inst_cv + λΔ*δ_inst_cm = 2.6678 cm
δ_Total := max(δ_Manual, δ_Etabs) = 2.6678 cm
δ_Manual = 2.6678 cm  # Deflexión Total del Cálculo Manual
δ_Total = 2.6678 cm  # Deflexión Total de la Viga
# 06. Deflexiones Máximas Admisibles (Artículo 9.6.2.6.)
# 06.01. Techos Planos que no Soporten a Elementos No Estructurales
δ_máx_1 := L/180
Verificación__Deflexión_01 :=
    if δ_inst_cv ≤ δ_máx_1
        "Si Cumple"
    else
        "No Cumple, Verificar"
δ_máx_1 = 3.88889 cm  # Deflexión Máxima Admisible 01
Verificación__Deflexión_01 = "Si Cumple"
# 06.02. Pisos que no Soporten a Elementos No Estructurales
δ_máx_2 := L/360
Verificación__Deflexión_02 :=
    if δ_inst_cv ≤ δ_máx_2
        "Si Cumple"
    else
        "No Cumple, Verificar"
δ_máx_2 = 1.94444 cm  # Deflexión Máxima Admisible 02
Verificación__Deflexión_02 = "Si Cumple"
# 06.03. Pisos o Techos Ligados a Elementos No Estructurales Susceptibles a Sufrir Daños debido a Deflexiones Grandes
δ_máx_3 := L/480
Verificación__Deflexión_03 :=
    if δ_Total ≤ δ_máx_3
        "Si Cumple"
    else
        "No Cumple, Verificar"
δ_máx_3 = 1.45833 cm  # Deflexión Máxima Admisible 03
Verificación__Deflexión_03 = "No Cumple, Verificar"
# 06.04. Pisos o Techos Ligados a Elementos No Estructurales No Susceptibles a Sufrir Daños debido a Deflexiones Grandes
δ_máx_4 := L/240
Verificación__Deflexión_04 :=
    if δ_Total ≤ δ_máx_4
        "Si Cumple"
    else
        "No Cumple, Verificar"
δ_máx_4 = 2.91667 cm  # Deflexión Máxima Admisible 04
Verificación__Deflexión_04 = "Si Cumple"
