# Control de Fisuración por Flexión en Vigas
# Método en Base a la Norma E.060
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# 01. Datos Pre-Liminares / De Entrada
# 01.01. Propiedades Geométricas de la Sección
b := 0.30 m  # Ancho de la Viga
h := 0.70 m  # Peralte Total de la Viga
Núm__Capas := 2  # Número de Capas de la Sección: A) 1, B) 2 & C) 3
d :=
    if Núm__Capas == 1
        h - 6 cm
    else if Núm__Capas == 2
        h - 9 cm
    else if Núm__Capas == 3
        h - 12 cm
    = 0.61 m
d = 0.61 m  # Peralte Efectivo de la Viga
d' := 0.06 m  # Recubrimiento Superior de la Viga
r := 4.00 cm  # Recubrimiento Inferior de la Viga
# 01.02. Propiedades Mecánicas de los Materiales
f'_c := 210 kgf/cm^2  # Resistencia a la Compresión del Concreto
E_c := 15000*sqrt(f'_c*kgf/cm^2)
E_c = 217371 kgf/cm^2  # Módulo de Elasticidad del Concreto
f_y := 4200 kgf/cm^2  # Esfuerzo Cedente del Acero Corrugado
E_s := 2.1*10^6 kgf/cm^2  # Módulo de Elasticidad del Acero Corrugado
# 01.03. Aceros de Refuerzo
# 01.03.01. Refuerzo en la 1era Capa
ϕ_db_1 := (5/8) in
A_db_1 := π*ϕ_db_1^2/4 = 1.97933 cm^2
As_1 := 2*A_db_1 = 3.95865 cm^2
# 01.03.02. Refuerzo en la 2da Capa
ϕ_db_2 := (5/8) in
A_db_2 := π*ϕ_db_2^2/4 = 1.97933 cm^2
As_2 := 2*A_db_2 = 3.95865 cm^2
# 01.03.03. Refuerzo por Corte - Estribos
ϕ_db_3 := (3/8) in
A_db_3 := π*ϕ_db_3^2/4 = 0.712557 cm^2
# 01.04. Momentos de Servicio Actuantes
M_cm := 6.2974 tonnef*m  # Momento de Servicio de Carga Muerta
M_cv := 4.2779 tonnef*m  # Momento de Servicio de Carga Viva
# 02. Determinación del Parámetro "Zmáx" (Artículo 9.9.3.)
Condición__de_Exposición := "Exterior"  # Condición: A) Interior & B) Exterior
Z_máx :=
    if Condición__de_Exposición == "Interior"
        31000 kgf/cm
    else if Condición__de_Exposición == "Exterior"
        26000 kgf/cm
Z_máx = 26000 kgf/cm  # Coeficiente / Parámetro "Zmáx"
# 03. Determinación del Parámetro "Z" (Artículo 9.9.3.)
# 03.01. Cálculo del Centroide para Refuerzo Principal
Núm__Capas = 2  # Número de Capas de la Sección Resistente a Flexión
y_s :=
    if Núm__Capas == 1
        r + ϕ_db_3 + ϕ_db_1/2
    else
        ((r + ϕ_db_3 + ϕ_db_1/2)*As_1 + (r + ϕ_db_3 + ϕ_db_1 + 2.54 cm + ϕ_db_2/2)*As_2)/(As_1 + As_2)
n_b :=
    if Núm__Capas == 1
        As_1/A_db_1
    else
        (As_1 + As_2)/max(A_db_1, A_db_2)
A_ct := 2*y_s*b/n_b
y_s = 7.81 cm  # Centroide para el Refuerzo Principal a Flexión
# 03.02. Cálculo del Área Efectiva del Concreto en Tracción
n_b = 4  # Número de Barras en la Zona a Tracción
A_ct = 117.15 cm^2  # Área Efectiva del Concreto en Tracción
# 03.03. Cálculo del Esfuerzo del Acero
M_s := M_cm + M_cv
f_s := M_s/(0.90*d*(As_1 + As_2))
M_s = 10.5753 tonnef*m  # Momento Máximo por Cargas de Servicio
f_s = 2433.01 kgf/cm^2  # Esfuerzo en el Refuerzo para Cargas de Servicio
# 03.04. Cálculo del Parámetro "Z"
dc := r + ϕ_db_3 + ϕ_db_1/2
Z := f_s*nthroot(dc*A_ct, 3)
Verificación__Fisuración :=
    if Z < Z_máx
        "Si Cumple"
    else
        "No Cumple, Verificar"
dc = 5.74625 cm  # Espesor del Recubrimiento desde la Fibra Extrema
Z = 21323.2 kgf/cm  # Coeficiente / Parámetro "Z"
Verificación__Fisuración = "Si Cumple"
# 04. Estimación del Ancho de Grietas (Gergely - Lutz)
# 04.01. Datos de Entrada
a := (As_1 + As_2)*f_y/(0.85*f'_c*b)
β_1 :=
    if 170*kgf/cm^2 ≤ f'_c ≤ 280*kgf/cm^2
        0.85
    else if f'_c ≤ 350*kgf/cm^2
        0.80
    else if f'_c ≤ 420*kgf/cm^2
        0.75
    else if f'_c ≤ 490*kgf/cm^2
        0.70
    else if f'_c > 490*kgf/cm^2
        0.65
    = 0.85
c := a/β_1
h_1 := h - c
h_2 := d - c
a = 6.20965 cm  # Altura del Bloque de Compresiones
β_1 = 0.85  # Factor de Relación de Profundidad del Bloque Rectangular Equivalente de Esfuerzos de Compresión
c = 7.30547 cm  # Ubicación del Eje Neutro de la Sección
h_1 = 62.6945 cm  # Altura 01 para el Cálculo del Factor "β"
h_2 = 53.6945 cm  # Altura 02 para el Cálculo del Factor "β"
# 04.02. Cálculo y Verificación de Ancho de Fisura
β := h_1/h_2
ω := 1.10*cm/kgf*β*f_s*nthroot(dc*A_ct, 3)*10^-5*mm
ω_máx :=
    if Condición__de_Exposición == "Interior"
        0.40 mm
    else if Condición__de_Exposición == "Exterior"
        0.34 mm
Verificación__Ancho_de_Fisura :=
    if ω < ω_máx
        "Si Cumple"
    else
        "No Cumple, Verificar"
β = 1.16761  # Factor "β"
ω = 0.27387 mm  # Ancho de Fisura Aproximado según Método Empírico
ω_máx = 0.34 mm  # Ancho de Fisura Máximo según Método Empírico
Verificación__Ancho_de_Fisura = "Si Cumple"
