# Worksheet setting: ORIGIN = 1
# DISEÑO CERCO PERIMETRICO
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# DIMENSIONES DEL CERCO
# Altura del paño
H := 2 m
# Peralte columnas
h_c := 0.20 m
# Longitud del paño
L := 3.0 m
# Ancho columnas
b_c := 0.15 m
# Peralte viga solera
h_v := 0.20 m
# Espesor total del muro
t_n := 0.15 m
# Ancho viga solera
b_v := 15 cm
# Recubrimiento
r := 2 cm
# MATERIALES
# Resistencia del concreto
f'_c := 17.5 MPa
# Fluencia acero de refuerzo
f_y := 420 MPa
# Peso especifico del concreto reforzado
γ_c := 24 kN/m^3
# Esfuerzo admisible en tracción de la albañilería (Art. 29.8-E.070)
f'_t := 0.15 MPa
# Peso específico de la albañilería
γ_a := 13.5 kN/m^3
# SISMICIDAD
# Factor de zona
Z := 0.45
# Factor de Uso
U := 1.0
# Factor de suelo
S := 1.2
# 1. DISEÑO DEL MURO
# Condición de arriostramiento del muro --->
CASO := 1
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Y_1(x) := 0.0003*x^4 + 0.0022*x^3 - 0.0383*x^2 + 0.1497*x - 0.066
Y_2(x) := -0.0087*x^4 + 0.0753*x^3 - 0.2443*x^2 + 0.3557*x - 0.066
a :=
    if CASO == 1
        a ← min(L, H)
    else if CASO == 2
        a ← L - 2*h_c
    else
        a ← H
m_1 :=
    if CASO == 1
        b ← max(H, L)
        m ← Y_1(b/a)
    else if CASO == 2
        b ← H
        m ← Y_2(b/a)
    else if CASO == 3
        m ← 0.125
    else
        m ← 0.5
# Valores de a y m (Art. 29.7 - E.070)
a = 2 m
m_1 = 0.0813187
# Carga Sísmica (Art. 41 - E.030)
w := 0.5*Z*U*S*γ_a*t_n = 0.54675 kPa
# Momento flector en la albañileria (Art. 31.2 - E.070)
M_s := m_1*w*a^2 = 0.177844 kN
# Esfuerzo normal producido por Ms (Art. 31.3 - E.070)
f_m := 6*M_s/(t_n - 2 cm)^2 = 0.0631399 MPa
fm := if(f_m < f'_t, "cumple", "no cumple")
f_m < f'_t
fm = "cumple"
# 1.1. DISEÑO ELEMENTOS DE ARRIOSTRE
# 1.1.1. DISEÑO VIGA SOLERA
# Fuerza sísmica debido al peso propio de la viga
w_sv := 0.5*Z*U*S*γ_c*h_v*b_v = 0.1944 kN/m
# Cortante en la viga
V_v :=
    if CASO == 1
        V_v ← w*H/4*(L - H/2) + w_sv*L/2
    else if CASO == 2
        V_v ← 0 kN
    else if CASO == 3
        V_v ← w*H/4*L + w_sv*L/2
    else
        V_v ← 0 kN
    = 0.83835 kN
R :=
    if CASO == 1
        w*H/4*(L - H/2)
    else
        0 kN
    = 546.75 N
# Momento
M_v :=
    if CASO == 1
        ((R - w*H^2/8)*H/2 + 2/3*(w*H^2/8)*H/2) + 1/2*(R - w*H^2/8)*(L/2 - H/2) + w_sv*L^2/8
    else if CASO == 3
        (w*H/2 + w_sv)*L^2/8
    else
        0 kN*m
V_uv := 1.25*V_v
M_uv := 1.25*M_v = 0.928336 kN*m  # Refuerzo Viga de arriostre
ρ_min := 0.7*sqrt(f'_c*kgf/cm^2)/f_y
A_min :=
    if CASO == 1 or CASO == 3
        ρ_min*b_v*h_v
    else
        0 cm^2
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# Refuerzo
A_min = 0.655012 cm^2
# Acero longitudinal
d_b := (3/8) in
# Acero transversal
d_v := 6 mm
# # de barras en h
g := 1
# # de barras en b
j := 2
k := 1 .. j
i := 1 .. g
n_v[g, j] := 1
n_v[i, 1] := 1
n_v[1, k] := 1
n_v[i, j] := 1
n_v[g, k] := 1
# Distribución de refuerzo
n_v = [1, 1]
# Recubrimiento al refuerzo longitudinal
co := r + d_v + d_b/2
# Número de barras por capa
n_s1 := sum(n_v[k, :], k = 1 .. rows(n_v)) = [1, 1]
# Area of rebar
A_sb := π*d_b^2/4
# Area of rebar by level
A_s1 := A_sb*transpose(n_s1) = [0.712557; 0.712557] cm^2
A_sv := A_s1[last(A_s1)] = 0.712557 cm^2
a :=
    if CASO == 1 or CASO == 3
        A_sv*f_y/(0.85*f'_c*h_v)
    else
        0 cm
d :=
    if j == 1
        b_v/2
    else if a == 0 cm
        0 cm
    else
        b_v - co
    = 0.119237 m
c := a/0.85 = 1.18349 cm
ε_yv :=
    if c == 0 cm
        0
    else
        ((d - c)/c)*0.003
ϕ :=
    if ε_yv ≥ 0.005
        0.9
    else if 0.002 ≤ ε_yv < 0.005
        0.65 + 0.25*(ε_yv - 0.002)/(0.005 - 0.002)
    else
        0.65
    = 0.9
ε_yv = 0.0272253  # Verificar que el acero fluya ---> ey>0.002
# Diseño por flexión
ϕ = 0.9
# Resistencia a flexión
M_nv := ϕ*A_sv*f_y*(d - a/2) = 3.07615 kN*m
# Resistencia requerida
M_uv = 0.928336 kN*m
M := if(M_nv ≥ M_uv, "cumple", "no cumple")
M_nv > M_uv
M = "cumple"
# Diseño por Cortante
# Resistencia a cortante
V_nv := 0.85*0.17*sqrt(f'_c*MPa)*b_v*h_v = 18.1346 kN
# Resistencia requerida
V_uv = 1.04794 kN
V := if(V_nv ≥ V_uv, "estribaje mínimo", "requiere estribos")
V_nv > V_uv
V = "estribaje mínimo"
# 1.1.2. DISEÑO COLUMNA DE ARRIOSTRE
# Fuerza sísmica debido al peso propio de la columna
w_sc := 0.5*Z*U*S*γ_c*h_c*b_c = 0.1944 kN/m
V_c :=
    if CASO == 1
        V_v + w*H/2*H/2 + w_sc*H
    else if CASO == 2
        w*L*H/2 - w*L^2/8 + w_sc*H
    else
        0 kN
    = 1.7739 kN
M_c :=
    if CASO == 1
        V_v*H + w*H^2/8*H/3 + w*H^2/4*H/3 + 1/2*w_sc*H^2
    else if CASO == 2
        w*L*H^2/4 - w*L^3/48 + 1/2*w_sc*H^2
    else
        0 kN*m
V_uc := 1.25*V_c
M_uc := 1.25*M_c
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# Refuerzo
# Acero longitudinal
d_b := (1/2) in
# Acero transversal
d_v := 6 mm
# # de barras en h
g := 2
# # de barras en b
j := 2
k := 1 .. g
i := 1 .. j
n_c[j, g] := 1
n_c[i, 1] := 1
n_c[1, k] := 1
n_c[i, g] := 1
n_c[j, k] := 1
# Distribución de refuerzo
n_c = [1, 1; 1, 1]
# Recubrimiento al refuerzo longitudinal
co := r + d_v + d_b/2
# Número de barras por capa
n_s1 := sum(n_c[:, i], i = 1 .. cols(n_c)) = [2; 2]
# Area of rebar
A_sc := π*d_b^2/4
# Area of rebar by level
A_s1 := A_sc*n_s1 = [2.53354; 2.53354] cm^2
A_sc := A_s1[last(A_s1)] = 2.53354 cm^2
a :=
    if CASO == 1 or CASO == 2
        A_sc*f_y/(0.85*f'_c*h_c)
    else
        0 cm
d :=
    if j == 1
        b_c/2
    else if a == 0 cm
        0 cm
    else
        b_c - co
    = 0.11765 m
c := a/0.85 = 4.20795 cm
ε_yc :=
    if c == 0 cm
        0
    else
        ((d - c)/c)*0.003
ϕ :=
    if ε_yc ≥ 0.005
        0.9
    else if 0.002 ≤ ε_yc < 0.005
        0.65 + 0.25*(ε_yc - 0.002)/(0.005 - 0.002)
    else
        0.65
    = 0.9
ε_yc = 0.00538769  # Verificar que el acero fluya---> ey>0.002
# Diseño por flexión
ϕ = 0.9
# Resistencia a flexión
M_nc := ϕ*A_sc*f_y*(d - a/2) = 9.55438 kN*m
# Resistencia requerida
# Columna de extremo
M_uc = 3.26531 kN*m
M :=
    if M_nc ≥ 2*M_uc
        "cumple"
    else
        "no cumple para columna central"
# Columna central
2*M_uc = 6.53062 kN*m
M_nc > M_uc
M = "cumple"
# Diseño por Cortante
# Resistencia a cortante
V_nc := 0.85*0.17*sqrt(f'_c*MPa)*b_c*h_c = 18.1346 kN
# Resistencia requerida
# Columna de extremo
V_uc = 2.21738 kN
V := if(V_nc ≥ 2*V_uc, "estribaje mínimo", "requiere estribos")
# Columna central
2*V_uc = 4.43475 kN
V_nc > V_uc
V = "estribaje mínimo"
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# 2. DISEÑO DE LA CIMENTACION
# DIMENSIONES
# Espesor sobrecimiento
t_s := 0.15 m
# Altura sobrecimiento sobre el terreno
h_s1 := 0.20 m
# Altura sobrecimiento bajo el terreno
h_s2 := 0.20 m
# Excentricidad cimiento
e_x := 17.5 cm
# Ancho cimiento corrido
B_c := 0.50 m
# Altura cimiento corrido
H_c := 0.50 m
# CONDICIONES DE CIMENTACION
# Peso específico del suelo
γ_s := 1.8 tonnef/m^3 = 17.652 1/m^3*kN
# Ángulo de fricción
ϕ_s := 30°
# Cohesión
c := 0.1 kPa
# Capacidad Portante
q_a := 1.5 kgf/cm^2 = 147.1 kPa
# 2.1. VERIFICACION DE LA ESTABILIDAD
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# 2.1.1. VERIFICACION POR VOLTEO
# Fuerzas de volteo
H_s := w_sv*1 m = 0.1944 kN
H_a := w*H*1 m = 1.0935 kN
H_c1 := 0.5*Z*U*S*γ_a*t_n*(h_s1 + h_s2)*1 m = 0.2187 kN
H_c2 := 0.5*Z*U*S*γ_a*H_c*B_c*1 m = 0.91125 kN
# Fuerzas resistentes
P_s := h_v*b_v*γ_c*1 m = 0.72 kN
P_a := t_n*H*γ_a*1 m = 4.05 kN
P_c1 := γ_c*(h_s1 + h_s2)*t_s*1 m = 1.44 kN
P_c2 := γ_c*B_c*H_c*1 m = 6 kN
# Empuje pasivo del suelo:
K_p := tan(45° + ϕ_s/2)^2 = 3
P_p := (1/2*K_p*γ_s*(H_c + h_s2)^2 + 2*c*(H_c + h_s2)*sqrt(K_p))*1 m = 13.2167 kN
M_5 :=
    if e_x == 0 m
        (P_s + P_a)*t_n/2
    else
        (P_s + P_a)*B_c/2
    = 1.1925 kN*m
M_6 :=
    if e_x == 0 m
        P_c1*t_s/2 + P_c2*B_c/2
    else
        (P_c1 + P_c2)*B_c/2
    = 1.86 kN*m
M_9 :=
    if e_x == 0 m
        γ_s*(B_c - t_s)*h_s2*1 m*((t_s + B_c)/2)
    else
        γ_s*e_x*h_s2*1 m*(e_x/2)
M_1 := H_s*(H_c + h_s2 + h_s1 + H + b_v/2) = 0.57834 kN*m
M_7 := P_p*((H_c + h_s2)/3) = 3.08389 kN*m
M_2 := H_a*(H_c + h_s2 + h_s1 + H/2) = 2.07765 kN*m
M_8 := γ_s*e_x*h_s2*1 m*(B_c - e_x/2) = 0.25485 kN*m
M_3 := H_c1*(H_c + ((h_s2 + h_s1)/2)) = 0.15309 kN*m
M_4 := H_c2*(H_c/2) = 0.227813 kN*m
ΣM_R := M_5 + M_6 + M_7 + M_8 + M_9
ΣM_V := M_1 + M_2 + M_3 + M_4
FS_v := ΣM_R/ΣM_V = 2.12233
# Momento de volteo
ΣM_V = 3.03689 kN*m
FS := if(FS_v ≥ 2, "cumple", "no cumple")
# Momento Resistente
ΣM_R = 6.4453 kN*m
# Factor de seguridad >2
FS_v = 2.12233
FS = "cumple"
# 2.1.2. VERIFICACION POR DESLIZAMIENTO
# Fuerza de fricción suelo-concreto
ΣV := P_s + P_a + P_c1 + P_c2 = 12.21 kN
F := ΣV*tan(0.5*ϕ_s) + B_c*0.5*c*1 m = 3.29666 kN
# Fuerzas actuantes
F_A := H_s + H_a + H_c1 + H_c2 = 2.41785 kN
# Fuerzas resistentes
F_R := P_p + F = 16.5133 kN
FS_D := F_R/F_A
FS := if(FS_D ≥ 2, "cumple", "no cumple")
# Factor de seguridad >1.5
FS_D = 6.82976
FS = "cumple"
# 2.1.3. VERIFICACION POR CAPACIDAD DE CARGA DEL SUELO
# Momento neto
M_net := ΣM_V - P_p*H_c/3 + ΣV*(B_c/2 - (e_x + t_s/2)) = 0.834112 kN*m
# Presiones desarrolladas en el terreno
# Presion máxima
q_max := ΣV/(B_c*1 m) + 6*M_net/(1 m*B_c^2) = 44.4387 kPa
# Presión mínima
q_min := ΣV/(B_c*1 m) - 6*M_net/(1 m*B_c^2) = 4.40132 kPa
q := if(q_a ≥ q_max, "cumple", "no cumple")
# Presion admisible
q_a = 147.1 kPa
q = "cumple"
