# Worksheet setting: ORIGIN = 1
# DISEÑO DE COLUMNAS DE CONCRETO REFORZADO ACI 318-19
# Materiales
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# Concreto
f'_c := 21 MPa
# Acero de refuerzo
f_y := 420 MPa
# Módulo de elasticidad
E_s := 200 GPa
# Dimensiones
# Diámetro
D := 60 cm
# Recubrimiento al estribo
r := 40 mm
# Refuerzo
# Acero longitudinal
d_b := 1 in
# # de barras
n := 8
# Acero transversal
d_v := (3/8) in
est := 1
# numero de barras n
i := 1 .. n
α[i] := 2*π/n*(i - 1)
R := D/2 - r - d_v - d_b/2
# distancia d para cada barra
d[i] := r + d_v + d_b/2 + R*(1 - cos(α[i]))
# cuantia de acero
ρ := n*π*d_b^2/4/(π*D^2/4) = 0.0143369
# Cuantía (10.6.1.1)
ρ = 0.0143369
# Area of rebar
A_sb := π*d_b^2/4
A_st := n*A_sb
d = [6.2225; 13.1868; 30; 46.8132; 53.7775; 46.8132; 30; 13.1868] cm
# Level of rebar
β_1 :=
    if f'_c ≤ 28 MPa
        0.85
    if 28 MPa < f'_c ≤ 55 MPa
        0.85 - 0.05*(f'_c - 28*MPa)/(7 MPa)
    also if f'_c > 55 MPa
        0.65
c(a) := a/β_1
i := 1 .. rows(d)
ε_s(i, a) :=
    if a == 0
        0.005
    else if a == D
        -0.003
    else
        0.003*(d[i] - c(a))/c(a)
f_s(i, a) := sign(ε_s(i, a))*min(|ε_s(i, a)|*E_s, f_y)
C_s(i, a) :=
    if f_s(i, a) ≥ 0
        A_sb*f_s(i, a)
    else
        A_sb*(f_s(i, a) - 0.85*f'_c)
# Area segmento circular
θ(a) :=
    if a ≤ D/2
        acos((D/2 - a)/(D/2))
    else
        180° - acos((a - D/2)/(D/2))
A_sc(a) := D^2*((θ(a) - sin(θ(a))*cos(θ(a)))/4)
# Fuerza de compresion concreto
C_c(a) := 0.85*f'_c*A_sc(a)
# Max allowable compression load
P_nmax := (0.85*f'_c*(π*D^2/4 - A_st) + A_st*f_y)
ε_t(a) :=
    if a == 0
        0.005
    else
        0.003*(max(d) - c(a))/c(a)
ϕ(a) :=
    if ε_t(a) ≥ 0.005
        0.9
    else if 0.002 ≤ ε_t(a) < 0.005
        0.65 + 0.25*(ε_t(a) - 0.002)/0.003
    else
        0.65
# Factor de maxima fuerza axial
ζ := if(est == 1, 0.80, 0.85)
P_n(a) := min(C_c(a) - sum(C_s(i, a), i = 1 .. rows(d)), P_nmax)
ϕP_n(a) := ϕ(a)*min(C_c(a) - sum(C_s(i, a), i = 1 .. rows(d)), ζ*P_nmax)
M_n(a) := (0.85*f'_c*D^3*(sin(θ(a))^3/12) + sum(C_s(i, a)*(d[i] - D/2), i = 1 .. rows(d)))
ϕM_n(a) := ϕ(a)*(0.85*f'_c*D^3*(sin(θ(a))^3/12) + sum(C_s(i, a)*(d[i] - D/2), i = 1 .. rows(d)))
max(d) = 0.537775 m
a := 0 m, 0.001*D .. 1.*D
# Punto fs = 0.50fy
s_0.5 :=
    a ← D
    while f_s1 < 0.5*f_y
        f_s1 ← 0.003*(max(d) - c(a))/c(a)*E_s
        a ← a - 0.1 mm
    a
    = 33.84 cm
P_0.5 := P_n(s_0.5) = 3534.58 kN
M_0.5 := M_n(s_0.5) = 480.939 kN*m
# Punto fs=0 MPa
s_0 :=
    a ← D
    while f_s2 < 0.001 MPa
        f_s2 ← 0.003*(max(d) - c(a))/c(a)*E_s
        a ← a - 0.1 mm
    a
    = 45.7 cm
P_0 := P_n(s_0) = 5173.77 kN
M_0 := M_n(s_0) = 309.919 kN*m
P_0 := transpose([0, P_0]) = [0; 5173.77] kN
M_0 := transpose([0, M_0]) = [0; 309.919] kN*m
P_0.5 := transpose([0, P_0.5]) = [0; 3534.58] kN
M_0.5 := transpose([0, M_0.5]) = [0; 480.939] kN*m
# 1. FUERZA AXIAL Y MOMENTO
# Resistencia requerida
# Fuerza Axial
P_u := [1000, 200] kN
# Momento
M_u := [150, 50] kN*m
# [chart]
    X[1] := M_0/1000
    Y[1] := P_0/1000
    X[3] := M_n(a)/1000
    X[4] := ϕM_n(a)/1000
    X[5] := transpose(M_u)/1000
    X[2] := M_0.5/1000
    Y[2] := P_0.5/1000
    Y[3] := P_n(a)/1000
    Y[4] := ϕP_n(a)/1000
    Y[5] := transpose(P_u)/1000
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# 2. CORTE
# Acero de refuerzo transversal
f_yt := 4200 kgf/cm^2
# Factor de concreto liviano
λ := 1
# Espaciamiento
s := 10 cm
# Factor de reducción de la resistencia
A_v := 2*π*d_v^2/4 = 1.42511 cm^2
ϕ := 0.75
# Área de refuerzo transversal
A_v = 1.42511 cm^2
# Resistencia Requerida
# Fuerza Axial
N_u := [200, 300] kN
# Cortante
V_u := [300, 80] kN
# Ancho del alma
b_w := D
# Factor de modificación por efecto del tamaño
λ_s := min(sqrt(2/(1 + d/(10 in))), 1)
# Área bruta de la sección
A_g := π*D^2/4 = 0.282743 m^2
# Refuerzo a cortante mínimo
A_vmin := max(0.75*sqrt(f'_c*psi)*b_w*s/f_yt, 50*b_w*s/(f_yt/psi))
# (22.5.5.1.2)
i := 1 .. last(transpose(N_u))
A[i] := min(transpose(N_u)[i]/(6*A_g), 0.05*f'_c)
# Cuantia de refuerzo longitudinal
k := 1 .. last(d)
A_s1[k] :=
    if d[k] < 2/3*D
        0
    else
        A_sb
# Peralte efectivo
d := 0.8*D
ρ_w := sum(A_s1)/(b_w*d) = 0.0052782
# Resistencia del concreto
V_c :=
    if A_v ≥ A_vmin
        (8*λ*ρ_w^(1/3)*min(sqrt(f'_c*psi), 100 psi) + A)*b_w*d
    else
        (8*λ_s*λ*ρ_w^(1/3)*min(sqrt(f'_c*psi), 100 psi) + A)*b_w*d
# Máxima resistencia requerida
# posición
v1 := |match(max(V_u), transpose(V_u))| = 1
V_u := max(V_u)
# Resistencia del concreto 22.5.5.1.1
V_c := min(5*λ*sqrt(f'_c*psi)*b_w*d, V_c[v1])
# Resistencia acero de refuerzo (22.5.8.5.3)
V_s := A_v*f_yt*d/s = 281.748 kN
# Máximo espaciamiento del refuerzo
s_max :=
    if V_s ≤ 4*sqrt(f'_c*psi)*b_w*d
        min(d/2, 60 cm)
    else
        min(d/4, 30 cm)
# Verificación de las dimensiones de la sección transversal (22.5.1.2)
seccion := if(V_u ≤ ϕ*(V_c + 8*sqrt(f'_c*psi)*b_w*d), "cumple", "no cumple")
V_u = 300 kN
# <
ϕ*(V_c + 8*sqrt(f'_c*psi)*b_w*d) = 797.474 kN
acero :=
    if V_u ≤ 0.5*ϕ*V_c
        "no requiere"
    else if ϕ*V_c > V_u > 0.5*ϕ*V_c
        "mínimo"
    else
        "require"
seccion = "cumple"
# Requiere acero de refuerzo
acero = "require"
# Refuerzo a cortante mínimo (10.6.2)
A_vmin = 0.502193 cm^2
# Máximo espaciamiento si requiere refuerzo a corte (10.7.6.5.2)
s_max = 24 cm
# Resistencia de la sección
# Resistencia del concreto (22.5.5)
V_c = 186.597 kN
# Resistencia del acero de refuerzo (22.5.8.5.3)
V_s = 281.748 kN
# Resistencia al corte
V_n := ϕ*(V_c + V_s)
V_n = 351.259 kN
corte := if(V_u ≤ V_n, "cumple", "no cumple")
# Resistencia requerida
V_u = 300 kN
corte = "cumple"
