# Worksheet setting: ORIGIN = 1
# DISEÑO DE COLUMNAS DE CONCRETO REFORZADO ACI 318-19
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# Materiales
# Concreto
f'_c := 21 MPa
# Acero de refuerzo
f_y := 420 MPa
# Módulo de elasticidad
E_s := 200 GPa
# Dimensiones
# Altura
h := 60 cm
# Ancho
b := 40 cm
# Recubrimiento al estribo
r := 4 cm
# Refuerzo
# # de barras en b
j := 3
# # de barras en h
g := 4
k := 1 .. j
i := 1 .. g
n_b[g, j] := 1
n_b[i, 1] := 1
n_b[1, k] := 1
n_b[i, j] := 1
n_b[g, k] := 1
# Acero longitudinal
d_b := (5/8) in
n_b = [1, 1, 1; 1, 0, 1; 1, 0, 1; 1, 1, 1]
ρ := sum(sum(n_b[:, i], i = 1 .. cols(n_b))*π*d_b^2/4)/(h*b) = 0.00824719
# Acero transversal
d_v := (3/8) in
# Cuantía (10.6.1.1)
ρ = 0.00824719
# Cover to longintudinal rebar
co := r + d_v + d_b/2
# Number of rebar by level
n_s1 := sum(n_b[:, i], i = 1 .. cols(n_b))
# Area of rebar
A_sb := π*d_b^2/4
# Area of rebar by level
A_s1 := A_sb*n_s1
# Total area of rebars
A_s := sum(A_s1)
# Level of rebar
d :=
    d[1] ← co
    for i ∈ 2 .. rows(n_b)
        Δ ← (h - 2*co)/(rows(n_b) - 1)
        d[i] ← d[i - 1] + Δ
    d
β_1 :=
    if f'_c ≤ 28 MPa
        0.85
    if 28 MPa < f'_c ≤ 55 MPa
        0.85 - 0.05*(f'_c - 28*MPa)/(7 MPa)
    also if f'_c > 55 MPa
        0.65
c(a) := a/β_1
i := 1 .. rows(n_b)
ε_s(i, a) :=
    if a == 0
        0.005
    else if a == h
        -0.003
    else
        0.003*(d[i] - c(a))/c(a)
f_s(i, a) := sign(ε_s(i, a))*min(|ε_s(i, a)|*E_s, f_y)
C_s(i, a) :=
    if f_s(i, a) ≥ 0
        A_s1[i]*f_s(i, a)
    else
        A_s1[i]*(f_s(i, a) - 0.85*f'_c)
C_c(a) := 0.85*f'_c*a*b
# Max allowable compression load
P_nmax := (0.85*f'_c*(b*h - A_s) + A_s*f_y)
ε_t(a) :=
    if a == 0
        0.005
    else
        0.003*(d[rows(n_b)] - c(a))/c(a)
ϕ(a) :=
    if ε_t(a) ≥ 0.005
        0.9
    else if 0.002 ≤ ε_t(a) < 0.005
        0.65 + 0.25*(ε_t(a) - 0.002)/0.003
    else
        0.65
P_n(a) := min(C_c(a) - sum(C_s(i, a), i = 1 .. rows(n_b)), P_nmax)
ϕP_n(a) := ϕ(a)*min(C_c(a) - sum(C_s(i, a), i = 1 .. rows(n_b)), 0.8*P_nmax)
M_n(a) := (C_c(a)*(h/2 - a/2) + sum(C_s(i, a)*(d[i] - h/2), i = 1 .. rows(n_b)))
ϕM_n(a) := ϕ(a)*(C_c(a)*(h/2 - a/2) + sum(C_s(i, a)*(d[i] - h/2), i = 1 .. rows(n_b)))
a := 0 m, 0.001*h .. 1.*h
# Punto fs = 0.50fy
s_0.5 :=
    a ← h
    while f_s1 < 0.5*f_y
        f_s1 ← 0.003*(d[g] - c(a))/c(a)*E_s
        a ← a - 0.1 mm
    a
    = 34.14 cm
P_0.5 := P_n(s_0.5) = 2706.97 kN
M_0.5 := M_n(s_0.5) = 416.281 kN*m
# Punto fs=0 MPa
s_0 :=
    a ← h
    while f_s2 < 0.001 MPa
        f_s2 ← 0.003*(d[g] - c(a))/c(a)*E_s
        a ← a - 0.1 mm
    a
    = 46.1 cm
P_0 := P_n(s_0) = 3777.82 kN
M_0 := M_n(s_0) = 297.575 kN*m
P_0 := transpose([0, P_0]) = [0; 3777.82] kN
M_0 := transpose([0, M_0]) = [0; 297.575] kN*m
P_0.5 := transpose([0, P_0.5]) = [0; 2706.97] kN
M_0.5 := transpose([0, M_0.5]) = [0; 416.281] kN*m
# 1. FUERZA AXIAL Y MOMENTO
# Resistencia requerida
# Fuerza Axial
P_u := [1000, 500, 150, 2000] kN
# Momento
M_u := [11, 50, 120, 200] kN*m
# [chart]
    X[1] := M_0/1000
    Y[1] := P_0/1000
    X[3] := M_n(a)/1000
    X[4] := ϕM_n(a)/1000
    X[5] := transpose(M_u)/1000
    X[2] := M_0.5/1000
    Y[2] := P_0.5/1000
    Y[3] := P_n(a)/1000
    Y[4] := ϕP_n(a)/1000
    Y[5] := transpose(P_u)/1000
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# 2. CORTE
# Acero de refuerzo transversal
f_yt := 420 MPa
# Factor de concreto liviano
λ := 1
# Número de ramas del estribo
r_v := 2
# Espaciamiento
s := 20 cm
# Factor de reducción de la resistencia
A_v := r_v*π*d_v^2/4 = 1.42511 cm^2
ϕ := 0.75
# Área de refuerzo transversal
A_v = 1.42511 cm^2
# Resistencia Requerida
# Fuerza Axial
N_u := P_u = [1000, 500, 150, 2000] kN
# Cortante
V_u := [300, 10, 80, 60] kN
# Ancho del alma
b_w := b
# Factor de modificación por efecto del tamaño
λ_s := min(sqrt(2/(1 + d/(10 in))), 1)
# Área bruta de la sección
A_g := b*h
# Refuerzo a cortante mínimo
A_vmin := max(0.75*sqrt(f'_c*psi)*b_w*s/f_yt, 50*b_w*s/(f_yt/psi))
# (22.5.5.1.2)
i := 1 .. last(transpose(N_u))
A[i] := min(transpose(N_u)[i]/(6*A_g), 0.05*f'_c)
# Cuantia de refuerzo longitudinal
k := 1 .. last(A_s1)
A_s1[k] :=
    if d[k] < 2/3*h
        0
    else
        A_s1[k]
# Peralte efectivo
d := d[g]
ρ_w := sum(A_s1)/(b_w*d) = 0.00273621
# Resistencia del concreto
V_c :=
    if A_v ≥ A_vmin
        (8*λ*ρ_w^(1/3)*min(sqrt(f'_c*psi), 100 psi) + A)*b_w*d
    else
        (8*λ_s*λ*ρ_w^(1/3)*min(sqrt(f'_c*psi), 100 psi) + A)*b_w*d
# Máxima resistencia requerida
# posición
v1 := |match(max(V_u), transpose(V_u))| = 1
V_u := max(V_u)
# Resistencia del concreto 22.5.5.1.1
V_c := min(5*λ*sqrt(f'_c*psi)*b_w*d, V_c[v1])
# Resistencia acero de refuerzo (22.5.8.5.3)
V_s := A_v*f_yt*d/s = 162.367 kN
# Máximo espaciamiento del refuerzo
s_max :=
    if V_s ≤ 4*sqrt(f'_c*psi)*b_w*d
        min(d/2, 60 cm)
    else
        min(d/4, 30 cm)
# Verificación de las dimensiones de la sección transversal (22.5.1.2)
seccion := if(V_u ≤ ϕ*(V_c + 8*sqrt(f'_c*psi)*b_w*d), "cumple", "no cumple")
V_u = 300 kN
# <
ϕ*(V_c + 8*sqrt(f'_c*psi)*b_w*d) = 677.789 kN
acero :=
    if V_u ≤ 0.5*ϕ*V_c
        "no requiere"
    else if ϕ*V_c > V_u > 0.5*ϕ*V_c
        "mínimo"
    else
        "require"
seccion = "cumple"
# Requiere acero de refuerzo
acero = "require"
# Refuerzo a cortante mínimo (10.6.2)
A_vmin = 0.656644 cm^2
# Máximo espaciamiento si requiere refuerzo a corte (10.7.6.5.2)
s_max = 27.1269 cm
# Resistencia de la sección
# Resistencia del concreto (22.5.5)
V_c = 243.103 kN
# Resistencia del acero de refuerzo (22.5.8.5.3)
V_s = 162.367 kN
# Resistencia al corte
V_n := ϕ*(V_c + V_s)
V_n = 304.103 kN
corte := if(V_u ≤ V_n, "cumple", "no cumple")
# Resistencia requerida
V_u = 300 kN
corte = "cumple"
