# Worksheet setting: ORIGIN = 1
# DISEÑO DE COLUMNAS DE CONCRETO REFORZADO ACI 318-19
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# Materiales
# Concreto
f'_c := 21 MPa
# Acero de refuerzo
f_y := 420 MPa
# Módulo de elasticidad
E_s := 200 GPa
# Dimensiones
# Altura
h := 60 cm
# Ancho
b := 60 cm
# Recubrimiento al estribo
r := 4 cm
# Refuerzo
# # de barras en b
j := 4
# # de barras en h
g := 4
k := 1 .. j
i := 1 .. g
n_b[g, j] := 1
n_b[i, 1] := 1
n_b[1, k] := 1
n_b[i, j] := 1
n_b[g, k] := 1
# Acero longitudinal
d_b := 1 in
n_b = [1, 1, 1, 1; 1, 0, 0, 1; 1, 0, 0, 1; 1, 1, 1, 1]
ρ := sum(sum(n_b[:, i], i = 1 .. cols(n_b))*π*d_b^2/4)/(h*b) = 0.0168902
# Acero transversal
d_v := (1/2) in
# Cuantía (10.6.1.1)
ρ = 0.0168902
# Cover to longintudinal rebar
co := r + d_v + d_b/2
# Coordenadas barras de refuerzo
b_1 := b - 2*co = 46.92 cm
h_1 := h - 2*co = 46.92 cm
x := b_1/(j - 1)
y := h_1/(g - 1)
j_1 := 1 .. j
g_1 := 1 .. g
XY[g_1, j_1] := [-b_1/2 + (j_1 - 1)*x; h_1/2 - (g_1 - 1)*y]
# Variación de la inclinació del eje neutro
θ :=
    for i ∈ 1 .. 10
        θ[i] ← (i - 1)*10°
    θ
# Variación de la altura máxima D
D_max :=
    for i ∈ 1 .. 10
        if θ[i] == π/2
            d_max[i] ← b
        else
            d_max[i] ← h*sec(θ[i]) + (b - h*tan(θ[i]))*sin(θ[i])
    d_max
# Variación del bloque de compresion del concreto
a :=
    for i ∈ 1 .. 101
        for j ∈ 1 .. 10
            a[i, j] ← (i - 1)*0.01*D_max[j]
    a
# Distancia d para cada barra de refuerzo
g = 4
j = 4
d :=
    for i ∈ 1 .. 10
        for k ∈ 1 .. j
            for l ∈ 1 .. g
                D[l, k] ← |(-tan(θ[i])*XY[l, k][1] + XY[l, k][2] - tan(θ[i])*(b/2) - (h/2))/sqrt(tan(θ[i])^2 + 1)|
        d[i] ← D
    d
# Área del bloque de compresión
D_3 := h*cos(θ)
D_2 := b*sin(θ)
α := atan(h/b) = 45°
A_c :=
    for i ∈ 1 .. 10
        A_c[1, i] ← 0 cm^2
        A_c[101, i] ← b*h
        XY_c[1, i] ← [0; 0] cm
        XY_c[101, i] ← [0; 0] cm
        for j ∈ 2 .. 100
            if θ[i] ≤ α
                if a[j, i] > D_3[i]
                    y[j] ← a[j, i]*cos(θ[i]) - (b - a[j, i]*sin(θ[i]))*tan(θ[i])
                    x[j] ← b - (h - y[j])/tan(θ[i])
                    A_1 ← b*y[j]
                    A_2 ← x[j]*(h - y[j])
                    A_3 ← 1/2*(h - y[j])*(b - x[j])
                    A_c[j, i] ← A_1 + A_2 + A_3
                    X_c[j] ← (A_1*b/2 + A_2*x[j]/2 + A_3*(x[j] + (b - x[j])/3))/(A_1 + A_2 + A_3) - b/2
                    Y_c[j] ← (A_1*(h - y[j]/2) + A_2*((h - y[j])/2) + A_3*2/3*(h - y[j]))/(A_1 + A_2 + A_3) - h/2
                else if a[j, i] > D_2[i]
                    y_1[j] ← a[j, i]*sec(θ[i])
                    y_2[j] ← y_1[j] - b*tan(θ[i])
                    A_1 ← b*y_2[j]
                    A_2 ← b*((y_1[j] - y_2[j])/2)
                    A_c[j, i] ← A_1 + A_2
                    X_c[j] ← (A_1*b/2 + A_2*b/3)/(A_1 + A_2) - b/2
                    Y_c[j] ← (A_1*(h - y_2[j]/2) + A_2*(h - y_2[j] - 1/3*(y_1[j] - y_2[j])))/(A_1 + A_2) - h/2
                else
                    x[j] ← a[j, i]*csc(θ[i])
                    y[j] ← a[j, i]*sec(θ[i])
                    A_c[j, i] ← x[j]*y[j]/2
                    X_c[j] ← x[j]/3 - b/2
                    Y_c[j] ← (h - y[j]/3) - h/2
            else if θ[i] > α
                if a[j, i] > D_2[i]
                    y[j] ← a[j, i]*cos(θ[i]) - (b - a[j, i]*sin(θ[i]))*tan(θ[i])
                    x[j] ← b - (h - y[j])/tan(θ[i])
                    A_1 ← b*y[j]
                    A_2 ← x[j]*(h - y[j])
                    A_3 ← 1/2*(h - y[j])*(b - x[j])
                    A_c[j, i] ← A_1 + A_2 + A_3
                    X_c[j] ← (A_1*b/2 + A_2*x[j]/2 + A_3*(x[j] + (b - x[j])/3))/(A_1 + A_2 + A_3) - b/2
                    Y_c[j] ← (A_1*(h - y[j]/2) + A_2*((h - y[j])/2) + A_3*2/3*(h - y[j]))/(A_1 + A_2 + A_3) - h/2
                else if a[j, i] > D_3[i]
                    x_1[j] ← a[j, i]*csc(θ[i])
                    x_2[j] ← x_1[j] - h*tan(π/2 - θ[i])
                    A_1 ← h*x_2[j]
                    A_2 ← h*((x_1[j] - x_2[j])/2)
                    A_c[j, i] ← A_1 + A_2
                    X_c[j] ← (A_1*x_2[j]/2 + A_2*(x_2[j] + 1/3*(x_1[j] - x_2[j])))/(A_1 + A_2) - b/2
                    Y_c[j] ← (A_1*(h/2) + A_2*(2/3*h))/(A_1 + A_2) - h/2
                else
                    x[j] ← a[j, i]*csc(θ[i])
                    y[j] ← a[j, i]*sec(θ[i])
                    A_c[j, i] ← x[j]*y[j]/2
                    X_c[j] ← x[j]/3 - b/2
                    Y_c[j] ← (h - y[j]/3) - h/2
            XY_c[j, i] ← [X_c[j]; Y_c[j]]
    [A_c; XY_c]
# Area of rebar
A_sb := π*d_b^2/4
β_1 :=
    if f'_c ≤ 28 MPa
        0.85
    if 28 MPa < f'_c ≤ 55 MPa
        0.85 - 0.05*(f'_c - 28*MPa)/(7 MPa)
    also if f'_c > 55 MPa
        0.65
c := a/β_1
# Esfuerzo en el acero de refuerzo
f_s :=
    for i ∈ 1 .. 10
        f_s[1, i] ← n_b*f_y
        f_s[101, i] ← n_b*(-f_y)
        for j_1 ∈ 2 .. 100
            for g_1 ∈ 1 .. g
                for j_2 ∈ 1 .. j
                    ε[g_1, j_2] ← n_b[g_1, j_2]*(0.003*(d[i][g_1, j_2] - c[j_1, i])/c[j_1, i])
                    if |ε[g_1, j_2]| < f_y/E_s
                        F[g_1, j_2] ← ε[g_1, j_2]*E_s
                    else if ε[g_1, j_2] < 0
                        F[g_1, j_2] ← -f_y
                    else
                        F[g_1, j_2] ← f_y
                    f_s[j_1, i] ← F
    f_s
# Fuerza en el acero
C_s :=
    for i ∈ 1 .. 10
        for j_1 ∈ 1 .. 101
            for g_1 ∈ 1 .. g
                for j_2 ∈ 1 .. j
                    if f_s[j_1, i][g_1, j_2] ≥ 0 MPa
                        G[g_1, j_2] ← f_s[j_1, i][g_1, j_2]*A_sb
                    else
                        G[g_1, j_2] ← (f_s[j_1, i][g_1, j_2] + 0.85*f'_c)*A_sb
                    C_s[j_1, i] ← G
    C_s
# Fuerza de compresión en el concreto
C_c := 0.85*f'_c*A_c[1]
A_s := A_sb*sum(sum(n_b[:, i], i = 1 .. j)) = 60.8049 cm^2
# Max allowable compression load
P_nmax := (0.85*f'_c*(b*h - A_s) + A_s*f_y)
ε_t :=
    for i ∈ 1 .. 10
        ε_t[1, i] ← 0.005
        for j ∈ 2 .. 101
            ε_t[j, i] ← 0.003*(max(d[i]) - c[j, i])/c[j, i]
    ε_t
ϕ :=
    for i ∈ 1 .. 10
        for j ∈ 1 .. 101
            if ε_t[j, i] ≥ 0.005
                ϕ[j, i] ← 0.9
            else if 0.002 ≤ ε_t[j, i] < 0.005
                ϕ[j, i] ← 0.65 + 0.25*(ε_t[j, i] - 0.002)/0.003
            else
                ϕ[j, i] ← 0.65
    ϕ
ϕP_n :=
    for i ∈ 1 .. 10
        for j_1 ∈ 1 .. 101
            P[j_1, i] ← ϕ[j_1, i]*min(C_c[j_1, i] - sum(sum(C_s[j_1, i][:, l], l = 1 .. j)), 0.8*P_nmax)
    P
# Momento en X e Y por cada barra
M_sx :=
    for i ∈ 1 .. 10
        for j_1 ∈ 1 .. 101
            for g1 ∈ 1 .. g
                for j2 ∈ 1 .. j
                    M_x[g1, j2] ← C_s[j_1, i][g1, j2]*XY[g1, j2][2]
                    M[j_1, i] ← M_x
    M
M_sy :=
    for i ∈ 1 .. 10
        for j_1 ∈ 1 .. 101
            for g1 ∈ 1 .. g
                for j2 ∈ 1 .. j
                    M_y[g1, j2] ← C_s[j_1, i][g1, j2]*XY[g1, j2][1]
                    M[j_1, i] ← M_y
    M
ϕM_nX :=
    for i ∈ 1 .. 10
        for j_1 ∈ 1 .. 101
            M[j_1, i] ← ϕ[j_1, i]*(C_c[j_1, i]*A_c[2][j_1, i][2] - sum(sum(M_sx[j_1, i][:, l], l = 1 .. j)))
        M
ϕM_nY :=
    for i ∈ 1 .. 10
        for j_1 ∈ 1 .. 101
            M[j_1, i] ← ϕ[j_1, i]*(C_c[j_1, i]*A_c[2][j_1, i][1] - sum(sum(M_sy[j_1, i][:, l], l = 1 .. j)))
        M
X := stack(ϕM_nX, -ϕM_nX, -ϕM_nX, ϕM_nX)
Y := stack(ϕM_nY, ϕM_nY, -ϕM_nY, -ϕM_nY)
Z := stack(ϕP_n, ϕP_n, ϕP_n, ϕP_n)
# FUERZA AXIAL Y MOMENTO
# Resistencia requerida
# Fuerza Axial
P_u := [800, 3000, 500, 150, 2000] kN
# Momento
M_ux := [-80, -150, -50, 120, 200] kN*m
M_uy := [150, 400, 100, -20, -200] kN*m
U := augment(transpose(M_ux)/(kN*m), transpose(M_uy)/(kN*m), transpose(P_u)/kN)
R := [X/(kN*m); Y/(kN*m); Z/kN]
# [3D plot: R, U]
