# Diseño de Escaleras - Caso III
# Método en Base a la Norma E.060
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# 01. Datos Pre-Liminares / De Entrada
# 01.01. Propiedades Geométricas de la Escalera
# 01.01.01. Cálculo de la Luz Libre del Tramo
b := 1.20 m  # Ancho de la Escalera
P := 0.25 m  # Paso de la Escalera
CP := 0.175 m  # Contrapaso de la Escalera
n := 9  # Número de Contrapasos de la Escalera
L_b := 1.20 m  # Longitud del Descanso de la Escalera
L_c := 1.50 m  # Longitud Horizontal del Tramo Inclinado de la Escalera
Verificación__Contrapaso_más_Paso :=
    if 60 cm ≤ 2*CP + P ≤ 64 cm
        "Si Cumple"
    else
        "No Cumple, Verificar"
L_n := L_b + L_c
L_n = 2.7 m  # Luz Libre del Tramo de la Escalera
Verificación__Contrapaso_más_Paso = "Si Cumple"
# 01.01.02. Cálculo del Espesor de la Losa Inclinada
t :=
    if Ceil(mean(L_n/25, L_n/20), 0.01 m) ≤ 0.10 m
        0.10 m
    else
        Ceil(mean(L_n/25, L_n/20), 0.01 m)
t = 0.13 m  # Garganta de la Escalera
r := 0.03 m  # Recubrimiento Inferior de la Escalera
d := t - r = 0.1 m  # Peralte Efectivo de la Sección de la Escalera
# 01.01.03. Definición del Ancho y Dimensiones de los Apoyos
L_a := 0.30 m  # Espesor del Apoyo Izquierdo (Muro, Viga o Placa)
L_d := 0.50 m  # Espesor del Apoyo Derecho (Viga Chata o Peraltada)
# 01.01.04. Cálculo del Espesor Efectivo de la Escalera
h_o := t/(P/sqrt(P^2 + CP^2)) = 0.158685 m
h_m := h_o + CP/2 = 0.246185 m
h_o = 0.158685 m  # Espesor de la Garganta en Sentido Horizontal
h_m = 0.246185 m  # Espesor Efectivo de la Escalera
# 01.02. Propiedades Mecánicas de los Materiales
f'_c := 210 kgf/cm^2  # Resistencia a la Compresión del Concreto
E_c := 15000*sqrt(f'_c*kgf/cm^2)
β_1 :=
    if 170*kgf/cm^2 ≤ f'_c ≤ 280*kgf/cm^2
        0.85
    else if f'_c ≤ 350*kgf/cm^2
        0.80
    else if f'_c ≤ 420*kgf/cm^2
        0.75
    else if f'_c ≤ 490*kgf/cm^2
        0.70
    else if f'_c > 490*kgf/cm^2
        0.65
E_c = 217371 kgf/cm^2  # Módulo de Elasticidad del Concreto
f_y := 4200 kgf/cm^2  # Esfuerzo Cedente del Acero Corrugado
E_s := 2.1*10^6 kgf/cm^2  # Módulo de Elasticidad del Acero Corrugado
γ_c := 2.40 tonnef/m^3  # Peso Específico del Concreto
ε_c := 0.003  # Deformación Unitaria del Concreto a Compresión
ε_sy := 0.0021  # Deformación Unitaria del Acero a Fluencia
β_1 = 0.85  # Factor de Relación de Profundidad del Bloque Rectangular Equivalente de Esfuerzos de Compresión
ϕ_Flexión := 0.90  # Factor de Reducción por Capacidad a Flexión
ϕ_Corte := 0.85  # Factor de Reducción por Capacidad a Corte
# 02. Modelo Estructural
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L_1 := L_a/2 + L_b
L_2 := L_c + L_d/2
L := L_1 + L_2
L_1 = 1.35 m  # Longitud del Tramo 01 de la Escalera
L_2 = 1.75 m  # Longitud del Tramo 02 de la Escalera
L = 3.1 m  # Longitud Total de la Escalera
# 03. Metrado de Cargas
# 03.01. Metrado de Cargas para el Descanso
# 03.01.01. Metrado de Carga Muerta
Peso__Acabados := 0.100 tonnef/m^2  # Peso de Acabados por Metro Cuadrado
Peso__Propio_Descanso := γ_c*b*t
w_cm_descanso := Peso__Acabados*b + Peso__Propio_Descanso
Peso__Propio_Descanso = 0.3744 tonnef/m
w_cm_descanso = 0.4944 tonnef/m
# 03.01.02. Metrado de Carga Viva
Peso__Sobrecarga_de_Uso := 0.400 tonnef/m^2
w_cv := Peso__Sobrecarga_de_Uso*b = 0.48 tonnef/m
# 03.01.03. Carga Última sobre el Descanso
w_u1 := 1.40*w_cm_descanso + 1.70*w_cv = 1.50816 tonnef/m
# 03.02. Metrado de Cargas para las Gradas
# 03.02.01. Metrado de Carga Muerta
Peso__Acabados = 0.1 tonnef/m^2  # Peso de Acabados por Metro Cuadrado
Peso__Propio_Gradas := γ_c*b*h_m
w_cm_gradas := Peso__Propio_Gradas + Peso__Acabados*b
Peso__Propio_Gradas = 0.709013 tonnef/m
w_cm_gradas = 0.829013 tonnef/m
# 03.02.02. Metrado de Carga Viva
Peso__Sobrecarga_de_Uso = 0.4 tonnef/m^2
w_cv = 0.48 tonnef/m
# 03.02.03. Carga Última sobre las Gradas
w_u2 := 1.40*w_cm_gradas + 1.70*w_cv = 1.97662 tonnef/m
# 04. Análisis Estructural
# 04.01. Diagrama de Fuerza Cortante
x_1 := 0, L/80 .. L_1
V_1(x_1) := (w_u1*L_1*(L_1/2 + L_2) + w_u2*L_2^2/2)/L - w_u1*x_1
x_2 := 0, L/80 .. L_2
V_2(x_2) := (w_u1*L_1*(L_1/2 + L_2) + w_u2*L_2^2/2)/L - w_u1*L_1 - w_u2*x_2
R_By := V_2(L_2) = -2.92605 tonnef
x_3(x_2) := L_1 + x_2
M_1(x_1) := (w_u1*L_1*(L_1/2 + L_2) + w_u2*L_2^2/2)/L*x_1 - w_u1*x_1^2/2
M_2(x_2) := (w_u1*L_1*(L_1/2 + L_2) + w_u2*L_2^2/2)/L*(L_1 + x_2) - w_u1*L_1*(L_1/2 + x_2) - w_u2*x_2^2/2
# [plot: V_1(x_1) (tonnef), V_2(x_2) (tonnef) vs x_1 (m), x_1, x_3(x_2) (m)]
# 04.02. Diagrama de Momento Flector
# [plot: -M_1(x_1) (tonnef*m), -M_2(x_2) (tonnef*m) vs x_1 (m), x_1, x_3(x_2) (m)]
M_u := 2.183 tonnef*m  # Momento Último Actuante
M_d := 0.80*M_u = 1.7464 tonnef*m  # Momento de Diseño
# 05. Diseño de la Escalera por Flexión
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# 05.01. Refuerzo Positivo
# 05.01.01. Refuerzo Mínimo Según Artículo 10.5.2.
ρ_mín := (14.10 kgf/cm^2)/f_y = 0.00335714
As_mín := ρ_mín*b*d = 4.02857 cm^2
ρ_b := 0.85*β_1*f'_c/f_y*(ε_c*E_s/(ε_c*E_s + f_y)) = 0.021675
A_sb := ρ_b*b*d = 26.01 cm^2
As_máx := 0.75*A_sb = 19.5075 cm^2
ρ_mín = 0.00335714  # Cuantía Mínima de Refuerzo a Tracción
As_mín = 4.02857 cm^2  # Acero Mínimo por Tracción
# 05.01.02. Refuerzo Máximo Según Artículo 10.3.4.
ρ_b = 0.021675  # Cuantía Balanceada
A_sb = 26.01 cm^2  # Acero producido por la Falla Balanceada
As_máx = 19.5075 cm^2  # Acero Máximo de Refuerzo Requerido
# 05.01.03. Refuerzo de Acero Requerido
A := 0.59
B := -1
D_1 := M_d/(ϕ_Flexión*f'_c*b*d^2)
A*w^2 + B*w + D == 0
w_1 := (-B + sqrt(B^2 - 4*A*D_1))/(2*A) = 1.61406
w_2 := (-B - sqrt(B^2 - 4*A*D_1))/(2*A) = 0.0808593
w := min(w_1, w_2) = 0.0808593
ρ_req := w*f'_c/f_y = 0.00404297
As_req := ρ_req*b*d = 4.85156 cm^2
Verificación__Cuantía_Balanceada :=
    if As_req ≤ As_máx
        "Si Cumple"
    else
        "No Cumple, Verificar"
As :=
    if As_req < As_mín
        As_mín
    else
        As_req
w = 0.0808593  # Índice de Refuerzo de la Sección
ρ_req = 0.00404297  # Cuantía Requerida de la Sección
As_req = 4.85156 cm^2  # Acero Requerido Positivo de la Sección
Verificación__Cuantía_Balanceada = "Si Cumple"
As = 4.85156 cm^2  # Acero Positivo a Utilizar en la Sección
# 05.02. Refuerzo Negativo
A's_req := max(1/3*As, 1/2*As) = 2.42578 cm^2
A's :=
    if A's_req < As_mín
        As_mín
    else
        A's_req
A's_req = 2.42578 cm^2  # Acero Requerido Negativo de la Sección
A's = 4.02857 cm^2  # Acero Negativo a Utilizar en la Sección
# 06. Refuerzo / Acero Colocado y Sus Verificaciones
# 06.01. Refuerzo Positivo
ϕ_db_1 := (3/8) in
A_db_1 := π*ϕ_db_1^2/4 = 0.712557 cm^2
s_1 := Floor(A_db_1*b/As, 2.50 cm) = 17.5 cm
Verificación__Separación_1 :=
    if 10 cm < s_1 < 30 cm
        "Si Cumple"
    else
        "No Cumple, Verificar"
s_1 = 17.5 cm  # Separación de Aceros Positivos
Verificación__Separación_1 = "Si Cumple"
# 06.02. Refuerzo Negativo
ϕ_db_2 := (3/8) in
A_db_2 := π*ϕ_db_2^2/4 = 0.712557 cm^2
s_2 := Floor(A_db_2*b/A's, 2.50 cm) = 20 cm
Verificación__Separación_2 :=
    if 10 cm < s_2 < 30 cm
        "Si Cumple"
    else
        "No Cumple, Verificar"
s_2 = 20 cm  # Separación de Aceros Negativos
Verificación__Separación_2 = "Si Cumple"
# 07. Acero por Temperatura
# 07.01. Acero Requerido
Núm__de_Capas := 1  # Número de Capas: A) 1 & B) 2
As_Temperatura :=
    if Núm__de_Capas == 1
        0.0018*b*t
    else if Núm__de_Capas == 2
        0.0012*b*t
As_Temperatura = 2.808 cm^2  # Acero Requerido por Temperatura
# 07.02. Acero Colocado
ϕ_db_3 := (3/8) in
A_db_3 := π*ϕ_db_3^2/4 = 0.712557 cm^2
s_3 := Floor(A_db_3*b/As_Temperatura, 2.50 cm) = 30 cm
Verificación__Separación_3 :=
    if 25 cm ≤ s_3 ≤ 30 cm
        "Si Cumple"
    else
        "No Cumple, Verificar"
s_3 = 30 cm  # Separación de Aceros de Temperatura (25 cm - 30 cm)
Verificación__Separación_3 = "Si Cumple"
# 08. Verificación por Corte
L_d/2 + d = 0.35 m  # Distancia a la que se Requiere el Cortante Máximo
V_ud := 2.24 tonnef  # Cortante Último a una Distancia "d"
V_c := 0.53*sqrt(f'_c*kgf/cm^2)*b*d
V_u := V_ud*P/sqrt(P^2 + CP^2) = 1.83508 tonnef
Verificación__Cortante :=
    if ϕ_Corte*V_c ≥ V_u
        "Si Cumple"
    else
        "No Cumple, Verificar"
V_u = 1.83508 tonnef  # Cortante Último a una Distancia "d" No Inclinado
V_c = 9.21652 tonnef  # Cortante Nominal Resistente del Concreto
ϕ_Corte*V_c = 7.83404 tonnef  # Cortante Nominal Resistente Reducido del Concreto
Verificación__Cortante = "Si Cumple"
# 09. Detalles de Refuerzo de la Escalera
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L_i := 2.00 m  # Longitud Inclinada de Extremo a Extremo de la Escalera
L_i/3 = 0.666667 m  # Longitud del Refuerzo / Acero Superior en Cada Extremo
