# Worksheet setting: ORIGIN = 1
# DISEÑO DE LOSAS ALIGERADAS O NERVADAS ACI 318-19
# Dimensiones
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# Espaciamiento de viguetas
b_w := 40 cm
# Ancho de las viguetas
b := 10 cm
# Altura de la losa superior
h_losa := 5 cm
# Altura total
h := 20 cm
# Recubrimiento
r := 3 cm
# Peralte efectivo
d := h - r = 17 cm
# Materiales
# Resistencia a compresión  del concreto
f'_c := 21 MPa
# Factor de modificación por concreto liviano
λ := 1
# Modulo de elasticidad del concreto
E_c := 4700*sqrt(f'_c*MPa) = 21538.1 MPa
# Peso específico del concreto reforzado
γ_c := 24 kN/m^3
# Límite de fluencia del acero
f_y := 420 MPa
# Modulo de elasticidad del acero
E_s := 200 GPa
# Número de tramos y Cargas actuantes
# Cargas Distribuidas | Cargas Puntuales
table  # each column defines a variable
    tramo | longitud (m) | C.Muerta (kPa) | C.Viva (kPa)
    1 | 5 | 2 | 2
    2 | 3 | 2 | 2
    3 | 4 | 2 | 2
    4 | 4 | 2 | 2
    5 | 4 | 2 | 2
end table
table  # each column defines a variable
    tramop | distancia (m) | carga.p (kN)
    1 | 2 | 2
    2 | 2 | 2
end table
# Factores de mayoración de carga
# Para la carga muerta
cm1 := 1.4
cm2 := 1.2
# Para la carga viva
cv := 1.6
# Apoyos Extremos
# Apoyo extremo izquierdo
ext.izq := 2
# Apoyo extremo derecho
ext.der := 2
# Unidades de los gráficos
u := kN
# Gráficos
tram :=
    if tramo == 1
        tramo ← [1]
    else
        tramo
long :=
    if tramo == 1
        l ← [longitud]
    else
        longitud
C.M :=
    if tramo == 1
        [C.Muerta]
    else
        C.Muerta
C.V :=
    if tramo == 1
        [C.Viva]
    else
        C.Viva
tramp :=
    if tramop == 1 or tramop == 0
        [1]
    else
        tramop
dist :=
    if tramop == 1 or tramop == 0
        [distancia]
    else
        distancia
c.p :=
    if tramop == 1 or tramop == 0
        [carga.p]
    else
        carga.p
# Tramos de la losa
X :=
    a ← last(tram)
    x[1] ← 0 m
    for i ∈ 2 .. (a + 1)
        x[i] ← x[i - 1] + long[i - 1]
    x
Y :=
    a ← last(tram)
    for i ∈ 1 .. (a + 1)
        x[i] ← 0
    x
# Apoyos de la losa
dery :=
    a ← max(C.V)*1 m^2
    b ← max(C.M)*1 m^2
    c ← max(carga.p)
    d ← max(a, b)*0.1
    if ext.der == 3
        x ← 0 kN
    else if ext.der == 2
        for j ∈ 1 .. 3
            x[j] ← -|mod(j, 2)|*d
        x[4] ← x[1]
    else if ext.der == 1
        x[1] ← 0 kN
        x[2] ← 0 kN
        x[3] ← -d
        x[4] ← -d
        x[5] ← -0 kN
    x
derx :=
    a ← min(long)/8
    b ← max(X)
    if ext.der == 3
        x ← 0 m
    else if ext.der == 2
        for j ∈ 1 .. 3
            x[j] ← b + (j - 2)*a
        x[4] ← x[1]
    else if ext.der == 1
        x[1] ← -a + b
        x[2] ← a + b
        x[3] ← a + b
        x[4] ← -a + b
        x[5] ← -a + b
    x
izqy :=
    a ← max(C.V)*1 m^2
    b ← max(C.M)*1 m^2
    c ← max(carga.p)
    d ← max(a, b)*0.1
    if ext.izq == 3
        x ← 0 kN
    else if ext.izq == 2
        for j ∈ 1 .. 3
            x[j] ← -|mod(j, 2)|*d
        x[4] ← x[1]
    else if ext.izq == 1
        x[1] ← 0 kN
        x[2] ← 0 kN
        x[3] ← -d
        x[4] ← -d
        x[5] ← -0 kN
    x
apoyox :=
    if tramo == 1
        x ← [0]
    else
        for i ∈ 2 .. last(X) - 1
            for j ∈ 1 .. 3
                x[j, i] ← X[i] + (j - 2)*min(long)/8
            x[4, i] ← x[1, i]
    x
izqx :=
    a ← min(long)/8
    if ext.izq == 3
        x ← 0 m
    else if ext.izq == 2
        for j ∈ 1 .. 3
            x[j] ← (j - 2)*a
        x[4] ← x[1]
    else if ext.izq == 1
        x[1] ← -a
        x[2] ← a
        x[3] ← a
        x[4] ← -a
        x[5] ← -a
    x
apoyoy :=
    a ← max(C.V)*1 m^2
    b ← max(C.M)*1 m^2
    c ← max(carga.p)
    d ← max(a, b)*0.1
    if tramo == 1
        x ← [0]
    else
        for i ∈ 2 .. last(X) - 1
            for j ∈ 1 .. 3
                x[j, i] ← -|mod(j, 2)|*d
                0
            x[4, i] ← x[1, i]
    x
# Cargas
carga.puntualx :=
    x1 ← 0.2 m
    for i ∈ 1 .. last(tramp)
        xp[i] ← X[tramp[i]] + dist[i]
        x[1, i] ← xp[i]
        x[2, i] ← xp[i]
        x[3, i] ← xp[i] + x1
        x[4, i] ← xp[i] - x1
        x[5, i] ← xp[i]
    x
carga.puntualy :=
    y1 ← .2 kN
    for i ∈ 1 .. last(tramp)
        c[i] ← c.p[i]
        x[1, i] ← c[i]
        x[2, i] ← 0 kN
        x[3, i] ← 0 kN + y1
        x[4, i] ← 0 kN + y1
        x[5, i] ← 0 kN
    x
muerta.distribuidax :=
    x1 ← 0.2 m
    n ← 8
    y[5, 1] ← 0 m
    for j ∈ 1 .. last(tram)
        x0[j] ← X[j]
        a[j] ← C.M[j]
        d[j] ← long[j]
        for i ∈ 1 .. n + 1
            if a[j] == 0
                x[1, i] ← 0 cm
                x[2, i] ← 0 cm
                x[3, i] ← 0 cm
                x[4, i] ← 0 cm
                x[5, i] ← 0 cm
            else
                xp[i] ← x0[j] + (i - 1)*d[j]/n
                x[1, i] ← xp[i]
                x[2, i] ← xp[i]
                x[3, i] ← xp[i] + x1
                x[4, i] ← xp[i] - x1
                x[5, i] ← xp[i]
        for i ∈ 1 .. 5
            if a[j] == 0
                x[i, n + 2] ← 0 m
            else
                x[i, n + 2] ← x0[j] + (i - 1)*d[j]/4
        y ← augment(y, x)
    y
viva.distribuidax :=
    x1 ← 0.2 m
    n ← 8
    y[5, 1] ← 0 m
    for j ∈ 1 .. last(tram)
        x0[j] ← X[j]
        a[j] ← C.V[j]
        d[j] ← long[j]
        for i ∈ 1 .. n + 1
            if a[j] == 0
                x[1, i] ← 0 cm
                x[2, i] ← 0 cm
                x[3, i] ← 0 cm
                x[4, i] ← 0 cm
                x[5, i] ← 0 cm
            else
                xp[i] ← x0[j] + (i - 1)*d[j]/n
                x[1, i] ← xp[i]
                x[2, i] ← xp[i]
                x[3, i] ← xp[i] + x1
                x[4, i] ← xp[i] - x1
                x[5, i] ← xp[i]
        for i ∈ 1 .. 5
            if a[j] == 0
                x[i, n + 2] ← 0 m
            else
                x[i, n + 2] ← x0[j] + (i - 1)*d[j]/4
        y ← augment(y, x)
    y
muerta.distribuiday :=
    y1 ← .3 kPa*b_w
    n ← 8
    y[5, 1] ← 0 kPa*b_w
    for j ∈ 1 .. last(tram)
        a[j] ← C.M[j]*b_w
        for i ∈ 1 .. n + 1
            if a[j] == 0
                x[1, i] ← 0 kN/m
                x[2, i] ← 0 kN/m
                x[3, i] ← 0 kN/m
                x[4, i] ← 0 kN/m
                x[5, i] ← 0 kN/m
            else
                x[1, i] ← a[j]
                x[2, i] ← 0 kN/m
                x[3, i] ← 0 kN/m + y1
                x[4, i] ← 0 kN/m + y1
                x[5, i] ← 0 kN/m
        for i ∈ 1 .. 5
            x[i, n + 2] ← a[j]
        y ← augment(y, x)
    y
viva.distribuiday :=
    y1 ← .3 kPa*b_w
    n ← 8
    y[5, 1] ← 0 kPa*b_w
    for j ∈ 1 .. last(tram)
        a[j] ← C.V[j]*b_w
        for i ∈ 1 .. n + 1
            if a[j] == 0
                x[1, i] ← 0 kN/m
                x[2, i] ← 0 kN/m
                x[3, i] ← 0 kN/m
                x[4, i] ← 0 kN/m
                x[5, i] ← 0 kN/m
            else
                x[1, i] ← a[j]
                x[2, i] ← 0 kN/m
                x[3, i] ← 0 kN/m + y1
                x[4, i] ← 0 kN/m + y1
                x[5, i] ← 0 kN/m
        for i ∈ 1 .. 5
            x[i, n + 2] ← a[j]
        y ← augment(y, x)
    y
# Bordes
bordex := [X[1] - min(long)/6; X[last(X)] + min(long)/6] = [-0.5; 20.5] m
bordey2 :=
    g ← C.M*b_w*m
    x ← max(g, c.p)*1.01
    [-0.2*x; x]
bordey3 :=
    g ← C.V*b_w
    x ← max(g)*1.01
    [-0.25*x; x]
    = [-0.202; 0.808] kN/m
# [chart]
    X[1] := X
    Y[1] := Y
    Y[7] := izqy/u
    X[2] := apoyox
    X[7] := izqx
    Y[2] := apoyoy/u
    X[8] := derx
    Y[8] := dery/u
    X[3] := carga.puntualx
    Y[3] := carga.puntualy/u
    Y[4] := muerta.distribuiday*m/u
    X[4] := muerta.distribuidax
    X[6] := bordex
    Y[6] := bordey2/u
# Fig 1. Disposición de la carga muerta.
# [chart]
    Y[7] := izqy/u
    X[1] := X
    X[7] := izqx
    Y[1] := Y
    Y[8] := dery/u
    X[2] := apoyox
    X[8] := derx
    Y[2] := apoyoy/u
    X[4] := viva.distribuidax
    Y[4] := viva.distribuiday*m/u
    X[6] := bordex
    Y[6] := bordey3/u
# Fig 2. Disposición de la carga viva.
# ANALISIS ESTRUCTURAL
# COORDENADA X DE LOS PUNTOS PARA EL ANALISIS
carga.puntualx :=
    x1 ← 0.2 m
    for i ∈ 1 .. last(tramp)
        xp[i] ← X[tramp[i]] + dist[i]
    xp
posicion.x :=
    L ← sort(stack(X, carga.puntualx))
    A[1] ← 0 m
    a ← 1
    for i ∈ 2 .. last(L)
        if L[i] == L[i - 1]
            continue
        else
            a ← a + 1
            A[a] ← L[i]
    A
    = [0; 2; 5; 7; 8; 12; 16; 20] m
longitud.tramo :=
    for i ∈ 1 .. (last(posicion.x) - 1)
        l[i] ← posicion.x[i + 1] - posicion.x[i]
    l
    = [2; 3; 2; 1; 4; 4; 4] m
# CARGAS
peso.propio := (b_w*h_losa + b*(h - h_losa))*γ_c
CargaMuerta := stack(0, C.M*b_w + peso.propio)
CargaViva1 := stack(0, C.V*b_w)
CargaViva5 :=
    for i ∈ 1 .. last(C.V)
        if mod(i, 3) == 0 or mod(i, 3) == 2
            C[i] ← C.V[i]*b_w
        else
            C[i] ← 0 kN/m
    stack(0, C)
CargaViva2 :=
    for i ∈ 1 .. last(C.V)
        if mod(i, 2) == 1
            C[i] ← C.V[i]*b_w
        else
            C[i] ← 0 kN/m
    stack(0, C)
CargaViva3 :=
    for i ∈ 1 .. last(C.V)
        if mod(i, 2) == 0
            C[i] ← C.V[i]*b_w
        else
            C[i] ← 0 kN/m
    stack(0, C)
CargaViva4 :=
    for i ∈ 1 .. last(C.V)
        if mod(i, 3) == 1 or mod(i, 3) == 2
            C[i] ← C.V[i]*b_w
        else
            C[i] ← 0 kN/m
    stack(0, C)
Carga.distribuida1 :=
    a ← 1
    for i ∈ 1 .. last(posicion.x)
        for j ∈ 1 .. last(X)
            if posicion.x[i] ≤ X[a]
                c[i] ← CargaMuerta[a]
                continue
            else
                a ← a + 1
    c[i + 1] ← 0 kN/m
    c
Carga.distribuida2 :=
    a ← 1
    for i ∈ 1 .. last(posicion.x)
        for j ∈ 1 .. last(X)
            if posicion.x[i] ≤ X[a]
                c[i] ← CargaViva1[a]
                continue
            else
                a ← a + 1
    c[i + 1] ← 0 kN/m
    c
Carga.distribuida3 :=
    a ← 1
    for i ∈ 1 .. last(posicion.x)
        for j ∈ 1 .. last(X)
            if posicion.x[i] ≤ X[a]
                c[i] ← CargaViva2[a]
                continue
            else
                a ← a + 1
    c[i + 1] ← 0 kN/m
    c
Carga.distribuida4 :=
    a ← 1
    for i ∈ 1 .. last(posicion.x)
        for j ∈ 1 .. last(X)
            if posicion.x[i] ≤ X[a]
                c[i] ← CargaViva3[a]
                continue
            else
                a ← a + 1
    c[i + 1] ← 0 kN/m
    c
Carga.distribuida5 :=
    a ← 1
    for i ∈ 1 .. last(posicion.x)
        for j ∈ 1 .. last(X)
            if posicion.x[i] ≤ X[a]
                c[i] ← CargaViva4[a]
                continue
            else
                a ← a + 1
    c[i + 1] ← 0 kN/m
    c
Carga.distribuida6 :=
    a ← 1
    for i ∈ 1 .. last(posicion.x)
        for j ∈ 1 .. last(X)
            if posicion.x[i] ≤ X[a]
                c[i] ← CargaViva5[a]
                continue
            else
                a ← a + 1
    c[i + 1] ← 0 kN/m
    c
# MATRIX DE GRADOS DE LIBERTAD | VECTOR FUERZAS
g.libertad :=
    x ← last(posicion.x)
    n ← x*2
    for i ∈ 2 .. x - 1
        for j ∈ 1 .. last(X)
            if posicion.x[i] == X[j]
                g[2*i - 1] ← 0
                g[2*i] ← 1
                break
            else
                g[2*i - 1] ← 1
                g[2*i] ← 1
    if ext.izq == 1
        g[1] ← 0
        g[2] ← 0
    else if ext.izq == 2
        g[1] ← 0
        g[2] ← 1
    else
        g[1] ← 1
        g[2] ← 1
    if ext.der == 1
        g[n] ← 0
        g[n - 1] ← 0
    else if ext.der == 2
        g[n] ← 1
        g[n - 1] ← 0
    else
        g[n] ← 1
        g[n - 1] ← 1
    g
Fuerzas.nud :=
    g ← last(g.libertad)
    p[g] ← 0
    for i ∈ 1 .. last(carga.puntualx)
        for j ∈ 1 .. last(posicion.x)
            if carga.puntualx[i] == posicion.x[j]
                p[2*j - 1] ← -c.p[i]/kN
                break
            else
                continue
    p
Fuerzas.emp1 :=
    w ← Carga.distribuida1
    l ← stack(0 m, longitud.tramo, 0 m)
    g ← last(g.libertad)
    for i ∈ 1 .. last(posicion.x)
        f[2*i - 1] ← -((w[i]*l[i] + w[i + 1]*l[i + 1])/2)*1/kN
        f[2*i] ← ((w[i]*l[i]^2 - w[i + 1]*l[i + 1]^2)/12)*1/(kN*m)
    f
Fuerzas.emp2 :=
    w ← Carga.distribuida2
    l ← stack(0 m, longitud.tramo, 0 m)
    g ← last(g.libertad)
    for i ∈ 1 .. last(posicion.x)
        f[2*i - 1] ← -((w[i]*l[i] + w[i + 1]*l[i + 1])/2)*1/kN
        f[2*i] ← ((w[i]*l[i]^2 - w[i + 1]*l[i + 1]^2)/12)*1/(kN*m)
    f
Fuerzas.emp5 :=
    w ← Carga.distribuida5
    l ← stack(0 m, longitud.tramo, 0 m)
    g ← last(g.libertad)
    for i ∈ 1 .. last(posicion.x)
        f[2*i - 1] ← -((w[i]*l[i] + w[i + 1]*l[i + 1])/2)*1/kN
        f[2*i] ← ((w[i]*l[i]^2 - w[i + 1]*l[i + 1]^2)/12)*1/(kN*m)
    f
Fuerzas.emp4 :=
    w ← Carga.distribuida4
    l ← stack(0 m, longitud.tramo, 0 m)
    g ← last(g.libertad)
    for i ∈ 1 .. last(posicion.x)
        f[2*i - 1] ← -((w[i]*l[i] + w[i + 1]*l[i + 1])/2)*1/kN
        f[2*i] ← ((w[i]*l[i]^2 - w[i + 1]*l[i + 1]^2)/12)*1/(kN*m)
    f
Fuerzas.emp3 :=
    w ← Carga.distribuida3
    l ← stack(0 m, longitud.tramo, 0 m)
    g ← last(g.libertad)
    for i ∈ 1 .. last(posicion.x)
        f[2*i - 1] ← -((w[i]*l[i] + w[i + 1]*l[i + 1])/2)*1/kN
        f[2*i] ← ((w[i]*l[i]^2 - w[i + 1]*l[i + 1]^2)/12)*1/(kN*m)
    f
Fuerzas.emp6 :=
    w ← Carga.distribuida6
    l ← stack(0 m, longitud.tramo, 0 m)
    g ← last(g.libertad)
    for i ∈ 1 .. last(posicion.x)
        f[2*i - 1] ← -((w[i]*l[i] + w[i + 1]*l[i + 1])/2)*1/kN
        f[2*i] ← ((w[i]*l[i]^2 - w[i + 1]*l[i + 1]^2)/12)*1/(kN*m)
    f
F1 :=
    for i ∈ 1 .. last(Fuerzas.nud)
        f[i] ← Fuerzas.nud[i] + Fuerzas.emp1[i]
    f
F2 :=
    for i ∈ 1 .. last(Fuerzas.nud)
        f[i] ← Fuerzas.emp2[i]
    f
F3 :=
    for i ∈ 1 .. last(Fuerzas.nud)
        f[i] ← Fuerzas.emp3[i]
    f
F4 :=
    for i ∈ 1 .. last(Fuerzas.nud)
        f[i] ← Fuerzas.emp4[i]
    f
F5 :=
    for i ∈ 1 .. last(Fuerzas.nud)
        f[i] ← Fuerzas.emp5[i]
    f
F6 :=
    for i ∈ 1 .. last(Fuerzas.nud)
        f[i] ← Fuerzas.emp6[i]
    f
# Matrix de rigidez global
K :=
    gl ← last(g.libertad)
    a ← gl/2 - 1
    ke[gl, gl] ← 0
    for i ∈ 1 .. last(longitud.tramo)
        l ← longitud.tramo[i]*1/m
        ke ← ke*0
        k1 ← 12/l^3
        k2 ← 6/l^2
        k3 ← 4/l
        p ← 1 + (i - 1)*2
        ke[p, p] ← k1
        ke[p, p + 1] ← k2
        ke[p, p + 2] ← -k1
        ke[p, p + 3] ← k2
        ke[p + 1, p] ← k2
        ke[p + 1, p + 1] ← k3
        ke[p + 1, p + 2] ← -k2
        ke[p + 1, p + 3] ← k3*0.5
        ke[p + 2, p] ← -k1
        ke[p + 2, p + 1] ← -k2
        ke[p + 2, p + 2] ← k1
        ke[p + 2, p + 3] ← -k2
        ke[p + 3, p] ← k2
        ke[p + 3, p + 1] ← k3*0.5
        ke[p + 3, p + 2] ← -k2
        ke[p + 3, p + 3] ← k3
        K[i] ← ke
    K ← sum(K[i], i = 1 .. a)
# Matriz de Condiciones de Borde
CB :=
    n ← last(g.libertad)
    g[n, n] ← 0
    a ← 0
    for i ∈ 1 .. n
        if g.libertad[i] == 0
            continue
        else
            g[i, i] ← 1
    for i ∈ 1 .. n
        if sum(g[i, :]) == 0
            continue
        else
            a ← a + 1
            C[a, :] ← g[i, :]
    C
# MATRIX DE RIGIDEZ REDUCIDA
Kred := CB*K*transpose(CB)
# MATRIX DE FUERZAS REDUCIDAS
Fred1 := CB*F1
Fred2 := CB*F2
Fred3 := CB*F3
Fred4 := CB*F4
Fred5 := CB*F5
Fred6 := CB*F6
# MATRIX DE DESPLAZAMIENTOS
u1 := Kred^-1*Fred1
u4 := Kred^-1*Fred4
U1 := transpose(CB)*u1
U4 := transpose(CB)*u4
u2 := Kred^-1*Fred2
u5 := Kred^-1*Fred5
U2 := transpose(CB)*u2
U5 := transpose(CB)*u5
u3 := Kred^-1*Fred3
u6 := Kred^-1*Fred6
U3 := transpose(CB)*u3
U6 := transpose(CB)*u6
# MATRIX DE REACCIONES
Reacciones1 := K*U1 - F1
Reacciones4 := K*U4 - F4
Reacciones2 := K*U2 - F2
Reacciones5 := K*U5 - F5
Reacciones3 := K*U3 - F3
Reacciones6 := K*U6 - F6
# COEFICIENTES PARA LA ECUACION DE LA ELASTICA DE LA VIGA
C3 :=
    B[4] ← 0
    U ← U3
    for i ∈ 1 .. last(longitud.tramo)
        l ← longitud.tramo/m
        w ← Carga.distribuida3*m/kN
        D ← [U[2*i - 1]; U[2*i]; U[2*i + 1] + w[i + 1]*l[i]^4/24; U[2*i + 2] + w[i + 1]*l[i]^3/6]
        H ← [0, 0, 0, 1; 0, 0, 1, 0; l[i]^3/6, l[i]^2/2, l[i], 1; l[i]^2/2, l[i], 1, 0]
        A ← H^-1*D
        B ← augment(B, A)
    B
C4 :=
    B[4] ← 0
    U ← U4
    for i ∈ 1 .. last(longitud.tramo)
        l ← longitud.tramo/m
        w ← Carga.distribuida4*m/kN
        D ← [U[2*i - 1]; U[2*i]; U[2*i + 1] + w[i + 1]*l[i]^4/24; U[2*i + 2] + w[i + 1]*l[i]^3/6]
        H ← [0, 0, 0, 1; 0, 0, 1, 0; l[i]^3/6, l[i]^2/2, l[i], 1; l[i]^2/2, l[i], 1, 0]
        A ← H^-1*D
        B ← augment(B, A)
    B
C5 :=
    B[4] ← 0
    U ← U5
    for i ∈ 1 .. last(longitud.tramo)
        l ← longitud.tramo/m
        w ← Carga.distribuida5*m/kN
        D ← [U[2*i - 1]; U[2*i]; U[2*i + 1] + w[i + 1]*l[i]^4/24; U[2*i + 2] + w[i + 1]*l[i]^3/6]
        H ← [0, 0, 0, 1; 0, 0, 1, 0; l[i]^3/6, l[i]^2/2, l[i], 1; l[i]^2/2, l[i], 1, 0]
        A ← H^-1*D
        B ← augment(B, A)
    B
C6 :=
    B[4] ← 0
    U ← U6
    for i ∈ 1 .. last(longitud.tramo)
        l ← longitud.tramo/m
        w ← Carga.distribuida6*m/kN
        D ← [U[2*i - 1]; U[2*i]; U[2*i + 1] + w[i + 1]*l[i]^4/24; U[2*i + 2] + w[i + 1]*l[i]^3/6]
        H ← [0, 0, 0, 1; 0, 0, 1, 0; l[i]^3/6, l[i]^2/2, l[i], 1; l[i]^2/2, l[i], 1, 0]
        A ← H^-1*D
        B ← augment(B, A)
    B
C1 :=
    B[4] ← 0
    U ← U1
    for i ∈ 1 .. last(longitud.tramo)
        l ← longitud.tramo/m
        w ← Carga.distribuida1*m/kN
        D ← [U[2*i - 1]; U[2*i]; U[2*i + 1] + w[i + 1]*l[i]^4/24; U[2*i + 2] + w[i + 1]*l[i]^3/6]
        H ← [0, 0, 0, 1; 0, 0, 1, 0; l[i]^3/6, l[i]^2/2, l[i], 1; l[i]^2/2, l[i], 1, 0]
        A ← H^-1*D
        B ← augment(B, A)
    B
C2 :=
    B[4] ← 0
    U ← U2
    for i ∈ 1 .. last(longitud.tramo)
        l ← longitud.tramo/m
        w ← Carga.distribuida2*m/kN
        D ← [U[2*i - 1]; U[2*i]; U[2*i + 1] + w[i + 1]*l[i]^4/24; U[2*i + 2] + w[i + 1]*l[i]^3/6]
        H ← [0, 0, 0, 1; 0, 0, 1, 0; l[i]^3/6, l[i]^2/2, l[i], 1; l[i]^2/2, l[i], 1, 0]
        A ← H^-1*D
        B ← augment(B, A)
    B
# PUNTOS PARA LOS DIAGRAMAS
Xdiagramas :=
    n ← 200
    p ← posicion.x/cm
    l ← longitud.tramo/cm
    for i ∈ 1 .. last(p) - 1
        for j ∈ 1 .. (n + 1)
            X[j] ← p[i] + (j - 1)*l[i]/n
        A ← stack(A, X)
    a ← last(A) + 1
    A[a] ← max(A)
    A
# CORTE
V2 :=
    n ← 200
    l ← longitud.tramo/cm
    A ← [0]
    C ← C2
    for i ∈ 1 .. last(l)
        w ← Carga.distribuida2[i + 1]*cm/kN
        l ← longitud.tramo[i]/cm
        for j ∈ 1 .. (n + 1)
            u ← last(A)
            V[j] ← C[1, i + 1] - w*(j - 1)*l/n
        A ← stack(A, V)
    a ← last(A) + 1
    A[a] ← 0
    A
V3 :=
    n ← 200
    l ← longitud.tramo/cm
    A ← [0]
    C ← C3
    for i ∈ 1 .. last(l)
        w ← Carga.distribuida3[i + 1]*cm/kN
        l ← longitud.tramo[i]/cm
        for j ∈ 1 .. (n + 1)
            u ← last(A)
            V[j] ← C[1, i + 1] - w*(j - 1)*l/n
        A ← stack(A, V)
    a ← last(A) + 1
    A[a] ← 0
    A
V1 :=
    n ← 200
    l ← longitud.tramo/cm
    A ← [0]
    C ← C1
    for i ∈ 1 .. last(l)
        w ← Carga.distribuida1[i + 1]*cm/kN
        l ← longitud.tramo[i]/cm
        for j ∈ 1 .. (n + 1)
            u ← last(A)
            V[j] ← C[1, i + 1] - w*(j - 1)*l/n
        A ← stack(A, V)
    a ← last(A) + 1
    A[a] ← 0
    A
V6 :=
    n ← 200
    l ← longitud.tramo/cm
    A ← [0]
    C ← C6
    for i ∈ 1 .. last(l)
        w ← Carga.distribuida6[i + 1]*cm/kN
        l ← longitud.tramo[i]/cm
        for j ∈ 1 .. (n + 1)
            u ← last(A)
            V[j] ← C[1, i + 1] - w*(j - 1)*l/n
        A ← stack(A, V)
    a ← last(A) + 1
    A[a] ← 0
    A
V4 :=
    n ← 200
    l ← longitud.tramo/cm
    C ← C4
    A ← [0]
    for i ∈ 1 .. last(l)
        w ← Carga.distribuida4[i + 1]*cm/kN
        l ← longitud.tramo[i]/cm
        for j ∈ 1 .. (n + 1)
            u ← last(A)
            V[j] ← C[1, i + 1] - w*(j - 1)*l/n
        A ← stack(A, V)
    a ← last(A) + 1
    A[a] ← 0
    A
V5 :=
    n ← 200
    l ← longitud.tramo/cm
    A ← [0]
    C ← C5
    for i ∈ 1 .. last(l)
        w ← Carga.distribuida5[i + 1]*cm/kN
        l ← longitud.tramo[i]/cm
        for j ∈ 1 .. (n + 1)
            u ← last(A)
            V[j] ← C[1, i + 1] - w*(j - 1)*l/n
        A ← stack(A, V)
    a ← last(A) + 1
    A[a] ← 0
    A
# MOMENTO
M1 :=
    n ← 200
    l ← longitud.tramo
    A ← [0]
    C ← C1
    for i ∈ 1 .. last(l)
        w ← Carga.distribuida1[i + 1]*m/kN
        l ← longitud.tramo[i]/m
        for j ∈ 1 .. (n + 1)
            x ← (j - 1)*l/n
            u ← last(A)
            M[j] ← 0.5*w*x^2 - C[1, i + 1]*x - C[2, i + 1]
        A ← stack(A, M)
    a ← last(A) + 1
    A[a] ← 0
    A
M2 :=
    n ← 200
    l ← longitud.tramo
    A ← [0]
    C ← C2
    for i ∈ 1 .. last(l)
        w ← Carga.distribuida2[i + 1]*m/kN
        l ← longitud.tramo[i]/m
        for j ∈ 1 .. (n + 1)
            x ← (j - 1)*l/n
            u ← last(A)
            M[j] ← 0.5*w*x^2 - C[1, i + 1]*x - C[2, i + 1]
        A ← stack(A, M)
    a ← last(A) + 1
    A[a] ← 0
    A
M3 :=
    n ← 200
    l ← longitud.tramo
    A ← [0]
    C ← C3
    for i ∈ 1 .. last(l)
        w ← Carga.distribuida3[i + 1]*m/kN
        l ← longitud.tramo[i]/m
        for j ∈ 1 .. (n + 1)
            x ← (j - 1)*l/n
            u ← last(A)
            M[j] ← 0.5*w*x^2 - C[1, i + 1]*x - C[2, i + 1]
        A ← stack(A, M)
    a ← last(A) + 1
    A[a] ← 0
    A
M4 :=
    n ← 200
    l ← longitud.tramo
    A ← [0]
    C ← C4
    for i ∈ 1 .. last(l)
        w ← Carga.distribuida4[i + 1]*m/kN
        l ← longitud.tramo[i]/m
        for j ∈ 1 .. (n + 1)
            x ← (j - 1)*l/n
            u ← last(A)
            M[j] ← 0.5*w*x^2 - C[1, i + 1]*x - C[2, i + 1]
        A ← stack(A, M)
    a ← last(A) + 1
    A[a] ← 0
    A
M5 :=
    n ← 200
    l ← longitud.tramo
    A ← [0]
    C ← C5
    for i ∈ 1 .. last(l)
        w ← Carga.distribuida5[i + 1]*m/kN
        l ← longitud.tramo[i]/m
        for j ∈ 1 .. (n + 1)
            x ← (j - 1)*l/n
            u ← last(A)
            M[j] ← 0.5*w*x^2 - C[1, i + 1]*x - C[2, i + 1]
        A ← stack(A, M)
    a ← last(A) + 1
    A[a] ← 0
    A
M6 :=
    n ← 200
    l ← longitud.tramo
    A ← [0]
    C ← C6
    for i ∈ 1 .. last(l)
        w ← Carga.distribuida6[i + 1]*m/kN
        l ← longitud.tramo[i]/m
        for j ∈ 1 .. (n + 1)
            x ← (j - 1)*l/n
            u ← last(A)
            M[j] ← 0.5*w*x^2 - C[1, i + 1]*x - C[2, i + 1]
        A ← stack(A, M)
    a ← last(A) + 1
    A[a] ← 0
    A
# DEFLEXION
Deflexion3 :=
    n ← 200
    l ← longitud.tramo
    A ← [0]
    C ← C3
    U ← U3
    for i ∈ 1 .. last(l)
        w ← Carga.distribuida3[i + 1]*m/kN
        l ← longitud.tramo[i]/m
        for j ∈ 1 .. (n + 1)
            x ← (j - 1)*l/n
            u ← last(A)
            Δ[j] ← -w*x^4/24 + C[1, i + 1]*x^3/6 + C[2, i + 1]*x^2/2 + C[3, i + 1]*x + C[4, i + 1] + A[u] - U[2*i - 1]
        A ← stack(A, Δ)
    A[1] ← A[2]
    A
Deflexion2 :=
    n ← 200
    l ← longitud.tramo
    A ← [0]
    C ← C2
    U ← U2
    for i ∈ 1 .. last(l)
        w ← Carga.distribuida2[i + 1]*m/kN
        l ← longitud.tramo[i]/m
        for j ∈ 1 .. (n + 1)
            x ← (j - 1)*l/n
            u ← last(A)
            Δ[j] ← -w*x^4/24 + C[1, i + 1]*x^3/6 + C[2, i + 1]*x^2/2 + C[3, i + 1]*x + C[4, i + 1] + A[u] - U[2*i - 1]
        A ← stack(A, Δ)
    A[1] ← A[2]
    A
Deflexion1 :=
    n ← 200
    l ← longitud.tramo
    A ← [0]
    C ← C1
    U ← U1
    for i ∈ 1 .. last(l)
        w ← Carga.distribuida1[i + 1]*m/kN
        l ← longitud.tramo[i]/m
        for j ∈ 1 .. (n + 1)
            x ← (j - 1)*l/n
            u ← last(A)
            Δ[j] ← -w*x^4/24 + C[1, i + 1]*x^3/6 + C[2, i + 1]*x^2/2 + C[3, i + 1]*x + C[4, i + 1] + A[u] - U[2*i - 1]
        A ← stack(A, Δ)
    A[1] ← A[2]
    A
Deflexion6 :=
    n ← 200
    l ← longitud.tramo
    A ← [0]
    C ← C6
    U ← U6
    for i ∈ 1 .. last(l)
        w ← Carga.distribuida6[i + 1]*m/kN
        l ← longitud.tramo[i]/m
        for j ∈ 1 .. (n + 1)
            x ← (j - 1)*l/n
            u ← last(A)
            Δ[j] ← -w*x^4/24 + C[1, i + 1]*x^3/6 + C[2, i + 1]*x^2/2 + C[3, i + 1]*x + C[4, i + 1] + A[u] - U[2*i - 1]
        A ← stack(A, Δ)
    A[1] ← A[2]
    A
Deflexion5 :=
    n ← 200
    l ← longitud.tramo
    A ← [0]
    C ← C5
    U ← U5
    for i ∈ 1 .. last(l)
        w ← Carga.distribuida5[i + 1]*m/kN
        l ← longitud.tramo[i]/m
        for j ∈ 1 .. (n + 1)
            x ← (j - 1)*l/n
            u ← last(A)
            Δ[j] ← -w*x^4/24 + C[1, i + 1]*x^3/6 + C[2, i + 1]*x^2/2 + C[3, i + 1]*x + C[4, i + 1] + A[u] - U[2*i - 1]
        A ← stack(A, Δ)
    A[1] ← A[2]
    A
Deflexion4 :=
    n ← 200
    l ← longitud.tramo
    A ← [0]
    C ← C4
    U ← U4
    for i ∈ 1 .. last(l)
        w ← Carga.distribuida4[i + 1]*m/kN
        l ← longitud.tramo[i]/m
        for j ∈ 1 .. (n + 1)
            x ← (j - 1)*l/n
            u ← last(A)
            Δ[j] ← -w*x^4/24 + C[1, i + 1]*x^3/6 + C[2, i + 1]*x^2/2 + C[3, i + 1]*x + C[4, i + 1] + A[u] - U[2*i - 1]
        A ← stack(A, Δ)
    A[1] ← A[2]
    A
# Combinaciones para el estado límite de resistencia última
cm1 = 1.4
cm2 = 1.2
cv = 1.6
# CORTANTE Y MOMENTO
# COMB 1: cm1*DL
Vcomb1 := cm1*V1
Mcomb1 := cm1*M1
# COMB 2: cm2*DL+cv*LL1
Vcomb2 := cm2*V1 + cv*V2
Mcomb2 := cm2*M1 + cv*M2
# COMB 3: cm2*DL+cv*LL2
Vcomb3 := cm2*V1 + cv*V3
Mcomb3 := cm2*M1 + cv*M3
# COMB 4: cm2*DL+cv*LL3
Vcomb4 := cm2*V1 + cv*V4
Mcomb4 := cm2*M1 + cv*M4
# COMB 5: cm2*DL+cv*LL4
Vcomb5 := cm2*V1 + cv*V5
Mcomb5 := cm2*M1 + cv*M5
# COMB 6: cm2*DL+cv*LL5
Vcomb6 := cm2*V1 + cv*V6
Mcomb6 := cm2*M1 + cv*M6
# ENVOLVENTE
Venv1 :=
    for i ∈ 1 .. last(Vcomb1)
        a ← max(Vcomb1[i], Vcomb2[i], Vcomb3[i], Vcomb4[i], Vcomb5[i], Vcomb6[i])
        V[i] ←
            if a ≤ 0
                0
            else
                a
    V
Venv2 :=
    for i ∈ 1 .. last(Vcomb1)
        a ← min(Vcomb1[i], Vcomb2[i], Vcomb3[i], Vcomb4[i], Vcomb5[i], Vcomb6[i])
        V[i] ←
            if a ≤ 0
                a
            else
                0
    V
Menv1 :=
    for i ∈ 1 .. last(Mcomb1)
        a ← max(Mcomb1[i], Mcomb2[i], Mcomb3[i], Mcomb4[i], Mcomb5[i], Mcomb6[i])
        M[i] ← a
    M
Menv2 :=
    for i ∈ 1 .. last(Mcomb1)
        a ← min(Mcomb1[i], Mcomb2[i], Mcomb3[i], Mcomb4[i], Mcomb5[i], Mcomb6[i])
        M[i] ← a
    M
Mdis1 :=
    for i ∈ 1 .. last(Mcomb1)
        a ← max(Mcomb1[i], Mcomb2[i], Mcomb3[i], Mcomb4[i], Mcomb5[i], Mcomb6[i])
        M[i] ←
            if a ≤ 0
                0
            else
                a
    M
Mdis2 :=
    for i ∈ 1 .. last(Mcomb1)
        a ← min(Mcomb1[i], Mcomb2[i], Mcomb3[i], Mcomb4[i], Mcomb5[i], Mcomb6[i])
        M[i] ←
            if a ≤ 0
                a
            else
                0
    M
# 1. ESTADO LIMITE DE RESISTENCIA ULTIMA
# 1.1 DISEÑO POR CORTE
# Factor de reducción de resistencia al corte
ϕ_c := 0.75
# Resistencia al corte de la sección (22.5.5)
V_c := 1.1*ϕ_c*0.17*λ*sqrt(f'_c*MPa)*b*d
V_c = 10.926 kN
# Resistencia al corte gráfico
Vres :=
    for i ∈ 1 .. last(X)
        a[i] ← V_c/kN
    a
# [chart]
    X[1] := Xdiagramas/100
    Y[1] := Venv1*kN/u
    Y[2] := Venv2*kN/u
    X[3] := X
    Y[3] := Y
    Y[4] := Vres*kN/u
    X[2] := Xdiagramas/100
    X[4] := X
    X[5] := X
    Y[5] := -Vres*kN/u
# [plot: Venv1*kN (kN), Venv2*kN (kN) vs Xdiagramas/100*m (m)]
# Fig 3. Envolvente de Fuerzas de Corte de Diseño
# 1.2 DISEÑO POR FLEXION
# [chart]
    X[1] := Xdiagramas/100
    X[3] := X
    Y[1] := Menv1*kN*m/u
    Y[3] := Y
    X[2] := Xdiagramas/100
    Y[2] := Menv2*kN*m/u
# [plot: Menv1*kN*m (kN), Menv2*kN*m (kN) vs Xdiagramas/100*m (cm)]
# Fig 4. Envolvente de Momentos de Diseño
A_s1 :=
    M ← Mdis1/0.9*kN*m
    for i ∈ 1 .. last(Mdis1)
        g ← 2 cm
        a ← 0 cm
        while |g - a| > 0.1 cm
            As ← M[i]/(f_y*(d - a))
            g ← As*f_y/(0.85*f'_c*b)
            a ← a + 0.1 mm
        A[i] ← As
    A
A_s2 :=
    M ← -Mdis2/0.9*kN*m
    for i ∈ 1 .. last(Mdis1)
        g ← 2 cm
        a ← 0 cm
        while |g - a| > 0.1 cm
            As ← M[i]/(f_y*(d - a))
            g ← As*f_y/(0.85*f'_c*b)
            a ← a + 0.1 mm
        A[i] ← As
    -A
# Refuerzo a flexión mínimo
A_smin :=
    d ← h - r
    f_y ← min(f_y, 550 MPa)
    a ← 0.25*sqrt(f'_c*MPa)/f_y*b*d
    b ← 1.4*MPa/f_y*b*d
    A_smin ← max(a, b)
    A_smin
    = 0.566667 cm^2
# Refuerzo a flexión máximo, cuando la sección deja de estar contralada por la flexión.
A_smax := 0.85*0.85*0.003/0.008*f'_c/f_y*b*d = 2.30297 cm^2
# Área de una varilla
A(x) := x^2/4*π
# [plot: A_s2 (cm^2), A_s1 (cm^2) vs Xdiagramas/100*m (m)]
# Áreas de acero de refuerzo requeridas por flexión (22.3)
# [chart]
    X[1] := X
    Y[1] := Y
    Y[9] := A_s1/cm^2
    X[9] := Xdiagramas/100
    Y[10] := A_s2/cm^2
    X[10] := Xdiagramas/100
# Fig 5. Áreas de refuerzo requeridas por flexión.
# Área de refuerzo a flexión mínima (9.6.1.2)
A_smin = 0.566667 cm^2
# Área de refuerzo a flexión máxima
A_smax = 2.30297 cm^2
# 2. ESTADO LIMITE DE SERVICIO
# 2.1 REFUERZO POR TEMPERATURA
# Espaciamiento del refuerzo
s := 30 cm
# Espaciamiento mínimo 24.4.3.3
s_min := min(5*h, 45 cm) = 0.45 m
# Diamero varilla de refuerzo por temperatura
d_bt := 6 mm
A(d_bt) = 0.282743 cm^2
# Área de acero por temperatura mínima 24.4.3.2
A_smin := 0.0018*s*h_losa = 0.27 cm^2
# 2.2 CONTROL DE DEFLEXIONES
# Área de refuerzo por momento positivo
A_s := 1.27 cm^2
# Factor dependiente del tiempo para cargas sostenidas (24.2.4.1.3)
ξ := 2
# Centroide de la seccion
Y_g := (b_w*h_losa*(h - h_losa/2) + b*(h - h_losa)*((h - h_losa)/2))/(b_w*h_losa + b*(h - h_losa)) = 0.132143 m
y_1 := h - h_losa = 0.15 m
# Inercia bruta de la seccion
I_g := b_w*h_losa^3/12 + b_w*h_losa*(h - h_losa/2 - Y_g)^2 + b*y_1^3/12 + b*y_1*(Y_g - (y_1/2))^2 = 11800.6 cm^4
# Momento de agrietamiento
f_r := 0.62*λ*sqrt(f'_c*MPa) = 2.8412 MPa
Mcr := 1.2*f_r*I_g/Y_g = 3.04469 kN*m
# Relación de módulos de elasticidad
n := E_s/E_c = 9.28587
# Inercia sección agrietada
C := b/(n*A_s)
f := h_losa*(b_w - b)/(n*A_s)
# Altura eje neutro
a := (sqrt(C*(2*d + h_losa*f) + (1 + f)^2) - (1 + f))/C = 3.23374 cm
I_cr := (b_w - b)*h_losa^3/12 + b*a^3/3 + (b_w - b)*h_losa*(a - h_losa/2)^2 + n*A_s*(d - a)^2 = 2740.87 cm^4
# Inercia Efectiva (24.2.3.5)
I_e(M) :=
    if M ≤ 2/3*Mcr
        I_g
    else
        I_cr/(1 - (2/3*Mcr/M)^2*(1 - I_cr/I_g))
# Deflexion debido a la carga muerta
# maximo momento positivo debido a la carga muerta sin mayoración
M_a1 := -min(M1)*kN*m = 5.31565 kN*m
δ_DL := Deflexion1*kN*m^3/(E_c*I_e(M_a1))
# Deflexion debido a la carga muerta + carga viva
# maximo momento positivo debido a la carga muerta + carga viva sin mayoración
M_ll := min(M1 + M2, M1 + M3, M1 + M4, M1 + M5, M1 + M6)
M_a2 := -M_ll*kN*m = 7.12431 kN*m
# Envolvente de deflexiones debido a las diferentes posiciones de la carga viva
Max.deflexion :=
    for i ∈ 1 .. last(Deflexion1)
        a ← min(Deflexion2[i], Deflexion3[i], Deflexion4[i], Deflexion5[i], Deflexion6[i])
        V[i] ← a
    V
# Deflexion inmediata debido a la carga viva
δ_DL.LL := (Deflexion1 + Max.deflexion)*kN*m^3/(E_c*I_e(M_a2))
δ_L := δ_DL.LL - δ_DL
# Deflexión debido a cargas sostenidas
ρ' := A_s/(h*b)
λ_Δ := ξ/(1 + 50*ρ')
δ_LT := δ_L + λ_Δ*δ_DL
# Deflexión Inmediata debido a la carga viva (24.2.3)
# [chart]
    X[1] := X
    X[7] := izqx
    Y[1] := Y
    Y[7] := izqy*3/u
    Y[8] := dery*3/u
    X[2] := apoyox
    X[8] := derx
    Y[2] := apoyoy*3/u
    Y[9] := δ_L/mm
    X[9] := Xdiagramas/100
    X[10] := 0
    Y[10] := 1
# [plot: δ_LT (mm) vs Xdiagramas]
# Deflexión dependiente del tiempo (24.2.4)
# [chart]
    X[1] := X
    X[7] := izqx
    Y[1] := Y
    Y[7] := izqy*8/u
    Y[8] := dery*8/u
    X[2] := apoyox
    X[8] := derx
    Y[2] := apoyoy*8/u
    Y[9] := δ_LT/mm
    X[9] := Xdiagramas/100
    X[10] := 0
    Y[10] := 1
