# Diseño de Losas Macizas Armadas en 01 Dirección
# Método en Base a la Norma E.060
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# 01. Datos Pre-Liminares / De Entrada
# 01.01. Propiedades Geométricas de la Sección
h_losa := 0.20 m  # Peralte Total (Espesor) de la Losa Maciza
b_losa := 1.00 m  # Ancho Efectivo de la Losa Maciza
l_larga := 6.00 m  # Dimensión más Larga de la Losa Maciza
l_corta := 2.75 m  # Dimensión más Corta de la Losa Maciza
r := 0.03 m  # Recubrimiento Mínimo para la Losa Maciza
d := h_losa - r = 0.17 m  # Peralte Efectivo de la Losa Maciza
# 01.02. Propiedades Mecánicas de los Materiales
f'_c := 210 kgf/cm^2  # Resistencia a la Compresión del Concreto
E_c := 15000*sqrt(f'_c*kgf/cm^2)
β_1 :=
    if 170*kgf/cm^2 ≤ f'_c ≤ 280*kgf/cm^2
        0.85
    else if f'_c ≤ 350*kgf/cm^2
        0.80
    else if f'_c ≤ 420*kgf/cm^2
        0.75
    else if f'_c ≤ 490*kgf/cm^2
        0.70
    else if f'_c > 490*kgf/cm^2
        0.65
    = 0.85
E_c = 217371 kgf/cm^2  # Módulo de Elasticidad del Concreto
f_y := 4200 kgf/cm^2  # Esfuerzo Cedente del Acero Corrugado
E_s := 2.1*10^6 kgf/cm^2  # Módulo de Elasticidad del Acero Corrugado
ε_c := 0.003  # Deformación Unitaria del Concreto a Compresión
ε_sy := 0.0021  # Deformación Unitaria del Acero a Fluencia
β_1 = 0.85  # Factor de Relación de Profundidad del Bloque Rectangular Equivalente de Esfuerzos de Compresión
ϕ_Flexión := 0.90  # Factor de Reducción por Capacidad a Flexión
ϕ_Corte := 0.85  # Factor de Reducción por Capacidad a Corte
# 01.03. Momentos y Cortantes Actuantes en la Losa
M_u := 1.975 tonnef*m  # Momento Actuante sobre la Sección
V_u := 6.60 tonnef  # Cortante Actuante sobre la Sección
# 02. Verificación del Comportamiento de la Losa
l_larga/l_corta = 2.18182  # Relación entre Dimensiones de la Losa Maciza
Dirección__Análisis :=
    if l_larga/l_corta ≤ 2
        "Trabaja en 02 Direcciones"
    else
        "Trabaja en 01 Dirección"
Dirección__Análisis = "Trabaja en 01 Dirección"
# 03. Verificación por Corte
V_c := 1.10*0.53*sqrt(f'_c*kgf/cm^2)*b_losa*d
Verificación__Resistencia_al_Corte :=
    if ϕ_Corte*V_c ≥ V_u
        "Si Cumple"
    else
        "Se Requiere Ensanche de Vigueta"
V_c = 14.3624 tonnef  # Resistencia Nominal al Corte por el Concreto
ϕ_Corte*V_c = 12.208 tonnef  # Resistencia Nominal al Corte Reducida
Verificación__Resistencia_al_Corte = "Si Cumple"
# 04. Refuerzo Mínimo en Elementos Sometidos a Flexión (Artículo 10.5.)
ρ_mín_1 := 0.70*sqrt(f'_c*kgf/cm^2)/f_y
ρ_mín_2 := 0.0018
ρ_mín := max(ρ_mín_1, ρ_mín_2)
As_mín := ρ_mín*b_losa*d
ρ_mín_1 = 0.00241523  # Cuantía Mínima 01 de Refuerzo a Tracción
ρ_mín_2 = 0.0018  # Cuantía Mínima 02 de Refuerzo a Tracción
ρ_mín = 0.00241523  # Cuantía Mínima de Refuerzo a Tracción
As_mín = 4.10589 cm^2  # Acero Mínimo por Tracción
# 05. Refuerzo por Contracción de Fragua - Acero de Temperatura
# 05.01. Cálculo del Refuerzo Requerido
b_t := 1.00 m  # Ancho Efectivo para el Refuerzo por Temperatura
As_Temperatura := 0.0018*b_t*h_losa
As_Temperatura = 3.6 cm^2  # Acero Requerido por Contracción de Fragua
# 05.02. Acero a Colocar
ϕ_db_1 := (1/4) in
A_db_1 := π*ϕ_db_1^2/4 = 0.316692 cm^2
# 05.03. Separación Máxima
s_t_req := Ceil(1.00 m*A_db_1/As_Temperatura, 0.05 m)
s_máx := min(3*h_losa, 40 cm)
s_t := Ceil(min(s_t_req, s_máx), 0.05 m)
s_t_req = 10 cm  # Espaciamiento Requerido por Temperatura
s_máx = 40 cm  # Espaciamiento Máximo según Artículo 9.7.3.
s_t = 10 cm  # Espaciamiento a Colocar por Temperatura
# 06. Refuerzo de Acero Requerido
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# 06.01. Cálculo del Refuerzo Requerido
A := 0.59
B := -1
D_1 := M_u/(ϕ_Flexión*f'_c*b_losa*d^2)
A*w^2 + B*w + D == 0
w_1 := (-B + sqrt(B^2 - 4*A*D_1))/(2*A) = 1.65795
w_2 := (-B - sqrt(B^2 - 4*A*D_1))/(2*A) = 0.0369644
w := min(w_1, w_2)
ρ_req := w*f'_c/f_y
As_req := ρ_req*b_losa*d
As := max(As_req, As_mín)
w = 0.0369644  # Índice de Refuerzo de la Sección
ρ_req = 0.00184822  # Cuantía Requerida de la Sección
As_req = 3.14197 cm^2  # Acero Requerido de la Sección
As = 4.10589 cm^2  # Acero a Utilizar en la Sección
# 06.02. Verificación de la Fluencia
a := As_req*f_y/(0.85*f'_c*b_losa)
c := a/β_1
ε_s := ε_c*(d - c)/c
Tipo__Falla_1 :=
    if ε_s > ε_sy
        "Falla Dúctil"
    else
        "Falla Frágil"
M_n := As*f_y*(d - a/2)
Verificación__Resistencia_a_Flexión :=
    if ϕ_Flexión*M_n ≥ M_u
        "Si Cumple"
    else
        "No Cumple, Verificar"
a = 0.739288 cm  # Altura del Bloque de Compresiones
c = 0.869751 cm  # Distancia al Eje Neutro de la Sección
ε_s = 0.0556375  # Deformación Unitaria del Acero
Tipo__Falla_1 = "Falla Dúctil"  # Comportamiento de la Sección: A) Falla Dúctil o B) Falla Frágil
M_n = 2.86786 tonnef*m  # Momento Nominal Resistente de la Sección
ϕ_Flexión*M_n = 2.58108 tonnef*m  # Momento Nominal Reducido de la Sección
Verificación__Resistencia_a_Flexión = "Si Cumple"
# 06.03. Acero a Colocar y Separación Máxima
ϕ_db_2 := (3/8) in
A_db_2 := π*ϕ_db_2^2/4 = 0.712557 cm^2
s := Ceil(1.00 m*A_db_2/As, 0.05 m)
s = 20 cm  # Separación entre Aceros para el Refuerzo de la Losa Maciza
