# Diseño de Losas Macizas Armadas en 02 Direcciones
# Método de los Coeficientes en Base a la Norma E.060
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# 01. Datos Pre-Liminares / De Entrada
# 01.01. Propiedades Geométricas de la Sección
h_losa := 0.20 m  # Peralte Total (Espesor) de la Losa Maciza
b_losa := 1.00 m  # Ancho Efectivo de la Losa Maciza
A := 5.50 m  # Dimensión más Corta de la Losa Maciza
B := 6.50 m  # Dimensión más Larga de la Losa Maciza
r := 0.03 m  # Recubrimiento Mínimo para la Losa Maciza
d := h_losa - r = 0.17 m  # Peralte Efectivo de la Losa Maciza
# 01.02. Propiedades Mecánicas de los Materiales
f'_c := 210 kgf/cm^2  # Resistencia a la Compresión del Concreto
E_c := 15000*sqrt(f'_c*kgf/cm^2)
E_c = 217371 kgf/cm^2  # Módulo de Elasticidad del Concreto
f_y := 4200 kgf/cm^2  # Esfuerzo Cedente del Acero Corrugado
E_s := 2.1*10^6 kgf/cm^2  # Módulo de Elasticidad del Acero Corrugado
ε_c := 0.0030  # Deformación Unitaria del Concreto a Compresión
ε_sy := 0.0021  # Deformación Unitaria del Acero a Fluencia
β_1 :=
    if 170*kgf/cm^2 ≤ f'_c ≤ 280*kgf/cm^2
        0.85
    else if f'_c ≤ 350*kgf/cm^2
        0.80
    else if f'_c ≤ 420*kgf/cm^2
        0.75
    else if f'_c ≤ 490*kgf/cm^2
        0.70
    else if f'_c > 490*kgf/cm^2
        0.65
    = 0.85
β_1 = 0.85  # Factor de Relación de Profundidad del Bloque Rectangular Equivalente de Esfuerzos de Compresión
γ_c := 2.40 tonnef/m^3  # Peso Específico del Concreto
ϕ_Flexión := 0.90  # Factor de Reducción por Capacidad a Flexión
ϕ_Corte := 0.85  # Factor de Reducción por Capacidad a Corte
# 02. Pre-Dimensionamiento de la Losa
# 02.01. Cálculo del Espesor de Losa
h_losa_1 := 2*(A + B)/160
h_losa_2 := 2*(A + B)/170
h_losa_3 := 2*(A + B)/180
h_losa_final := Ceil(max(h_losa_1, h_losa_2, h_losa_3), 0.01 m)
Verficación__Espesor_de_Losa :=
    if h_losa ≥ h_losa_final
        "Si Cumple"
    else
        "No Cumple, Verificar"
h_losa_1 = 15 cm  # Pre-Dimensionamiento para 2 Paños Discontinuos
h_losa_2 = 14.1176 cm  # Pre-Dimensionamiento para 3 Paños Continuos
h_losa_3 = 13.3333 cm  # Pre-Dimensionamiento para 4 Paños Continuos
h_losa_final = 15 cm  # Pre-Dimensionamiento Definitivo de la Losa Maciza
# 02.02. Verificación del Espesor de la Losa
Verficación__Espesor_de_Losa = "Si Cumple"
# 03. Metrado de Cargas
# 03.01. Carga Muerta
Peso__Propio := γ_c*h_losa
Peso__Propio = 0.48 tonnef/m^2  # Peso Propio de la Losa
Peso__Tabiquería := 0.210 tonnef/m^2  # Peso de la Tabiquería sobre la Losa
Peso__Acabados := 0.100 tonnef/m^2  # Peso de los Acabados sobre la Losa
w_cm := Peso__Propio + Peso__Acabados + Peso__Tabiquería
w_cm = 0.79 tonnef/m^2  # Peso por m² de la Carga Muerta sobre la Losa
# 03.02. Carga Viva
Peso__Sobrecarga_de_Uso := 0.500 tonnef/m^2  # Peso de la Sobrecarga sobre la Losa
w_cv := Peso__Sobrecarga_de_Uso
w_cv = 0.5 tonnef/m^2  # Peso por m² de la Carga Viva sobre la Losa
# 04. Pre-Dimensionamiento para Cálculo de Deflexiones (Artículo 9.6.3.3.)
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# 04.01. Propiedades Geométricas de las Vigas Perimetrales
# Viga VP-01 | Viga VP-02 | Viga VP-03 | Viga VP-04
b_v1 := 0.25 m
b_v2 := 0.40 m
b_v3 := 0.40 m
b_v4 := 0.25 m
h_v1 := 0.60 m
h_v2 := 0.70 m
h_v3 := 0.70 m
h_v4 := 0.60 m
I_v2 := b_v2*h_v2^3/12
I_v3 := b_v3*h_v3^3/12
I_v4 := b_v4*h_v4^3/12
I_v1 := b_v1*h_v1^3/12
I_v1 = 0.0045 m^4
I_v2 = 0.0114333 m^4
I_v3 = 0.0114333 m^4
I_v4 = 0.0045 m^4
# 04.02. Cálculo del Factor "αf" por Viga
f'_cv := 210 kgf/cm^2  # Resistencia a la Compresión del Concreto de las Vigas
E_cv := 15000*sqrt(f'_cv*kgf/cm^2)
I_l := B*h_losa^3/12
α_f1 := E_cv*I_v1/(E_c*I_l)
α_f2 := E_cv*I_v2/(E_c*I_l)
α_f3 := E_cv*I_v3/(E_c*I_l)
α_f4 := E_cv*I_v4/(E_c*I_l)
α_fm := (α_f1 + α_f2 + α_f3 + α_f4)/4
E_cv = 217371 kgf/cm^2  # Módulo de Elasticidad del Concreto de las Vigas
I_l = 433333 cm^4  # Inercia de la Losa - Sección Bruta
# Viga VP-01 | Viga VP-02 | Viga VP-03 | Viga VP-04
α_f1 = 1.03846
α_f2 = 2.63846
α_f3 = 2.63846
α_f4 = 1.03846
# 04.03. Cálculo del Factor "αfm" y Espesor Mínimo
α_fm = 1.83846  # Relación entre la Rigidez a Flexión de una Viga y una Franja de Losa
β := B/A
h_mín :=
    if α_fm ≤ 0.20
        "Aplicar Artículo 9.6.3.2."
    else if 0.20 < α_fm ≤ 2.00
        max(B*(0.80 + f_y/(14000 kgf/cm^2))/(36 + 5*β*(α_fm - 0.20)), 125 mm)
    else if α_fm > 2.00
        max(B*(0.80 + f_y/(14000 kgf/cm^2))/(36 + 9*β), 90 mm)
Verificación__Cálculo_de_Deflexiones :=
    if h_losa ≥ h_mín
        "No se Requiere Cálculo de Deflexiones"
    else
        "Se Requiere Cálculo de Deflexiones"
β = 1.18182  # Relación entre la Longitud Mayor y Menor de la Losa
h_mín = 0.156517 m  # Espesor Mínimo de la Losa para No Calcular Deflexiones
Verificación__Cálculo_de_Deflexiones = "No se Requiere Cálculo de Deflexiones"
# 05. Cálculo de Momentos Últimos - Método de los Coeficientes
# 05.01. Limitaciones del Uso del Método de los Coeficientes - Artículo 13.7.1.
# Observación: Para que se pueda aplicar el "Método de los Coeficientes", la losa debe de cumplir con las siguientes limitaciones:
#
# -La losa debe estar apoyada en todo su perímetro sobre vigas peraltadas o muros, el peralte de las vigas será como mínimo 1/15 de la luz libre o 1,5 veces el espesor de la losa, el que sea mayor
h_v_mín := min(h_v1, h_v2, h_v3, h_v4)
Verificación__Uso_del_Método_01 :=
    if h_v_mín > 1/15*max(A, B) and h_v_mín > 1.50*h_losa
        "Si Aplica el Método de los Coeficientes"
    else
        "No Aplica el Método de los Coeficientes"
h_v_mín = 0.6 m  # Peralte Mínimo de las Vigas Perimetrales
Verificación__Uso_del_Método_01 = "Si Aplica el Método de los Coeficientes"
# -Los paños de las losas deben ser rectangulares, con una relación entre la luz mayor y menor, medidas centro a centro de los apoyos, no mayor de 2
Verificación__Uso_del_Método_02 :=
    if β < 2
        "Si Aplica el Método de los Coeficientes"
    else
        "No Aplica el Método de los Coeficientes"
β = 1.18182  # Relación entre Luz Mayor y Menor de la Losa
Verificación__Uso_del_Método_02 = "Si Aplica el Método de los Coeficientes"
# -Las longitudes de paños contiguos medidos centro a centro de los apoyos en cada dirección no deben diferir en más de un tercio de la luz mayor
#
# -Todas las cargas deben ser de gravedad y estar uniformemente distribuidas en todo el paño. La carga viva no debe exceder de dos veces la carga muerta, ambas en servicio
Verificación__Uso_del_Método_03 :=
    if w_cv < 2*w_cm
        "Si Aplica el Método de los Coeficientes"
    else
        "No Aplica el Método de los Coeficientes"
Verificación__Uso_del_Método_03 = "Si Aplica el Método de los Coeficientes"
# 05.02. Cálculo de Carga Uniformemente Repartida
# 05.02.01. Carga Muerta + Carga Viva - Momentos Negativos
w_u1 := 1.40*w_cm + 1.70*w_cv = 1.956 tonnef/m^2
# 05.02.02. Carga Muerta - Momentos Positivos
w_u2 := 1.40*w_cm = 1.106 tonnef/m^2
# 05.02.03. Carga Viva - Momentos Positivos
w_u3 := 1.70*w_cv = 0.85 tonnef/m^2
# 05.03. Cálculo de Coeficientes para Momentos
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Caso := 4  # Caso de Análisis para la Losa Maciza
m := Ceil(A/B, 0.05)
m = 0.85  # Relación entre Luz Menor y Mayor
# 05.03.01. Coeficientes para Momentos Negativos
Ca__neg :=
    if Caso == 2 and m == 1
        0.045
    else if Caso == 3 and m == 1
        0
    else if Caso == 4 and m == 1
        0.05
    else if Caso == 5 and m == 1
        0.075
    else if Caso == 6 and m == 1
        0.071
    else if Caso == 7 and m == 1
        0
    else if Caso == 8 and m == 1
        0.033
    else if Caso == 9 and m == 1
        0.061
    else if Caso == 2 and m == 0.95
        0.050
    else if Caso == 3 and m == 0.95
        0
    else if Caso == 4 and m == 0.95
        0.055
    else if Caso == 5 and m == 0.95
        0.079
    else if Caso == 6 and m == 0.95
        0.075
    else if Caso == 7 and m == 0.95
        0
    else if Caso == 8 and m == 0.95
        0.038
    else if Caso == 9 and m == 0.95
        0.065
    else if Caso == 2 and m == 0.90
        0.055
    else if Caso == 3 and m == 0.90
        0
    else if Caso == 4 and m == 0.90
        0.060
    else if Caso == 5 and m == 0.90
        0.080
    else if Caso == 6 and m == 0.90
        0.079
    else if Caso == 7 and m == 0.90
        0
    else if Caso == 8 and m == 0.90
        0.043
    else if Caso == 9 and m == 0.90
        0.068
    else if Caso == 2 and m == 0.85
        0.060
    else if Caso == 3 and m == 0.85
        0
    else if Caso == 4 and m == 0.85
        0.066
    else if Caso == 5 and m == 0.85
        0.082
    else if Caso == 6 and m == 0.85
        0.083
    else if Caso == 7 and m == 0.85
        0
    else if Caso == 8 and m == 0.85
        0.049
    else if Caso == 9 and m == 0.85
        0.072
    else if Caso == 2 and m == 0.80
        0.065
    else if Caso == 3 and m == 0.80
        0
    else if Caso == 4 and m == 0.80
        0.071
    else if Caso == 5 and m == 0.80
        0.083
    else if Caso == 6 and m == 0.80
        0.086
    else if Caso == 7 and m == 0.80
        0
    else if Caso == 8 and m == 0.80
        0.055
    else if Caso == 9 and m == 0.80
        0.075
    else if Caso == 2 and m == 0.75
        0.069
    else if Caso == 3 and m == 0.75
        0
    else if Caso == 4 and m == 0.75
        0.076
    else if Caso == 5 and m == 0.75
        0.085
    else if Caso == 6 and m == 0.75
        0.088
    else if Caso == 7 and m == 0.75
        0
    else if Caso == 8 and m == 0.75
        0.061
    else if Caso == 9 and m == 0.75
        0.078
    else if Caso == 2 and m == 0.70
        0.074
    else if Caso == 3 and m == 0.70
        0
    else if Caso == 4 and m == 0.70
        0.081
    else if Caso == 5 and m == 0.70
        0.086
    else if Caso == 6 and m == 0.70
        0.091
    else if Caso == 7 and m == 0.70
        0
    else if Caso == 8 and m == 0.70
        0.068
    else if Caso == 9 and m == 0.70
        0.081
    else if Caso == 2 and m == 0.65
        0.077
    else if Caso == 3 and m == 0.65
        0
    else if Caso == 4 and m == 0.65
        0.085
    else if Caso == 5 and m == 0.65
        0.087
    else if Caso == 6 and m == 0.65
        0.093
    else if Caso == 7 and m == 0.65
        0
    else if Caso == 8 and m == 0.65
        0.074
    else if Caso == 9 and m == 0.65
        0.083
    else if Caso == 2 and m == 0.60
        0.081
    else if Caso == 3 and m == 0.60
        0
    else if Caso == 4 and m == 0.60
        0.089
    else if Caso == 5 and m == 0.60
        0.088
    else if Caso == 6 and m == 0.60
        0.095
    else if Caso == 7 and m == 0.60
        0
    else if Caso == 8 and m == 0.60
        0.080
    else if Caso == 9 and m == 0.60
        0.085
    else if Caso == 2 and m == 0.55
        0.084
    else if Caso == 3 and m == 0.55
        0
    else if Caso == 4 and m == 0.55
        0.092
    else if Caso == 5 and m == 0.55
        0.089
    else if Caso == 6 and m == 0.55
        0.096
    else if Caso == 7 and m == 0.55
        0
    else if Caso == 8 and m == 0.55
        0.085
    else if Caso == 9 and m == 0.55
        0.086
    else if Caso == 2 and m == 0.50
        0.086
    else if Caso == 3 and m == 0.50
        0
    else if Caso == 4 and m == 0.50
        0.094
    else if Caso == 5 and m == 0.50
        0.090
    else if Caso == 6 and m == 0.50
        0.097
    else if Caso == 7 and m == 0.50
        0
    else if Caso == 8 and m == 0.50
        0.089
    else if Caso == 9 and m == 0.50
        0.088
Cb__neg :=
    if Caso == 2 and m == 1
        0.045
    else if Caso == 3 and m == 1
        0.076
    else if Caso == 4 and m == 1
        0.05
    else if Caso == 5 and m == 1
        0
    else if Caso == 6 and m == 1
        0
    else if Caso == 7 and m == 1
        0.071
    else if Caso == 8 and m == 1
        0.061
    else if Caso == 9 and m == 1
        0.033
    else if Caso == 2 and m == 0.95
        0.041
    else if Caso == 3 and m == 0.95
        0.072
    else if Caso == 4 and m == 0.95
        0.045
    else if Caso == 5 and m == 0.95
        0
    else if Caso == 6 and m == 0.95
        0
    else if Caso == 7 and m == 0.95
        0.067
    else if Caso == 8 and m == 0.95
        0.056
    else if Caso == 9 and m == 0.95
        0.029
    else if Caso == 2 and m == 0.90
        0.037
    else if Caso == 3 and m == 0.90
        0.070
    else if Caso == 4 and m == 0.90
        0.040
    else if Caso == 5 and m == 0.90
        0
    else if Caso == 6 and m == 0.90
        0
    else if Caso == 7 and m == 0.90
        0.062
    else if Caso == 8 and m == 0.90
        0.052
    else if Caso == 9 and m == 0.90
        0.025
    else if Caso == 2 and m == 0.85
        0.031
    else if Caso == 3 and m == 0.85
        0.065
    else if Caso == 4 and m == 0.85
        0.034
    else if Caso == 5 and m == 0.85
        0
    else if Caso == 6 and m == 0.85
        0
    else if Caso == 7 and m == 0.85
        0.057
    else if Caso == 8 and m == 0.85
        0.046
    else if Caso == 9 and m == 0.85
        0.021
    else if Caso == 2 and m == 0.80
        0.027
    else if Caso == 3 and m == 0.80
        0.061
    else if Caso == 4 and m == 0.80
        0.029
    else if Caso == 5 and m == 0.80
        0
    else if Caso == 6 and m == 0.80
        0
    else if Caso == 7 and m == 0.80
        0.051
    else if Caso == 8 and m == 0.80
        0.041
    else if Caso == 9 and m == 0.80
        0.017
    else if Caso == 2 and m == 0.75
        0.022
    else if Caso == 3 and m == 0.75
        0.056
    else if Caso == 4 and m == 0.75
        0.024
    else if Caso == 5 and m == 0.75
        0
    else if Caso == 6 and m == 0.75
        0
    else if Caso == 7 and m == 0.75
        0.044
    else if Caso == 8 and m == 0.75
        0.036
    else if Caso == 9 and m == 0.75
        0.014
    else if Caso == 2 and m == 0.70
        0.017
    else if Caso == 3 and m == 0.70
        0.050
    else if Caso == 4 and m == 0.70
        0.019
    else if Caso == 5 and m == 0.70
        0
    else if Caso == 6 and m == 0.70
        0
    else if Caso == 7 and m == 0.70
        0.038
    else if Caso == 8 and m == 0.70
        0.029
    else if Caso == 9 and m == 0.70
        0.011
    else if Caso == 2 and m == 0.65
        0.014
    else if Caso == 3 and m == 0.65
        0.043
    else if Caso == 4 and m == 0.65
        0.015
    else if Caso == 5 and m == 0.65
        0
    else if Caso == 6 and m == 0.65
        0
    else if Caso == 7 and m == 0.65
        0.031
    else if Caso == 8 and m == 0.65
        0.024
    else if Caso == 9 and m == 0.65
        0.008
    else if Caso == 2 and m == 0.60
        0.010
    else if Caso == 3 and m == 0.60
        0.035
    else if Caso == 4 and m == 0.60
        0.011
    else if Caso == 5 and m == 0.60
        0
    else if Caso == 6 and m == 0.60
        0
    else if Caso == 7 and m == 0.60
        0.024
    else if Caso == 8 and m == 0.60
        0.018
    else if Caso == 9 and m == 0.60
        0.006
    else if Caso == 2 and m == 0.55
        0.007
    else if Caso == 3 and m == 0.55
        0.028
    else if Caso == 4 and m == 0.55
        0.008
    else if Caso == 5 and m == 0.55
        0
    else if Caso == 6 and m == 0.55
        0
    else if Caso == 7 and m == 0.55
        0.019
    else if Caso == 8 and m == 0.55
        0.014
    else if Caso == 9 and m == 0.55
        0.005
    else if Caso == 2 and m == 0.50
        0.006
    else if Caso == 3 and m == 0.50
        0.022
    else if Caso == 4 and m == 0.50
        0.006
    else if Caso == 5 and m == 0.50
        0
    else if Caso == 6 and m == 0.50
        0
    else if Caso == 7 and m == 0.50
        0.014
    else if Caso == 8 and m == 0.50
        0.010
    else if Caso == 9 and m == 0.50
        0.003
Ca__neg = 0.066  # Coeficiente de Momento Negativo para Dirección Corta
Cb__neg = 0.034  # Coeficiente de Momento Negativo para Dirección Larga
# 05.03.02. Coeficientes para Momento Positivo debido a la Carga Muerta
Ca__pos_m :=
    if Caso == 2 and m == 1
        0.018
    else if Caso == 3 and m == 1
        0.018
    else if Caso == 4 and m == 1
        0.027
    else if Caso == 5 and m == 1
        0.027
    else if Caso == 6 and m == 1
        0.033
    else if Caso == 7 and m == 1
        0.027
    else if Caso == 8 and m == 1
        0.020
    else if Caso == 9 and m == 1
        0.023
    else if Caso == 2 and m == 0.95
        0.020
    else if Caso == 3 and m == 0.95
        0.021
    else if Caso == 4 and m == 0.95
        0.030
    else if Caso == 5 and m == 0.95
        0.028
    else if Caso == 6 and m == 0.95
        0.036
    else if Caso == 7 and m == 0.95
        0.031
    else if Caso == 8 and m == 0.95
        0.022
    else if Caso == 9 and m == 0.95
        0.024
    else if Caso == 2 and m == 0.90
        0.022
    else if Caso == 3 and m == 0.90
        0.025
    else if Caso == 4 and m == 0.90
        0.033
    else if Caso == 5 and m == 0.90
        0.029
    else if Caso == 6 and m == 0.90
        0.039
    else if Caso == 7 and m == 0.90
        0.035
    else if Caso == 8 and m == 0.90
        0.025
    else if Caso == 9 and m == 0.90
        0.026
    else if Caso == 2 and m == 0.85
        0.024
    else if Caso == 3 and m == 0.85
        0.029
    else if Caso == 4 and m == 0.85
        0.036
    else if Caso == 5 and m == 0.85
        0.031
    else if Caso == 6 and m == 0.85
        0.042
    else if Caso == 7 and m == 0.85
        0.040
    else if Caso == 8 and m == 0.85
        0.029
    else if Caso == 9 and m == 0.85
        0.028
    else if Caso == 2 and m == 0.80
        0.026
    else if Caso == 3 and m == 0.80
        0.034
    else if Caso == 4 and m == 0.80
        0.039
    else if Caso == 5 and m == 0.80
        0.032
    else if Caso == 6 and m == 0.80
        0.045
    else if Caso == 7 and m == 0.80
        0.045
    else if Caso == 8 and m == 0.80
        0.032
    else if Caso == 9 and m == 0.80
        0.029
    else if Caso == 2 and m == 0.75
        0.028
    else if Caso == 3 and m == 0.75
        0.040
    else if Caso == 4 and m == 0.75
        0.043
    else if Caso == 5 and m == 0.75
        0.033
    else if Caso == 6 and m == 0.75
        0.048
    else if Caso == 7 and m == 0.75
        0.051
    else if Caso == 8 and m == 0.75
        0.036
    else if Caso == 9 and m == 0.75
        0.031
    else if Caso == 2 and m == 0.70
        0.030
    else if Caso == 3 and m == 0.70
        0.046
    else if Caso == 4 and m == 0.70
        0.046
    else if Caso == 5 and m == 0.70
        0.035
    else if Caso == 6 and m == 0.70
        0.051
    else if Caso == 7 and m == 0.70
        0.058
    else if Caso == 8 and m == 0.70
        0.040
    else if Caso == 9 and m == 0.70
        0.033
    else if Caso == 2 and m == 0.65
        0.032
    else if Caso == 3 and m == 0.65
        0.054
    else if Caso == 4 and m == 0.65
        0.050
    else if Caso == 5 and m == 0.65
        0.036
    else if Caso == 6 and m == 0.65
        0.054
    else if Caso == 7 and m == 0.65
        0.065
    else if Caso == 8 and m == 0.65
        0.044
    else if Caso == 9 and m == 0.65
        0.034
    else if Caso == 2 and m == 0.60
        0.034
    else if Caso == 3 and m == 0.60
        0.062
    else if Caso == 4 and m == 0.60
        0.053
    else if Caso == 5 and m == 0.60
        0.037
    else if Caso == 6 and m == 0.60
        0.056
    else if Caso == 7 and m == 0.60
        0.073
    else if Caso == 8 and m == 0.60
        0.048
    else if Caso == 9 and m == 0.60
        0.036
    else if Caso == 2 and m == 0.55
        0.035
    else if Caso == 3 and m == 0.55
        0.071
    else if Caso == 4 and m == 0.55
        0.056
    else if Caso == 5 and m == 0.55
        0.038
    else if Caso == 6 and m == 0.55
        0.058
    else if Caso == 7 and m == 0.55
        0.081
    else if Caso == 8 and m == 0.55
        0.052
    else if Caso == 9 and m == 0.55
        0.037
    else if Caso == 2 and m == 0.50
        0.037
    else if Caso == 3 and m == 0.50
        0.080
    else if Caso == 4 and m == 0.50
        0.059
    else if Caso == 5 and m == 0.50
        0.039
    else if Caso == 6 and m == 0.50
        0.061
    else if Caso == 7 and m == 0.50
        0.089
    else if Caso == 8 and m == 0.50
        0.056
    else if Caso == 9 and m == 0.50
        0.038
Cb__pos_m :=
    if Caso == 2 and m == 1
        0.018
    else if Caso == 3 and m == 1
        0.027
    else if Caso == 4 and m == 1
        0.027
    else if Caso == 5 and m == 1
        0.018
    else if Caso == 6 and m == 1
        0.027
    else if Caso == 7 and m == 1
        0.033
    else if Caso == 8 and m == 1
        0.023
    else if Caso == 9 and m == 1
        0.020
    else if Caso == 2 and m == 0.95
        0.016
    else if Caso == 3 and m == 0.95
        0.025
    else if Caso == 4 and m == 0.95
        0.024
    else if Caso == 5 and m == 0.95
        0.015
    else if Caso == 6 and m == 0.95
        0.024
    else if Caso == 7 and m == 0.95
        0.031
    else if Caso == 8 and m == 0.95
        0.021
    else if Caso == 9 and m == 0.95
        0.017
    else if Caso == 2 and m == 0.90
        0.014
    else if Caso == 3 and m == 0.90
        0.024
    else if Caso == 4 and m == 0.90
        0.022
    else if Caso == 5 and m == 0.90
        0.013
    else if Caso == 6 and m == 0.90
        0.021
    else if Caso == 7 and m == 0.90
        0.028
    else if Caso == 8 and m == 0.90
        0.019
    else if Caso == 9 and m == 0.90
        0.015
    else if Caso == 2 and m == 0.85
        0.012
    else if Caso == 3 and m == 0.85
        0.022
    else if Caso == 4 and m == 0.85
        0.019
    else if Caso == 5 and m == 0.85
        0.011
    else if Caso == 6 and m == 0.85
        0.017
    else if Caso == 7 and m == 0.85
        0.025
    else if Caso == 8 and m == 0.85
        0.017
    else if Caso == 9 and m == 0.85
        0.013
    else if Caso == 2 and m == 0.80
        0.011
    else if Caso == 3 and m == 0.80
        0.020
    else if Caso == 4 and m == 0.80
        0.016
    else if Caso == 5 and m == 0.80
        0.009
    else if Caso == 6 and m == 0.80
        0.015
    else if Caso == 7 and m == 0.80
        0.022
    else if Caso == 8 and m == 0.80
        0.015
    else if Caso == 9 and m == 0.80
        0.010
    else if Caso == 2 and m == 0.75
        0.009
    else if Caso == 3 and m == 0.75
        0.018
    else if Caso == 4 and m == 0.75
        0.013
    else if Caso == 5 and m == 0.75
        0.007
    else if Caso == 6 and m == 0.75
        0.012
    else if Caso == 7 and m == 0.75
        0.020
    else if Caso == 8 and m == 0.75
        0.013
    else if Caso == 9 and m == 0.75
        0.007
    else if Caso == 2 and m == 0.70
        0.007
    else if Caso == 3 and m == 0.70
        0.016
    else if Caso == 4 and m == 0.70
        0.011
    else if Caso == 5 and m == 0.70
        0.005
    else if Caso == 6 and m == 0.70
        0.009
    else if Caso == 7 and m == 0.70
        0.017
    else if Caso == 8 and m == 0.70
        0.011
    else if Caso == 9 and m == 0.70
        0.006
    else if Caso == 2 and m == 0.65
        0.006
    else if Caso == 3 and m == 0.65
        0.014
    else if Caso == 4 and m == 0.65
        0.009
    else if Caso == 5 and m == 0.65
        0.004
    else if Caso == 6 and m == 0.65
        0.007
    else if Caso == 7 and m == 0.65
        0.014
    else if Caso == 8 and m == 0.65
        0.009
    else if Caso == 9 and m == 0.65
        0.005
    else if Caso == 2 and m == 0.60
        0.004
    else if Caso == 3 and m == 0.60
        0.011
    else if Caso == 4 and m == 0.60
        0.007
    else if Caso == 5 and m == 0.60
        0.003
    else if Caso == 6 and m == 0.60
        0.006
    else if Caso == 7 and m == 0.60
        0.012
    else if Caso == 8 and m == 0.60
        0.007
    else if Caso == 9 and m == 0.60
        0.004
    else if Caso == 2 and m == 0.55
        0.003
    else if Caso == 3 and m == 0.55
        0.009
    else if Caso == 4 and m == 0.55
        0.005
    else if Caso == 5 and m == 0.55
        0.002
    else if Caso == 6 and m == 0.55
        0.004
    else if Caso == 7 and m == 0.55
        0.009
    else if Caso == 8 and m == 0.55
        0.005
    else if Caso == 9 and m == 0.55
        0.003
    else if Caso == 2 and m == 0.50
        0.002
    else if Caso == 3 and m == 0.50
        0.007
    else if Caso == 4 and m == 0.50
        0.004
    else if Caso == 5 and m == 0.50
        0.001
    else if Caso == 6 and m == 0.50
        0.003
    else if Caso == 7 and m == 0.50
        0.007
    else if Caso == 8 and m == 0.50
        0.004
    else if Caso == 9 and m == 0.50
        0.002
Ca__pos_m = 0.036  # Coeficiente de Momento Positivo (C.M.) para Dirección Corta
Cb__pos_m = 0.019  # Coeficiente de Momento Positivo (C.M.) para Dirección Larga
# 05.03.03. Coeficientes para Momento Positivo debido a la Carga Viva
Ca__pos_v :=
    if Caso == 2 and m == 1
        0.027
    else if Caso == 3 and m == 1
        0.027
    else if Caso == 4 and m == 1
        0.032
    else if Caso == 5 and m == 1
        0.032
    else if Caso == 6 and m == 1
        0.035
    else if Caso == 7 and m == 1
        0.032
    else if Caso == 8 and m == 1
        0.028
    else if Caso == 9 and m == 1
        0.030
    else if Caso == 2 and m == 0.95
        0.020
    else if Caso == 3 and m == 0.95
        0.031
    else if Caso == 4 and m == 0.95
        0.035
    else if Caso == 5 and m == 0.95
        0.034
    else if Caso == 6 and m == 0.95
        0.038
    else if Caso == 7 and m == 0.95
        0.036
    else if Caso == 8 and m == 0.95
        0.031
    else if Caso == 9 and m == 0.95
        0.032
    else if Caso == 2 and m == 0.90
        0.034
    else if Caso == 3 and m == 0.90
        0.035
    else if Caso == 4 and m == 0.90
        0.039
    else if Caso == 5 and m == 0.90
        0.037
    else if Caso == 6 and m == 0.90
        0.042
    else if Caso == 7 and m == 0.90
        0.040
    else if Caso == 8 and m == 0.90
        0.035
    else if Caso == 9 and m == 0.90
        0.036
    else if Caso == 2 and m == 0.85
        0.037
    else if Caso == 3 and m == 0.85
        0.040
    else if Caso == 4 and m == 0.85
        0.043
    else if Caso == 5 and m == 0.85
        0.041
    else if Caso == 6 and m == 0.85
        0.046
    else if Caso == 7 and m == 0.85
        0.045
    else if Caso == 8 and m == 0.85
        0.040
    else if Caso == 9 and m == 0.85
        0.039
    else if Caso == 2 and m == 0.80
        0.041
    else if Caso == 3 and m == 0.80
        0.045
    else if Caso == 4 and m == 0.80
        0.048
    else if Caso == 5 and m == 0.80
        0.044
    else if Caso == 6 and m == 0.80
        0.051
    else if Caso == 7 and m == 0.80
        0.051
    else if Caso == 8 and m == 0.80
        0.044
    else if Caso == 9 and m == 0.80
        0.042
    else if Caso == 2 and m == 0.75
        0.045
    else if Caso == 3 and m == 0.75
        0.051
    else if Caso == 4 and m == 0.75
        0.052
    else if Caso == 5 and m == 0.75
        0.047
    else if Caso == 6 and m == 0.75
        0.055
    else if Caso == 7 and m == 0.75
        0.056
    else if Caso == 8 and m == 0.75
        0.049
    else if Caso == 9 and m == 0.75
        0.046
    else if Caso == 2 and m == 0.70
        0.030
    else if Caso == 3 and m == 0.70
        0.057
    else if Caso == 4 and m == 0.70
        0.057
    else if Caso == 5 and m == 0.70
        0.051
    else if Caso == 6 and m == 0.70
        0.060
    else if Caso == 7 and m == 0.70
        0.063
    else if Caso == 8 and m == 0.70
        0.054
    else if Caso == 9 and m == 0.70
        0.050
    else if Caso == 2 and m == 0.65
        0.053
    else if Caso == 3 and m == 0.65
        0.064
    else if Caso == 4 and m == 0.65
        0.062
    else if Caso == 5 and m == 0.65
        0.055
    else if Caso == 6 and m == 0.65
        0.064
    else if Caso == 7 and m == 0.65
        0.070
    else if Caso == 8 and m == 0.65
        0.059
    else if Caso == 9 and m == 0.65
        0.054
    else if Caso == 2 and m == 0.60
        0.058
    else if Caso == 3 and m == 0.60
        0.071
    else if Caso == 4 and m == 0.60
        0.067
    else if Caso == 5 and m == 0.60
        0.059
    else if Caso == 6 and m == 0.60
        0.068
    else if Caso == 7 and m == 0.60
        0.077
    else if Caso == 8 and m == 0.60
        0.065
    else if Caso == 9 and m == 0.60
        0.059
    else if Caso == 2 and m == 0.55
        0.062
    else if Caso == 3 and m == 0.55
        0.080
    else if Caso == 4 and m == 0.55
        0.072
    else if Caso == 5 and m == 0.55
        0.063
    else if Caso == 6 and m == 0.55
        0.073
    else if Caso == 7 and m == 0.55
        0.085
    else if Caso == 8 and m == 0.55
        0.070
    else if Caso == 9 and m == 0.55
        0.063
    else if Caso == 2 and m == 0.50
        0.066
    else if Caso == 3 and m == 0.50
        0.088
    else if Caso == 4 and m == 0.50
        0.077
    else if Caso == 5 and m == 0.50
        0.067
    else if Caso == 6 and m == 0.50
        0.078
    else if Caso == 7 and m == 0.50
        0.092
    else if Caso == 8 and m == 0.50
        0.076
    else if Caso == 9 and m == 0.50
        0.067
Cb__pos_v :=
    if Caso == 2 and m == 1
        0.027
    else if Caso == 3 and m == 1
        0.032
    else if Caso == 4 and m == 1
        0.032
    else if Caso == 5 and m == 1
        0.027
    else if Caso == 6 and m == 1
        0.032
    else if Caso == 7 and m == 1
        0.035
    else if Caso == 8 and m == 1
        0.030
    else if Caso == 9 and m == 1
        0.028
    else if Caso == 2 and m == 0.95
        0.025
    else if Caso == 3 and m == 0.95
        0.029
    else if Caso == 4 and m == 0.95
        0.029
    else if Caso == 5 and m == 0.95
        0.024
    else if Caso == 6 and m == 0.95
        0.029
    else if Caso == 7 and m == 0.95
        0.032
    else if Caso == 8 and m == 0.95
        0.027
    else if Caso == 9 and m == 0.95
        0.025
    else if Caso == 2 and m == 0.90
        0.022
    else if Caso == 3 and m == 0.90
        0.027
    else if Caso == 4 and m == 0.90
        0.026
    else if Caso == 5 and m == 0.90
        0.021
    else if Caso == 6 and m == 0.90
        0.025
    else if Caso == 7 and m == 0.90
        0.029
    else if Caso == 8 and m == 0.90
        0.024
    else if Caso == 9 and m == 0.90
        0.022
    else if Caso == 2 and m == 0.85
        0.019
    else if Caso == 3 and m == 0.85
        0.024
    else if Caso == 4 and m == 0.85
        0.023
    else if Caso == 5 and m == 0.85
        0.019
    else if Caso == 6 and m == 0.85
        0.022
    else if Caso == 7 and m == 0.85
        0.026
    else if Caso == 8 and m == 0.85
        0.022
    else if Caso == 9 and m == 0.85
        0.020
    else if Caso == 2 and m == 0.80
        0.017
    else if Caso == 3 and m == 0.80
        0.022
    else if Caso == 4 and m == 0.80
        0.020
    else if Caso == 5 and m == 0.80
        0.016
    else if Caso == 6 and m == 0.80
        0.019
    else if Caso == 7 and m == 0.80
        0.023
    else if Caso == 8 and m == 0.80
        0.019
    else if Caso == 9 and m == 0.80
        0.017
    else if Caso == 2 and m == 0.75
        0.014
    else if Caso == 3 and m == 0.75
        0.019
    else if Caso == 4 and m == 0.75
        0.016
    else if Caso == 5 and m == 0.75
        0.013
    else if Caso == 6 and m == 0.75
        0.016
    else if Caso == 7 and m == 0.75
        0.020
    else if Caso == 8 and m == 0.75
        0.016
    else if Caso == 9 and m == 0.75
        0.013
    else if Caso == 2 and m == 0.70
        0.012
    else if Caso == 3 and m == 0.70
        0.016
    else if Caso == 4 and m == 0.70
        0.014
    else if Caso == 5 and m == 0.70
        0.011
    else if Caso == 6 and m == 0.70
        0.013
    else if Caso == 7 and m == 0.70
        0.017
    else if Caso == 8 and m == 0.70
        0.014
    else if Caso == 9 and m == 0.70
        0.011
    else if Caso == 2 and m == 0.65
        0.010
    else if Caso == 3 and m == 0.65
        0.014
    else if Caso == 4 and m == 0.65
        0.011
    else if Caso == 5 and m == 0.65
        0.009
    else if Caso == 6 and m == 0.65
        0.010
    else if Caso == 7 and m == 0.65
        0.014
    else if Caso == 8 and m == 0.65
        0.011
    else if Caso == 9 and m == 0.65
        0.009
    else if Caso == 2 and m == 0.60
        0.007
    else if Caso == 3 and m == 0.60
        0.011
    else if Caso == 4 and m == 0.60
        0.009
    else if Caso == 5 and m == 0.60
        0.007
    else if Caso == 6 and m == 0.60
        0.008
    else if Caso == 7 and m == 0.60
        0.011
    else if Caso == 8 and m == 0.60
        0.009
    else if Caso == 9 and m == 0.60
        0.007
    else if Caso == 2 and m == 0.55
        0.006
    else if Caso == 3 and m == 0.55
        0.009
    else if Caso == 4 and m == 0.55
        0.007
    else if Caso == 5 and m == 0.55
        0.005
    else if Caso == 6 and m == 0.55
        0.006
    else if Caso == 7 and m == 0.55
        0.009
    else if Caso == 8 and m == 0.55
        0.007
    else if Caso == 9 and m == 0.55
        0.006
    else if Caso == 2 and m == 0.50
        0.004
    else if Caso == 3 and m == 0.50
        0.007
    else if Caso == 4 and m == 0.50
        0.005
    else if Caso == 5 and m == 0.50
        0.004
    else if Caso == 6 and m == 0.50
        0.005
    else if Caso == 7 and m == 0.50
        0.007
    else if Caso == 8 and m == 0.50
        0.005
    else if Caso == 9 and m == 0.50
        0.004
Ca__pos_v = 0.043  # Coeficiente de Momento Positivo (C.V.) para Dirección Corta
Cb__pos_v = 0.023  # Coeficiente de Momento Positivo (C.V.) para Dirección Larga
# 05.04. Cálculo de Momentos para el Diseño
# 05.04.01. Momentos en Flexión Negativos
Ma__neg := Ca__neg*w_u1*A^2*m
Mb__neg := Cb__neg*w_u1*B^2*m
Ma__neg = 3.90515 tonnef*m  # Momento de Flexión Negativo en Dirección "A"
Mb__neg = 2.80979 tonnef*m  # Momento de Flexión Negativo en Dirección "B"
# 05.04.02. Momentos en Flexión Positivos
Ma__pos_m := Ca__pos_m*w_u2*A^2*m
Mb__pos_m := Cb__pos_m*w_u2*A^2*m
Ma__pos_m = 1.20443 tonnef*m  # Momento de Flexión Positivo (C.M.) en Dirección "A"
Mb__pos_m = 0.635674 tonnef*m  # Momento de Flexión Positivo (C.M.) en Dirección "B"
Ma__pos_v := Ca__pos_v*w_u3*A^2*m
Mb__pos_v := Cb__pos_v*w_u3*A^2*m
Ma__pos_v = 1.10564 tonnef*m  # Momento de Flexión Positivo (C.V.) en Dirección "A"
Mb__pos_v = 0.591388 tonnef*m  # Momento de Flexión Positivo (C.V.) en Dirección "B"
Ma__pos := Ma__pos_m + Ma__pos_v
Mb__pos := Mb__pos_m + Mb__pos_v
Ma__pos = 2.31007 tonnef*m  # Momento de Flexión Positivo en Dirección "A"
Mb__pos = 1.22706 tonnef*m  # Momento de Flexión Positivo en Dirección "B"
# 06. Verificación por Corte
# 06.01. Verificación por Corte en 01 Dirección
# 06.01.01. Cortante Último a una Distancia "d" (Artículo 13.7.3.1.)
V_ud := w_u1*(A/2 - d)*(1 - 0.50*A/B)*m
V_c := 1.10*0.53*sqrt(f'_c*kgf/cm^2)*b_losa*d
Verificación__Corte :=
    if ϕ_Corte*V_c ≥ V_ud
        "Si Cumple"
    else
        "Se Requiere Ensanche de Vigueta"
V_ud = 2.91143 tonnef  # Cortante Último de la Losa a una Distancia "d"
# 06.01.02. Cortante Admisible del Concreto
V_c = 14.3624 tonnef  # Resistencia Nominal al Corte por el Concreto
ϕ_Corte*V_c = 12.208 tonnef  # Resistencia Nominal al Corte Reducida
Verificación__Corte = "Si Cumple"
# 06.02. Verificación por Corte en 02 Direcciones - Punzonamiento
# Observación: En losas que se encuentren apoyadas en sus 4 bordes por vigas peraltadas, el Corte por Punzonamiento no es predominante, solo el corte en 01 dirección
# 07. Diseño por Flexión
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Ma__neg = 3.90515 tonnef*m
Mb__neg = 2.80979 tonnef*m
Ma__pos = 2.31007 tonnef*m
Mb__pos = 1.22706 tonnef*m
# 07.01. Refuerzo Mínimo en Elementos Sometidos a Flexión (Artículo 10.5.)
ρ_mín_1 := 0.70*sqrt(f'_c*kgf/cm^2)/f_y
ρ_mín_2 := 0.0018
ρ_mín := max(ρ_mín_1, ρ_mín_2)
As_mín := ρ_mín*b_losa*d
ρ_mín = 0.00241523  # Cuantía Mínima de Refuerzo a Tracción
As_mín = 4.10589 cm^2  # Acero Mínimo por Tracción
# 07.02. Diseño del Refuerzo Negativo en la Dirección Corta
# 07.02.01. Cálculo del Acero Requerido
A_1 := 0.59
B_1 := -1
D_1 := Ma__neg/(ϕ_Flexión*f'_c*b_losa*d^2)
A*w^2 + B*w + D == 0
w_1 := (-B_1 + sqrt(B_1^2 - 4*A_1*D_1))/(2*A_1) = 1.62012
w_2 := (-B_1 - sqrt(B_1^2 - 4*A_1*D_1))/(2*A_1) = 0.0747962
w_a_neg := min(w_1, w_2)
ρ_a_neg := w_a_neg*f'_c/f_y
As_req_a_neg := ρ_a_neg*b_losa*d
As_a_neg := max(As_req_a_neg, As_mín)
a_a_neg := As_a_neg*f_y/(0.85*f'_c*b_losa)
c_a_neg := a_a_neg/β_1
ε_s_a_neg := ε_c*(d - c_a_neg)/c_a_neg
Tipo__Falla_1 :=
    if ε_s_a_neg > ε_sy
        "Falla Dúctil"
    else
        "Falla Frágil"
M_n_a_neg := As_a_neg*f_y*(d - a_a_neg/2)
Verificación__Resistencia_1 :=
    if ϕ_Flexión*M_n_a_neg ≥ Ma__neg
        "Si Cumple"
    else
        "No Cumple, Verificar"
w_a_neg = 0.0747962  # Índice de Refuerzo de la Sección
ρ_a_neg = 0.00373981  # Cuantía Requerida de la Sección
As_a_neg = 6.35768 cm^2  # Acero Requerido de la Sección
# 07.02.02. Verificación de la Fluencia y Resistencia
a_a_neg = 1.49592 cm  # Altura del Bloque de Compresiones
c_a_neg = 1.75991 cm  # Distancia al Eje Neutro de la Sección
ε_s_a_neg = 0.0259787  # Deformación Unitaria del Acero
Tipo__Falla_1 = "Falla Dúctil"  # Comportamiento de la Sección: A) Falla Dúctil o B) Falla Frágil
M_n_a_neg = 4.33966 tonnef*m  # Momento Nominal Resistente de la Sección
ϕ_Flexión*M_n_a_neg = 3.90569 tonnef*m  # Momento Nominal Reducido
Verificación__Resistencia_1 = "Si Cumple"
# 07.02.03. Acero a Colocar y Separación Máxima
ϕ_db_1 := (1/2) in
A_db_1 := π*ϕ_db_1^2/4 = 1.26677 cm^2
s_a1 := Ceil(1.00 m*A_db_1/As_a_neg, 0.05 m)
s_a1 = 20 cm  # Separación entre Aceros para el Refuerzo de la Losa Maciza
# 07.03. Diseño del Refuerzo Positivo en la Dirección Corta
# 07.03.01. Cálculo del Acero Requerido
A_1 := 0.59
B_1 := -1
D_2 := Ma__pos/(ϕ_Flexión*f'_c*b_losa*d^2)
A*w^2 + B*w + D == 0
w_3 := (-B_1 + sqrt(B_1^2 - 4*A_1*D_2))/(2*A_1) = 1.65151
w_4 := (-B_1 - sqrt(B_1^2 - 4*A_1*D_2))/(2*A_1) = 0.0434043
w_a_pos := min(w_3, w_4)
ρ_a_pos := w_a_pos*f'_c/f_y
As_req_a_pos := ρ_a_pos*b_losa*d
As_a_pos := max(As_req_a_pos, As_mín)
a_a_pos := As_a_pos*f_y/(0.85*f'_c*b_losa)
c_a_pos := a_a_pos/β_1
ε_s_a_pos := ε_c*(d - c_a_pos)/c_a_pos
Tipo__Falla_2 :=
    if ε_s_a_pos > ε_sy
        "Falla Dúctil"
    else
        "Falla Frágil"
M_n_a_pos := As_a_pos*f_y*(d - a_a_pos/2)
Verificación__Resistencia_2 :=
    if ϕ_Flexión*M_n_a_pos ≥ Ma__pos
        "Si Cumple"
    else
        "No Cumple, Verificar"
w_a_pos = 0.0434043  # Índice de Refuerzo de la Sección
ρ_a_pos = 0.00217021  # Cuantía Requerida de la Sección
As_a_pos = 4.10589 cm^2  # Acero Requerido de la Sección
# 07.03.02. Verificación de la Fluencia y Resistencia
a_a_pos = 0.966092 cm  # Altura del Bloque de Compresiones
c_a_pos = 1.13658 cm  # Distancia al Eje Neutro de la Sección
ε_s_a_pos = 0.0418715  # Deformación Unitaria del Acero
Tipo__Falla_2 = "Falla Dúctil"  # Comportamiento de la Sección: A) Falla Dúctil o B) Falla Frágil
M_n_a_pos = 2.84831 tonnef*m  # Momento Nominal Resistente de la Sección
ϕ_Flexión*M_n_a_pos = 2.56347 tonnef*m  # Momento Nominal Reducido
Verificación__Resistencia_2 = "Si Cumple"
# 07.03.03. Acero a Colocar y Separación Máxima
ϕ_db_2 := (1/2) in
A_db_2 := π*ϕ_db_2^2/4 = 1.26677 cm^2
s_a2 := Ceil(1.00 m*A_db_2/As_a_pos, 0.05 m)
s_a2 = 35 cm  # Separación entre Aceros para el Refuerzo de la Losa Maciza
# 07.04. Diseño del Refuerzo Negativo en la Dirección Larga
# 07.04.01. Cálculo del Acero Requerido
A_1 := 0.59
B_1 := -1
D_3 := Mb__neg/(ϕ_Flexión*f'_c*b_losa*d^2)
A*w^2 + B*w + D == 0
w_5 := (-B_1 + sqrt(B_1^2 - 4*A_1*D_3))/(2*A_1) = 1.64181
w_6 := (-B_1 - sqrt(B_1^2 - 4*A_1*D_3))/(2*A_1) = 0.0531056
w_b_neg := min(w_5, w_6)
ρ_b_neg := w_b_neg*f'_c/f_y
As_req_b_neg := ρ_b_neg*b_losa*d
As_b_neg := max(As_req_b_neg, As_mín)
a_b_neg := As_b_neg*f_y/(0.85*f'_c*b_losa)
c_b_neg := a_b_neg/β_1
ε_s_b_neg := ε_c*(d - c_b_neg)/c_b_neg
Tipo__Falla_3 :=
    if ε_s_b_neg > ε_sy
        "Falla Dúctil"
    else
        "Falla Frágil"
M_n_b_neg := As_b_neg*f_y*(d - a_b_neg/2)
Verificación__Resistencia_3 :=
    if ϕ_Flexión*M_n_b_neg ≥ Mb__neg
        "Si Cumple"
    else
        "No Cumple, Verificar"
w_b_neg = 0.0531056  # Índice de Refuerzo de la Sección
ρ_b_neg = 0.00265528  # Cuantía Requerida de la Sección
As_b_neg = 4.51397 cm^2  # Acero Requerido de la Sección
# 07.04.02. Verificación de la Fluencia y Resistencia
a_b_neg = 1.06211 cm  # Altura del Bloque de Compresiones
c_b_neg = 1.24954 cm  # Distancia al Eje Neutro de la Sección
ε_s_b_neg = 0.0378149  # Deformación Unitaria del Acero
Tipo__Falla_3 = "Falla Dúctil"  # Comportamiento de la Sección: A) Falla Dúctil o B) Falla Frágil
M_n_b_neg = 3.1223 tonnef*m  # Momento Nominal Resistente de la Sección
ϕ_Flexión*M_n_b_neg = 2.81007 tonnef*m  # Momento Nominal Reducido
Verificación__Resistencia_3 = "Si Cumple"
# 07.04.03. Acero a Colocar y Separación Máxima
ϕ_db_3 := (1/2) in
A_db_3 := π*ϕ_db_3^2/4 = 1.26677 cm^2
s_b1 := Ceil(1.00 m*A_db_3/As_b_neg, 0.05 m)
s_b1 = 30 cm  # Separación entre Aceros para el Refuerzo de la Losa Maciza
# 07.05. Diseño del Refuerzo Positivo en la Dirección Larga
# 07.05.01. Cálculo del Acero Requerido
A_1 := 0.59
B_1 := -1
D_4 := Mb__pos/(ϕ_Flexión*f'_c*b_losa*d^2)
A*w^2 + B*w + D == 0
w_7 := (-B_1 + sqrt(B_1^2 - 4*A_1*D_4))/(2*A_1) = 1.67214
w_8 := (-B_1 - sqrt(B_1^2 - 4*A_1*D_4))/(2*A_1) = 0.0227709
w_b_pos := min(w_7, w_8)
ρ_b_pos := w_b_pos*f'_c/f_y
As_req_b_pos := ρ_b_pos*b_losa*d
As_b_pos := max(As_req_b_pos, As_mín)
a_b_pos := As_b_pos*f_y/(0.85*f'_c*b_losa)
c_b_pos := a_b_pos/β_1
ε_s_b_pos := ε_c*(d - c_b_pos)/c_b_pos
Tipo__Falla_4 :=
    if ε_s_b_pos > ε_sy
        "Falla Dúctil"
    else
        "Falla Frágil"
M_n_b_pos := As_b_pos*f_y*(d - a_b_pos/2)
Verificación__Resistencia_4 :=
    if ϕ_Flexión*M_n_b_pos ≥ Mb__pos
        "Si Cumple"
    else
        "No Cumple, Verificar"
w_b_pos = 0.0227709  # Índice de Refuerzo de la Sección
ρ_b_pos = 0.00113855  # Cuantía Requerida de la Sección
As_b_pos = 4.10589 cm^2  # Acero Requerido de la Sección
# 07.05.02. Verificación de la Fluencia y Resistencia
a_b_pos = 0.966092 cm  # Altura del Bloque de Compresiones
c_b_pos = 1.13658 cm  # Distancia al Eje Neutro de la Sección
ε_s_b_pos = 0.0418715  # Deformación Unitaria del Acero
Tipo__Falla_4 = "Falla Dúctil"  # Comportamiento de la Sección: A) Falla Dúctil o B) Falla Frágil
M_n_b_pos = 2.84831 tonnef*m  # Momento Nominal Resistente de la Sección
ϕ_Flexión*M_n_b_pos = 2.56347 tonnef*m  # Momento Nominal Reducido
Verificación__Resistencia_4 = "Si Cumple"
# 07.05.03. Acero a Colocar y Separación Máxima
ϕ_db_4 := (1/2) in
A_db_4 := π*ϕ_db_4^2/4 = 1.26677 cm^2
s_b2 := Ceil(1.00 m*A_db_4/As_b_pos, 0.05 m)
s_b2 = 35 cm  # Separación entre Aceros para el Refuerzo de la Losa Maciza
# 08. Resumen de Resultados
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# Ma (-)
ϕ_db_1 → in/2
s_a1 = 20 cm
# Ma (+)
ϕ_db_2 → in/2
s_a2 = 35 cm
# Mb (-)
ϕ_db_3 → in/2
s_b1 = 30 cm
# Mb (+)
ϕ_db_4 → in/2
s_b2 = 35 cm
