# Worksheet setting: ORIGIN = 1
# DISEÑO DE NUDOS VIGA-COLUMNA ACI 318-19
# Materiales
# Concreto
f'_c := 21 MPa
# Recubrimiento al estribo
r := 4 cm
# Acero de refuerzo
f_y := 420 MPa
# Módulo de elasticidad
E_s := 200 GPa
# Acero de refuerzo transversal
f_yt := 420 MPa
# Factor de Concreto Liviano
λ := 1
# Definición del nudo Viga-Columna
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# Continuidad de la Columna
C := 2
# Dimensiones de las Columnas que llegan al nudo
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# Ancho Columna
b_c := 40 cm
# Peralte Columna
h_c := 60 cm
# Altura
H_c := 3 m
# Máximo espaciamiento de barras con soporte lateral
h_x := 16 cm
# Acero de Refuerzo en Columna
# # de barras en b
j := 3
# # de barras en h
g := 4
n_b[g, j] := 1
k := 1 .. j
i := 1 .. g
n_b[i, 1] := 1
n_b[1, k] := 1
n_b[g, k] := 1
n_b[i, j] := 1
# Acero longitudinal
d_bc := (3/4) in
transpose(n_b) = [1, 1, 1, 1; 1, 0, 0, 1; 1, 1, 1, 1]
# Acero transversal
d_vc := (3/8) in
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# Dimensiones de las Vigas que llegan al nudo
table  # each column defines a variable
    Viga | b_b (cm) | h_b (cm) | x (cm)
    "W" | 25 | 50 | 7.5
    "N" | 25 | 50 | 17.5
    "E" | 25 | 50 | 7.5
    "S" | 25 | 50 | 17.5
end table
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# Acero de Refuerzo en Viga W-E
# Acero Longitudinal
table  # each column defines a variable
    f | d_1 (mm) | n_1 | d_2 (mm) | n_2
    1 | 16 | 2 | 0 | 0
    2 | 16 | 2 | 0 | 0
    3 | 0 | 0 | 0 | 0
    4 | 16 | 3 | 0 | 0
end table
# Acero Transversal
d_vv := (3/8) in
Y := [-b_c/2, -b_c/2, b_c/2, b_c/2, -b_c/2]
X := [-h_c/2, h_c/2, h_c/2, -h_c/2, -h_c/2]
X_W := [-h_c/2 - 60 cm, -h_c/2, -h_c/2, -h_c/2 - 60 cm, -h_c/2 - 60 cm]
Y_W := [-b_c/2 + x[1], -b_c/2 + x[1], -b_c/2 + x[1] + b_b[1], -b_c/2 + x[1] + b_b[1], -b_c/2 + x[1]]
X_N := [-h_c/2 + x[2], -h_c/2 + x[2] + b_b[2], -h_c/2 + x[2] + b_b[2], -h_c/2 + x[2], -h_c/2 + x[2]]
Y_N := [b_c/2, b_c/2, b_c/2 + 60 cm, b_c/2 + 60 cm, b_c/2]
X_E := [h_c/2, h_c/2 + 60 cm, h_c/2 + 60 cm, h_c/2, h_c/2]
Y_E := [b_c/2 - x[3] - b_b[3], b_c/2 - x[3] - b_b[3], b_c/2 - x[3], b_c/2 - x[3], b_c/2 - x[3] - b_b[3]]
X_S := [h_c/2 - x[4] - b_b[4], h_c/2 - x[4], h_c/2 - x[4], h_c/2 - x[4] - b_b[4], h_c/2 - x[4] - b_b[4]]
Y_S := [-b_c/2 - 60 cm, -b_c/2 - 60 cm, -b_c/2, -b_c/2, -b_c/2 - 60 cm]
X_W :=
    if b_b[1] > 0
        X_W
    else
        [b_c/2, b_c/2]
Y_W :=
    if b_b[1] > 0
        Y_W
    else
        [h_c/2, h_c/2]
X_N :=
    if b_b[2] > 0
        X_N
    else
        [b_c/2, b_c/2]
Y_N :=
    if b_b[2] > 0
        Y_N
    else
        [h_c/2, h_c/2]
X_E :=
    if b_b[3] > 0
        X_E
    else
        [b_c/2, b_c/2]
Y_E :=
    if b_b[3] > 0
        Y_E
    else
        [h_c/2, h_c/2]
X_S :=
    if b_b[4] > 0
        X_S
    else
        [b_c/2, b_c/2]
Y_S :=
    if b_b[4] > 0
        Y_S
    else
        [h_c/2, h_c/2]
# [chart]
    X[6] := transpose(X)
    X[3] := transpose(X_N)
    X[5] := transpose(X_S)
    Y[6] := transpose(Y)
    Y[3] := transpose(Y_N)
    Y[5] := transpose(Y_S)
    X[2] := transpose(X_W)
    Y[2] := transpose(Y_W)
    X[4] := transpose(X_E)
    Y[4] := transpose(Y_E)
# Fig 1.Vista en planta del nudo Viga-Columna.
# Definición de las condiciones de confinamiento del nudo
# 15.2.7 | 15.2.8
VL :=
    if min(b_b[1], b_b[3]) > 0 cm
        1
    else
        2
    = 1
VT :=
    if min(b_b[2], b_b[4]) ≥ 3/4*h_c
        1
    else
        2
    = 2
# 18.8.3.2
V :=
    if min(b_b[1], b_b[3]) ≥ 3/4*b_c
        if min(b_b[2], b_b[4]) ≥ 3/4*h_c
            1
        else
            2
    else
        2
    = 2
# Definición del ancho y peralte para la viga
# 15.4.2.4
x := max(min(x[1], b_c - x[1] - b_b[1]), min(x[3], b_c - x[3] - b_b[3])) = 0.075 m
h_b := max(h_b[1], h_b[3]) = 0.5 m
b_b := max(b_b[1], b_b[3]) = 0.25 m
# 1. ACERO TRANSVERSAL REQUERIDO
# Máxima Fuerza Axial en las Columnas que llegan al nudo.
P_u := 800 kN
# Número de barras longitudinales alrededor del perímetro del núcleo confinado que estan soportadas por una esquina del estribo cerrado o gancho sísmico. (18.7.5.4)
n_l := 10
# Espaciamiento del acero de refuerzo transversal dentro del nudo viga-columna.
s := 8 cm
# Espaciamiento máximo del refuerzo transversal 18.7.5.3
s_max :=
    A ← 1/4*min(h_c, b_c)
    B ← 6*d_bc
    C ← 100 mm + ((350 mm - h_x)/3)
    s_0 ← max(100 mm, min(150 mm, C))
    s_max ← min(A, B, s_0)
    if V == 1
        150 mm
    else
        s_max
    = 10 cm
# Área de Refuerzo Transversal requerido 18.7.5.4
k_f := max(f'_c/(175 MPa) + 0.6, 1)
k_n := n_l/(n_l - 2)
A_sh :=
    A_g ← b_c*h_c
    A_ch ← (b_c - 2*r)*(h_c - 2*r)
    a ← 0.3*(A_g/A_ch - 1)*f'_c/f_yt
    b ← 0.09*f'_c/f_yt
    c ← 0.2*k_f*k_n*P_u/(f_yt*A_ch)
    if P_u ≤ 0.3*A_g*f'_c and f'_c ≤ 70 MPa
        A_sh ← max(a, b)*b_c*s
    else
        A_sh ← max(a, b, c)*b_c*s
    if V == 1
        A_sh*0.5
    else
        A_sh
    = 2.12308 cm^2
# Máximo Espaciamiento del Refuerzo Transversal dentro del nudo (18.7.5.3)
s_max = 10 cm
# Área de Refuerzo Transversal Requerido dentro del nudo en la dirección W-E (18.7.5.4)
A_sh = 2.12308 cm^2
# 2. RESISTENCIA AL CORTE DEL NUDO
# Factor de reducción de la resistencia
ϕ := 0.75
# Resistencia a Nominal a Flexion de las secciones
# Bloque de compresión según Whitney
β_1 :=
    if f'_c ≤ 28 MPa
        0.85
    if 28 MPa < f'_c ≤ 55 MPa
        0.85 - 0.05*(f'_c - 28*MPa)/(7 MPa)
    also if f'_c > 55 MPa
        0.65
# Distancia "d" a cada fila de refuerzo
d_s :=
    d[1] ← h_b - (r + d_vv + d_1[1]/2)
    d[2] ← d[1] - 25 mm - d_1[2]/2
    d[4] ← r + d_vv + d_1[4]/2
    d[3] ← d[4] + 25 mm + d_1[3]/2
    d
# Distancias "d" a cada fila de refuerzo
d_s1 := d_s
d_s2 := h_b - d_s
# Profundidad del eje neutro
c(a) := a/β_1
i := 1 .. 4
# Deformacion en cada fila de refuerzo
ε_s(i, a, d_s, h) :=
    if a == 0
        0.005
    else if a == h
        -0.003
    else
        0.003*(d_s[i] - c(a))/c(a)
# Esfuerzos en cada fila de refuerzo
f_s(i, a, d_s, h) := sign(ε_s(i, a, d_s, h))*min(|ε_s(i, a, d_s, h)|*E_s, f_y)
# Fuerzas en cada fila de refuezo
C_s(i, a, A_s, d_s, h) :=
    if f_s(i, a, d_s, h) ≥ 0
        A_s[i]*f_s(i, a, d_s, h)
    else
        A_s[i]*(f_s(i, a, d_s, h) - 0.85*f'_c)
# Fuerza en el concreto
C_c(a, b) := 0.85*f'_c*a*b
# Fuerza axial nominal de la sección
P_n(a, A_s, d_s, b, h) := (C_c(a, b) - sum(C_s(i, a, A_s, d_s, h), i = 1 .. 4))
# Momento nominal de la sección
M_n(a, A_s, d_s, b, h) := (C_c(a, b)*(h/2 - a/2) + sum(C_s(i, a, A_s, d_s, h)*(d_s[i] - h/2), i = 1 .. 4))
# Reistencia de las Secciones
# Áreas de refuerzo para la viga W-E
A_s :=
    f(x) ← π*x^2/4
    A[1] ← f(d_1[1])*n_1[1] + f(d_2[1])*n_2[1]
    A[2] ← f(d_1[2])*n_1[2] + f(d_2[2])*n_2[2]
    A[3] ← f(d_1[3])*n_1[3] + f(d_2[3])*n_2[3]
    A[4] ← f(d_1[4])*n_1[4] + f(d_2[4])*n_2[4]
    A
# Momento Negativo
a_1 :=
    a ← h_b
    while P_n(a, A_s, d_s1, b_b, h_b) > 0 kN
        a ← a - 0.01 mm
    a
    = 5.918 cm
M_N := 1.25*M_n(a_1, A_s, d_s1, b_b, h_b) = 164.784 kN*m
P_n(a_1, A_s, d_s1, b_b, h_b) = -0.0368158 kN
# Momento Positivo
a_2 :=
    a ← h_b
    while P_n(a, A_s, d_s2, b_b, h_b) > 0 kN
        a ← a - 0.01 mm
    a
    = 6.014 cm
M_P := 1.25*M_n(a_2, A_s, d_s2, b_b, h_b) = 133.87 kN*m
P_n(a_2, A_s, d_s2, b_b, h_b) = -0.10144 kN
# Cortante en la Columna generado por el desarrollo de los momentos nominales de la viga W-E de acuerdo a 18.8.4.1
V_col :=
    if VL == 1
        (M_N + M_P)/H_c
    else
        max(M_N, M_P)/H_c
    = 99.5513 kN
# Fuerza Cortante en el Nudo 18.8.4.1
V_u :=
    if VL == 1
        1.25*f_y*sum(A_s) - V_col
    else
        1.25*f_y*max(sum(A_s[i], i = 1 .. 2), sum(A_s[i], i = 3 .. 4)) - V_col
    = 639.351 kN
# Resistencia al Corte del Nudo 18.8.4.3
# Área efectiva de la sección transversal dentro del nudo Aj 15.4.2.4
# Ancho efectivo del nudo
b_j := min(b_b + h_c, b_b + 2*x)
A_j := h_c*b_j = 0.24 m^2
ϕV_n :=
    if C == 1
        if VL == 1
            if VT == 1
                V_n ← 1.7*λ*sqrt(f'_c*MPa)*A_j
            else
                V_n ← 1.2*λ*sqrt(f'_c*MPa)*A_j
        else
            if VT == 1
                V_n ← 1.2*λ*sqrt(f'_c*MPa)*A_j
            else
                V_n ← 1.*λ*sqrt(f'_c*MPa)*A_j
    else
        if VL == 1
            if VT == 1
                V_n ← 1.2*λ*sqrt(f'_c*MPa)*A_j
            else
                V_n ← 1*λ*sqrt(f'_c*MPa)*A_j
        else
            if VT == 1
                V_n ← 1*λ*sqrt(f'_c*MPa)*A_j
            else
                V_n ← 8*λ*sqrt(f'_c*psi)*A_j
    ϕ*V_n
    = 824.864 kN
Corte := if(V_u ≤ ϕV_n, "cumple", "no cumple")
# Resistencia Requerida (18.8.4.1)
V_u = 639.351 kN
# Resistencia al corte del nudo (18.8.4.2)
ϕV_n = 824.864 kN
Corte = "cumple"
# 3. RELACION DE RESISTENCIA A FLEXION COLUMNA-VIGA
# Fuerza axial que da la menor resistencia a flexión para la columna superior.
P_u1 := 0 kN
# Fuerza axial que da la menor resistencia a flexión para la columna inferior.
P_u2 := 500 kN
# RESISTENCIA A FLEXION PARA LAS COLUMNAS
# Recubrimiento para la columna
co := r + d_vc + d_bc/2
# Numero de barras de refuerzo por nivel
n_s1 := sum(n_b[:, i], i = 1 .. cols(n_b))
# Area del refuerzo
A_sb := π*d_bc^2/4
# Area de refuerzo por nivel
A_s1 := A_sb*n_s1
# Area toral de refuerzo
A_s := sum(A_s1)
d :=
    d[1] ← co
    for i ∈ 2 .. rows(n_b)
        Δ ← (h_c - 2*co)/(rows(n_b) - 1)
        d[i] ← d[i - 1] + Δ
    d
# Profundida del nivel de refuerzo
# Definimos el iterador i
i := 1 .. rows(n_b)
# Máxima fuerza axial
P_nmax := (0.85*f'_c*(b_c*h_c - A_s) + A_s*f_y)
P_nc(a, A_s, d_s, b, h) := min(C_c(a, b) - sum(C_s(i, a, A_s, d_s, h), i = 1 .. rows(n_b)), P_nmax)
M_nc(a, A_s, d_s, b, h) := (C_c(a, b)*(h/2 - a/2) + sum(C_s(i, a, A_s, d_s, h_c)*(d_s[i] - h/2), i = 1 .. rows(n_b)))
# Resistencias nominales para las columnas
# Columna Superior
a_c1 :=
    a ← h_c
    while P_n(a, A_s1, d, b_c, h_c) > P_u1
        a ← a - 0.01 mm
    a
    = 8.553 cm
M_C1 :=
    if C == 1
        M_nc(a_c1, A_s1, d, b_c, h_c)
    else
        0 kN*m
    = 0 kN*m
P_nc(a_c1, A_s1, d, b_c, h_c) = -0.05261 kN
# Columna Inferior
a_c2 :=
    a ← h_c
    while P_n(a, A_s1, d, b_c, h_c) > P_u2
        a ← a - 0.01 mm
    a
    = 12.914 cm
M_C2 := M_nc(a_c2, A_s1, d, b_c, h_c) = 389.84 kN*m
P_nc(a_c2, A_s1, d, b_c, h_c) = 499.884 kN
# Relación Columna-Viga 18.7.3.2
R_CV :=
    if VL == 1
        (M_C1 + M_C2)/(M_N + M_P)
    else
        (M_C1 + M_C2)/max(M_N, M_P)
    = 1.30532
Col∥Viga := if(R_CV ≥ 1.2, "cumple", "no cumple")
# Resistencias Nominales a Flexión
# Columna Superior
M_C1 = 0 kN*m
# Columna Inferior
M_C2 = 389.84 kN*m
# Viga Momento Negativo
M_N = 164.784 kN*m
# Viga Momento Positivo
M_P = 133.87 kN*m
# Relación de Resistencia a flexión Columna-Viga (18.7.3.2)
R_CV = 1.30532
Col∥Viga = "cumple"
# 4. PROFUNDIDAD DE NUDO Y LONGITUDES DE DESARROLLO
# Profundidad minima del nudo (18.8.2.3)
h_min :=
    d_b ← max(d_1, d_2)
    a ← 20/λ*d_b
    c ← h_b/2
    h ← max(a, c)
    if VL == 1
        h
    else
        "no corresponde"
    = 0.32 m
# Longitudes de desarrollo para barras en tensión 18.8.5
# Para barras que terminan en gancho estandar 18.8.5.1
l_dh :=
    d_b ← max(d_1, d_2)
    a ← f_y*d_b/(5.4*λ*sqrt(f'_c*MPa))
    l ← max(8*d_b, 150 mm, a)
    if VL == 1
        "no corresponde"
    else
        l
    = "no corresponde"
# Para barras rectas 18.8.5.3
l_d :=
    if VL == 1
        "no corresponde"
    else
        3.25*l_dh
    = "no corresponde"
# Profundidad mínima del nudo en la dirección W-E (18.8.2.3)
h_min = 0.32 m
# Longitudes de desarrollo para barras en tensión (18.8.5)
# Para barras que terminan en gancho estandar (18.8.5.1)
l_dh = "no corresponde"
# Para barras rectas (18.8.5.3)
l_d = "no corresponde"
