# Worksheet setting: ORIGIN = 1
# DISEÑO DE VIGAS DE CONCRETO REFORZADO ACI 318-19
# Materiales
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# Concreto
f'_c := 21 MPa
# Acero de refuerzo
f_y := 420 MPa
# Módulo de elasticidad
E_s := 200 GPa
# Dimensiones
# Longitud
L := 5.00 m
# Altura
h := 50 cm
# Ancho
b := 25 cm
# Recubrimiento al estribo
r := 4 cm
# Diametro del estribo
d_v := 10 mm
# Acero de Refuerzo longitudinal
# Refuerzo Continuo | Refuerzo Adicional
table  # each column defines a variable
    f | d_1 (mm) | n_1 | d_2 (mm) | n_2
    1 | 16 | 2 | 0 | 0
    2 | 0 | 0 | 0 | 0
    3 | 0 | 0 | 0 | 0
    4 | 16 | 2 | 0 | 0
end table
table  # each column defines a variable
    f | d_3 (mm) | n_3 | l_3 (m)
    1 | 16 | 1 | 1.2
    2 | 16 | 1 | 1.2
    3 | 12 | 1 | 2
end table
# Distribución de los estribos
# Distancia del apoyo al primer estribo
s_0 := 5 cm
# Sección extremo izquierdo
# Espaciamiento 1
s_1 := 10 cm
# Número de ramas del estribo
r_v1 := 2
# Longitud con espaciamiento 1
L_1 := 1.20 m
# Sección central
# Espaciamiento 2
s_2 := 25 cm
# Número de ramas del estribo
r_v2 := 2
# Sección extremo derecho
# Espaciamiento 3
s_3 := 10 cm
# Número de ramas del estribo
r_v3 := 2
# Longitud con espaciamiento 3
L_3 := 1.20 m
# Distancia "d" a cada fila de refuerzo
d_s :=
    d[1] ← h - (r + d_v + d_1[1]/2)
    d[2] ← d[1] - 25 mm - d_1[2]/2
    d[4] ← r + d_v + d_1[4]/2
    d[3] ← d[4] + 25 mm + d_1[3]/2
    d
# Puntos para gráfico
# Viga
A := [0; L; L; 0]
B := [0; 0; h; h]
A_1 :=
    k ← 0
    for j ∈ 1 .. last(d_1)
        if d_1[j] > 0
            k ← k + 1
        else
            k ← k
    for j ∈ 1 .. k
        A[1, j] ← 0
        A[2, j] ← L
    A
B_1 :=
    j ← 0
    for i ∈ 1 .. 4
        if d_1[i] > 0
            j ← j + 1
            B[1, j] ← d_s[i]
            B[2, j] ← d_s[i]
        else
            continue
    B
# Refuerzo Continuo
# Los iteradores que se definen dentro de un programa solo sirven dentro del programa.
A_2 :=
    if d_3[1] > 0
        A[1, 1] ← 0
        A[2, 1] ← l_3[1]
    else
        A[1, 1] ← 0
        A[2, 1] ← 0
    if d_3[2] > 0
        A[1, 2] ← L - l_3[2]
        A[2, 2] ← L
    else
        A[1, 2] ← 0
        A[2, 2] ← 0
    if d_3[3] > 0
        A[1, 3] ← (L - l_3[3])*0.5
        A[2, 3] ← (L + l_3[3])*0.5
    else
        A[1, 3] ← 0
        A[2, 3] ← 0
    A
B_2 :=
    for i ∈ 1 .. 2
        B[i, 1] ← d_s[1] - 25 mm - d_3[1]/2
        B[i, 2] ← d_s[1] - 25 mm - d_3[2]/2
        B[i, 3] ← d_s[4] + 25 mm + d_3[3]/2
    B
# Refuerzo adicional
# Cada termino de la matrix A2 se define independientemente usando los sufijos que indican su posicion dentro de la matrix
# Puntos para el grafico de disposicion de estribos
# Xest1 calcula la posicion de los estribos desde el extremo derecho al centro de la viga, Xest2 realiza lo mismo pero comenzando desde el extremo izquierdo
# El operador "while" repite un bucle hasta que se deje de cumplir cierta condición.
x_est1 :=
    l ← 0
    X[1, 1] ← s_0/m
    X[2, 1] ← s_0/m
    j ← 2
    while l < L/(2 m) - s_2/m
        if l < L_1/m
            X[1, j] ← X[1, j - 1] + s_1/m
            X[2, j] ← X[1, j]
        else
            X[1, j] ← X[1, j - 1] + s_2/m
            X[2, j] ← X[1, j]
        l ← X[1, j]
        j ← j + 1
    X
x_est2 :=
    l ← L/m
    X[1, 1] ← L/m - s_0/m
    X[2, 1] ← X[1, 1]
    j ← 2
    while l > L/(2 m) + s_3/m
        if l > L/m - L_3/m
            X[1, j] ← X[1, j - 1] - s_3/m
            X[2, j] ← X[1, j]
        else
            X[1, j] ← X[1, j - 1] - s_2/m
            X[2, j] ← X[1, j]
        l ← X[1, j]
        j ← j + 1
    X
# La funcion augment(a,b)combina las matrices a y b
x_est := augment(x_est1, x_est2)
# [chart]
    X[1] := A
    X[2] := A_1
    X[3] := A_2
    Y[1] := B
    Y[2] := B_1
    Y[3] := B_2
    X[4] := x_est
    Y[4] := [h - r; r]
# Fig 1. Disposición del acero de refuerzo.
# Refuerzo a flexión mínimo
A_smin :=
    d ← h - r
    f_y ← min(f_y, 550 MPa)
    a ← 0.25*sqrt(f'_c*MPa)/f_y*b*d
    b ← 1.4*MPa/f_y*b*d
    A_smin ← max(a, b)
    A_smin
    = 3.83333 cm^2
# 1. FLEXION
# Área de refuerzo a flexión mínima (9.6.1.2)
A_smin = 3.83333 cm^2
# Momentos últimos de diseño
# Parte superior de la envolvente
M_1 := [-93, 25, -90] kN*m
# Parte inferior de la envolvente
M_2 := [0, 56, 0] kN*m
# Parte Superior del diagrama de envolvente de momento
M_1 := transpose(M_1)/(kN*m)
L := L/m
M_2 := transpose(M_2)/(kN*m)
solve block
    # guess values
    D := 1
    E := 1
    F := 1
    # constraints
    E*(-M_1[1]) + F == 0
    (L/2)^2 + D*(L/2) + E*(-M_1[2]) + F == 0
    L^2 + D*L + E*(-M_1[3]) + F == 0
    # solver
    A_3 := find(D, E, F) = [-5.03219; -0.0536481; 4.98927]
end solve block
# Parte Inperior del diagrama de envolvente de momento
solve block
    # guess values
    D := 1
    E := 1
    F := 1
    # constraints
    E*(-M_2[1]) + F == 0
    (L/2)^2 + D*(L/2) + E*(-M_2[2]) + F == 0
    L^2 + D*L + E*(-M_2[3]) + F == 0
    # solver
    B_3 := find(D, E, F) = [-5; -0.111607; 0]
end solve block
# Puntos envolvente de momento
x :=
    for i ∈ 1 .. 101
        X[i] ← 0.01*(i - 1)*L
    X
y_1 := -(x^2 + A_3[1]*x + A_3[3])/A_3[2]
y_2 := -(x^2 + B_3[1]*x + B_3[3])/B_3[2]
# Resistencia a Flexion
# Longitud de desarrollo del refuerzo adicional
# (tabla 25.4.2.5) Factores de Modificación
# Concreto de peso liviano
λ := 1
# Epóxico
ψ_e := 1
# Ubicación
ψ_t := 1.0
l_d :=
    for i ∈ 1 .. 3
        if d_3[i] > (3/4) in
            l[i] ← f_y*ψ_t*ψ_e/(1.7*λ*sqrt(f'_c*MPa))*d_3[i]
        else
            l[i] ← f_y*ψ_t*ψ_e/(2.1*λ*sqrt(f'_c*MPa))*d_3[i]
    l
# Bloque de compresión según Whitney
β_1 :=
    if f'_c ≤ 28 MPa
        0.85
    if 28 MPa < f'_c ≤ 55 MPa
        0.85 - 0.05*(f'_c - 28*MPa)/(7 MPa)
    also if f'_c > 55 MPa
        0.65
# Resistencia Nominal a Momento de las secciones
# Distancias "d" a cada fila de refuerzo
d_s1 := d_s
d_s2 := h - d_s
# Profundidad del eje neutro
c(a) := a/β_1
i := 1 .. 4
# Deformacion en cada fila de refuerzo
ε_s(i, a, d_s) :=
    if a == 0
        0.005
    else if a == h
        -0.003
    else
        0.003*(d_s[i] - c(a))/c(a)
# Esfuerzos en cada fila de refuerzo
f_s(i, a, d_s) := sign(ε_s(i, a, d_s))*min(|ε_s(i, a, d_s)|*E_s, f_y)
# Fuerzas en cada fila de refuezo
C_s(i, a, A_s, d_s) :=
    if f_s(i, a, d_s) ≥ 0
        A_s[i]*f_s(i, a, d_s)
    else
        A_s[i]*(f_s(i, a, d_s) - 0.85*f'_c)
# Fuerza en el concreto
C_c(a) := 0.85*f'_c*a*b
# Deformacion en la fibra extrema a tracción
ε_t(a, d_s) :=
    if a == 0
        0.005
    else
        0.003*(max(d_s) - c(a))/c(a)
# Factor de reducción de resistencia
ϕ(a, d_s) :=
    if ε_t(a, d_s) ≥ 0.005
        0.9
    else if 0.002 ≤ ε_t(a, d_s) < 0.005
        0.65 + 0.25*(ε_t(a, d_s) - 0.002)/0.003
    else
        0.65
# Fuerza axial nominal de la sección
P_n(a, A_s, d_s) := (C_c(a) - sum(C_s(i, a, A_s, d_s), i = 1 .. 4))
# Momento nominal de la sección
M_n(a, A_s, d_s) := (C_c(a)*(h/2 - a/2) + sum(C_s(i, a, A_s, d_s)*(d_s[i] - h/2), i = 1 .. 4))
# Reistencia de las Secciones
# Sección izquierda
# Áreas de refuerzo
A_s1 :=
    f(x) ← π*x^2/4
    A[1] ← f(d_1[1])*n_1[1] + f(d_2[1])*n_2[1]
    A[2] ← f(d_1[2])*n_1[2] + f(d_2[2])*n_2[2] + f(d_3[1])*n_3[1]
    A[3] ← f(d_1[3])*n_1[3] + f(d_2[3])*n_2[3]
    A[4] ← f(d_1[4])*n_1[4] + f(d_2[4])*n_2[4]
    A
    = [4.02124; 2.01062; 0; 4.02124] cm^2
# Momento Negativo
a_1 :=
    a ← h
    while P_n(a, A_s1, d_s1) > 0 kN
        a ← a - 0.01 mm
    a
    = 5.217 cm
M_in := M_n(a_1, A_s1, d_s1) = 102.586 kN*m
P_n(a_1, A_s1, d_s1) = -0.0784022 kN
ϕ(a_1, d_s1) = 0.9
ε_t(a_1, d_s1) = 0.0186044
# Momento Positivo
a_2 :=
    a ← h
    while P_n(a, A_s1, d_s2) > 0.5 kN
        a ← a - 0.01 mm
    a
    = 4.93 cm
M_ip := M_n(a_2, A_s1, d_s2) = 73.3208 kN*m
P_n(a_2, A_s1, d_s2) = -0.889546 kN
ε_t(a_2, d_s2) = 0.0198621
ϕ(a_2, d_s2) = 0.9
# Sección central
# Áreas de refuerzo
A_s2 :=
    f(x) ← π*x^2/4
    A[1] ← f(d_1[1])*n_1[1] + f(d_2[1])*n_2[1]
    A[2] ← f(d_1[2])*n_1[2] + f(d_2[2])*n_2[2]
    A[3] ← f(d_1[3])*n_1[3] + f(d_2[3])*n_2[3] + f(d_3[3])*n_3[3]
    A[4] ← f(d_1[4])*n_1[4] + f(d_2[4])*n_2[4]
    A
    = [4.02124; 0; 1.13097; 4.02124] cm^2
# Momento Negativo
a_3 :=
    a ← h
    while P_n(a, A_s2, d_s1) > 0 kN
        a ← a - 0.01 mm
    a
    = 4.741 cm
M_cn := M_n(a_3, A_s2, d_s1) = 72.926 kN*m
P_n(a_3, A_s2, d_s1) = -0.063809 kN
ϕ(a_3, d_s1) = 0.9
ε_t(a_3, d_s1) = 0.0207735
# Momento Positivo
a_4 :=
    a ← h
    while P_n(a, A_s2, d_s2) > 0 kN
        a ← a - 0.01 mm
    a
    = 4.891 cm
M_cp := M_n(a_4, A_s2, d_s2) = 89.2182 kN*m
P_n(a_4, A_s2, d_s2) = -0.0559072 kN
ε_t(a_4, d_s2) = 0.0200444
ϕ(a_4, d_s2) = 0.9
# Sección derecha
# Áreas de refuerzo
A_s3 :=
    f(x) ← π*x^2/4
    A[1] ← f(d_1[1])*n_1[1] + f(d_2[1])*n_2[1]
    A[2] ← f(d_1[2])*n_1[2] + f(d_2[2])*n_2[2] + f(d_3[2])*n_3[2]
    A[3] ← f(d_1[3])*n_1[3] + f(d_2[3])*n_2[3]
    A[4] ← f(d_1[4])*n_1[4] + f(d_2[4])*n_2[4]
    A
    = [4.02124; 2.01062; 0; 4.02124] cm^2
# Momento Negativo
a_5 :=
    a ← h
    while P_n(a, A_s3, d_s1) > 0 kN
        a ← a - 0.01 mm
    a
    = 5.217 cm
M_dn := M_n(a_5, A_s3, d_s1) = 102.586 kN*m
P_n(a_5, A_s3, d_s1) = -0.0784022 kN
ϕ(a_5, d_s1) = 0.9
ε_t(a_5, d_s1) = 0.0186044
# Momento Positivo
a_6 :=
    a ← h
    while P_n(a, A_s3, d_s2) > 0 kN
        a ← a - 0.01 mm
    a
    = 4.93 cm
M_dp := M_n(a_6, A_s3, d_s2) = 73.3208 kN*m
P_n(a_6, A_s3, d_s2) = -0.889546 kN
ε_t(a_6, d_s2) = 0.0198621
ϕ(a_6, d_s2) = 0.9
# Puntos para el diagrama de momentos resistentes
x_1 :=
    x[1] ← 0*m
    x[2] ← l_3[1] - l_d[1]
    x[3] ← l_3[1]
    x[4] ← L*m - l_3[2]
    x[5] ← x[4] + l_d[2]
    x[6] ← L*m
    x/m
x_2 :=
    x[1] ← 0*m
    x[2] ← (L*m - l_3[3])*0.5
    x[3] ← x[2] + l_d[3]
    x[5] ← (L*m + l_3[3])*0.5
    x[4] ← x[5] - l_d[3]
    x[6] ← L*m
    x/m
y_3 :=
    y[1] ← M_in
    y[2] ← M_in
    y[3] ← M_cn
    y[4] ← M_cn
    y[5] ← M_dn
    y[6] ← M_dn
    0.9*y/(kN*m)
y_4 :=
    y[1] ← M_ip
    y[2] ← M_ip
    y[3] ← M_cp
    y[4] ← M_cp
    y[5] ← M_dp
    y[6] ← M_dp
    -0.9*y/(kN*m)
# Puntos para el diagrama de deformación en la fibra extrema a tensión
y_5 :=
    y[1] ← ε_t(a_1, d_s1)
    y[2] ← ε_t(a_1, d_s1)
    y[3] ← ε_t(a_3, d_s1)
    y[4] ← ε_t(a_3, d_s1)
    y[5] ← ε_t(a_5, d_s1)
    y[6] ← ε_t(a_5, d_s1)
    y
y_6 :=
    y[1] ← ε_t(a_2, d_s2)
    y[2] ← ε_t(a_2, d_s2)
    y[3] ← ε_t(a_4, d_s2)
    y[4] ← ε_t(a_4, d_s2)
    y[5] ← ε_t(a_6, d_s2)
    y[6] ← ε_t(a_6, d_s2)
    -y
# [chart]
    X[1] := x
    Y[1] := y_1
    Y[2] := y_2
    X[2] := x
    Y[3] := augment(y_3, y_4)
    X[3] := augment(x_1, x_2)
    Y[4] := [0; 0]
    X[4] := [0; L]
# Fig 2. Resistencia a flexión de la viga.
# [chart]
    X[1] := [0; L]
    X[2] := [0; L]
    Y[1] := [0.005; 0.005]
    Y[2] := [-0.005; -0.005]
    X[3] := augment(x_1, x_2)
    Y[3] := augment(y_5, y_6)
    Y[4] := [0; 0]
    X[4] := [0; L]
# Fig 3. Deformación en la fibra extrema a tensión.
# 2. CORTE
# Factor de concreto liviano
λ := 1
# Factor de reducción de la resistencia
ϕ := 0.75
# Acero de refuerzo transversal
f_yt := 420 MPa
# Resistencia requerida
V_u := [15, 50; -50.0, -20.0] kN
# Ancho del alma
b_w := b
# Peralte efectivo
d := max(d_s)
refuerzo :=
    λ ← 1
    V_u ← max(vectorize(|V_u|))
    if V_u ≤ 0.083*ϕ*λ*sqrt(f'_c*MPa)*b_w*d
        "no requiere"
    else
        "requiere"
# Verificación de la necesidad de refuerzo a corte segun 9.6.3.1
V_umax := max(vectorize(|V_u|))
# Acero mínimo por cortante 9.6.3.4
A_vmin(s) :=
    A ← max(0.062*sqrt(f'_c*MPa)*b_w/f_yt, 0.35*MPa*b_w/f_yt)*s
# Se define como función porque la variable "s" todavia no fue definida
# Área del refuerzo a corte (estribos)
A_v(r_v) := r_v*π*d_v^2/4
# Sección izquierda
A_v1 := A_v(r_v1) = 1.5708 cm^2
A_vmin1 := A_vmin(s_1) = 0.208333 cm^2
# Sección Central
A_v2 := A_v(r_v2) = 1.5708 cm^2
A_vmin2 := A_vmin(s_2) = 0.520833 cm^2
# Sección Derecha
A_v3 := A_v(r_v3) = 1.5708 cm^2
A_vmin3 := A_vmin(s_3) = 0.208333 cm^2
# CALCULO DE LA RESISTENCIA AL CORTE DE LA VIGA
# Factor de modificación por efecto del tamaño
λ_s := min(sqrt(2/(1 + d/(10 in))), 1)
# Área bruta de la sección
A_g := b*h
# (22.5.5.1.2)
# Cuantia de refuerzo longitudinal
k := 1 .. last(A_s1)
A_s1[k] :=
    if d_s[k] < 2/3*h
        0
    else
        A_s1[k]
    = [4.02124; 2.01062; 0; 0] cm^2
# Solo se considera el acero longitudinal que queda por encima de los 2/3 de la profudidad de la sección
A_s2[k] :=
    if d_s[k] < 1/3*h
        A_s2[k]
    else
        0
    = [0; 0; 1.13097; 4.02124] cm^2
A_s3[k] :=
    if d_s[k] < 2/3*h
        0
    else
        A_s3[k]
    = [4.02124; 2.01062; 0; 0] cm^2
# Peralte efectivo
d := max(d_s)
ρ_w3 := sum(A_s3)/(b_w*d) = 0.00545869
ρ_w1 := sum(A_s1)/(b_w*d) = 0.00545869
ρ_w2 := sum(A_s2)/(b_w*d) = 0.00466264
# Resistencia del concreto
V_c1 :=
    if A_v1 ≥ A_vmin1
        (8*λ*ρ_w1^(1/3)*min(sqrt(f'_c*psi), 100 psi))*b_w*d
    else
        (8*λ_s*λ*ρ_w1^(1/3)*min(sqrt(f'_c*psi), 100 psi))*b_w*d
    = 59.2267 kN
V_c2 :=
    if A_v2 ≥ A_vmin2
        (8*λ*ρ_w2^(1/3)*min(sqrt(f'_c*psi), 100 psi))*b_w*d
    else
        (8*λ_s*λ*ρ_w2^(1/3)*min(sqrt(f'_c*psi), 100 psi))*b_w*d
    = 56.1951 kN
V_c3 :=
    if A_v3 ≥ A_vmin3
        (8*λ*ρ_w3^(1/3)*min(sqrt(f'_c*psi), 100 psi))*b_w*d
    else
        (8*λ_s*λ*ρ_w3^(1/3)*min(sqrt(f'_c*psi), 100 psi))*b_w*d
    = 59.2267 kN
V_c := min(V_c1, V_c2, V_c3)
# Resistencia del concreto 22.5.5.1.1
V_c1 := min(5*λ*sqrt(f'_c*psi)*b_w*d, V_c1)
V_c2 := min(5*λ*sqrt(f'_c*psi)*b_w*d, V_c2)
V_c3 := min(5*λ*sqrt(f'_c*psi)*b_w*d, V_c3)
# Resistencia acero de refuerzo (22.5.8.5.3)
V_s1 := A_v1*f_yt*d/s_1 = 291.603 kN
V_s2 := A_v2*f_yt*d/s_2 = 116.641 kN
V_s3 := A_v3*f_yt*d/s_3 = 291.603 kN
V_n1 := ϕ*(V_c1 + V_s1) = 263.122 kN
V_n2 := ϕ*(V_c2 + V_s2) = 129.627 kN
V_n3 := ϕ*(V_c2 + V_s3) = 260.848 kN
# Verificación de las dimensiones de la sección transversal (22.5.1.2)
seccion := if(V_umax ≤ ϕ*(V_c + 8*sqrt(f'_c*psi)*b_w*d), "cumple", "no cumple")
# Máaximo espaciamiento de las ramas del refuerzo a cortante (9.7.6.2.2)
V_s := V_umax - V_c = -6.19511 kN
s_max1 :=
    if V_s ≤ 0.33*sqrt(f'_c*MPa)*b_w*d
        min(d/2, 60 cm)
    else
        min(d/4, 30 cm)
# Cuando se coloca un texto como resultado este debe ir entre comillas ""
s_max2 :=
    if V_s ≤ 0.33*sqrt(f'_c*MPa)*b_w*d
        min(d, 60 cm)
    else
        min(d/2, 30 cm)
# PUNTOS PARA GRAFICA DE LA RESISTENCIA AL CORTE
x_5 := transpose([0, L_1/m, (L_1 + s_2)/m, L - L_3/m - s_2/m, L - L_3/m, L]) = [0; 1.2; 1.45; 3.55; 3.8; 5]  # y
y_5 := transpose([V_n1, V_n1, V_n2, V_n2, V_n3, V_n3; -V_n1, -V_n1, -V_n2, -V_n2, -V_n3, -V_n3]*1/kN)
# Se requiere refuerzo por corte (9.6.3)
refuerzo = "requiere"
# Verificación de las dimensiones de la sección transversal (22.5.1.2)
V_umax = 50 kN
# <
ϕ*(V_c + 0.66*sqrt(f'_c*MPa)*b_w*d) = 292.802 kN
seccion = "cumple"
# Refuerzo mínimo por corte (9.6.3.4)
# Área refuerzo por corte sección izquierda
A_v1 = 1.5708 cm^2
# Área mínima de refuerzo
A_vmin1 = 0.208333 cm^2
# Área refuerzo por corte sección central
A_v2 = 1.5708 cm^2
# Área mínima de refuerzo
A_vmin2 = 0.520833 cm^2
# Área refuerzo por corte sección extremo derecho
A_v3 = 1.5708 cm^2
# Área mínima de refuerzo
A_vmin3 = 0.208333 cm^2
# Espacimiento máximo de las ramas del refuerzo a corte (9.7.6.2.2)
# A lo largo de la viga
s_max1 = 0.221 m
# En la sección
s_max2 = 0.442 m
# [chart]
    X[1] := x_5
    Y[1] := y_5
    X[2] := [0; L]
    Y[2] := transpose(V_u)/kN
    Y[4] := [0; 0]
    X[4] := [0; L]
# Fig 4. Resistencia al corte de la viga.
# 2. TORSION
# Espaciamiento del refuerzo por torsion
s := 17 cm
# Resistencia requerida
T_u := [13, -20]*kN*m
# Area encerrada por el perimetro de la sección
A_cp := h*b
# Perímetro de la sección
p_cp := 2*(h + b) = 1.5 m
# Máximo momento de torsión
T_umax := max(vectorize(|T_u|))
# Umbral de Torsion (22.7.4.1)
T_th := 0.083*λ*(A_cp^2/p_cp)*min(sqrt(f'_c*MPa), 8.3 MPa)
Torsion := if(T_umax < T_th, "no se considera", "se considera")
# Torsión de Fisuración (22.7.5)
T_cr := 0.33*λ*(A_cp^2/p_cp)*min(sqrt(f'_c*MPa), 8.3 MPa)
# Verificación de las dimensiones de la sección transversal (22.7.7)
# Area encerrada por el estribo exterior "Aoh"
A_oh := (b - r - d_v/2)*(h - r - d_v/2) = 932.75 cm*cm
# Perímetro del estribo localizado mas cerca del exterior de la sección "ph"
p_h := 2*(b + h - 2*(r + d_v/2)) = 1.32 m
T_1 := sqrt((V_umax/(b_w*d))^2 + (T_umax*p_h/(1.7*A_oh^2))^2) = 1.8414 MPa
T_2 := ϕ*(V_c/(b_w*d) + 0.66*sqrt(f'_c*MPa)) = 2.64979 MPa
seccion := if(T_1 ≤ T_2, "cumple", "no cumple")
A_tmin(s) :=
    if Torsion == "se considera"
        max(0.062*sqrt(f'_c*MPa)*b_w*s/f_yt, 0.35*b_w*s*MPa/f_yt)
    else
        "no requiere"
A_lmin(A_t, s) :=
    A ← 0.42*sqrt(f'_c*MPa)*A_cp/f_y - (A_t/s)*p_h*f_yt/f_y
    B ← 0.42*sqrt(f'_c*MPa)*A_cp/f_y - (0.175 MPa*b_w/f_yt)*p_h*f_yt/f_y
    if Torsion == "se considera"
        min(A, B)
    else
        "no requiere"
# Área total encerrada por la trayectoria del flujo de cortante torsional
A_o := 0.85*A_oh = 0.0792838 m^2
# Ángulo de la diagonal a compresión
θ := 45°
# Umbral de Torsion (22.7.4.1)
T_th = 3.96202 kN*m
Torsion = "se considera"
# Torsión de Fisuración (22.7.5)
T_cr = 15.7526 kN*m
# Verificación de las dimensiones de la sección transversal (22.7.7)
sqrt((V_umax/(b_w*d))^2 + (T_umax*p_h/(1.7*A_oh^2))^2) = 1.8414 MPa
# <
ϕ*(V_c/(b_w*d) + 0.66*sqrt(f'_c*MPa)) = 2.64979 MPa
seccion = "cumple"
# Refuerzo adicional por Torsión (22.7.6.1)
# Refuerzo transversal
A_t := s*T_umax/(ϕ*2*A_o*f_yt*cot(θ)) = 0.680698 cm^2
# Refuerzo longitudinal
A_l := p_h*T_umax/(ϕ*2*A_o*f_y*tan(θ)) = 5.28542 cm^2
# Refuerzo a torsión mínimo (9.6.4)
# Refuerzo transversal
A_tmin(s) = 0.354167 cm^2
# Refuerzo longitudinal
A_lmin(A_t, s) = 0.442803 cm^2
# Máximo espaciamiento del refuerzo transversal para torsión (9.7.6.3.3)
s_tmax := min(p_h/8, 30 cm) = 0.165 m
