# Diseño de Vigas por Corte
# Método en Base a la Norma E.060
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# 01. Datos Pre-Liminares / De Entrada
# 01.01. Propiedades Geométricas de la Sección
b := 0.30 m  # Ancho de la Viga
h := 0.70 m  # Peralte Total de la Viga
Núm__Capas := 1  # Número de Capas de la Sección: A) 1, B) 2 & C) 3
r :=
    if Núm__Capas == 1
        6 cm
    else if Núm__Capas == 2
        9 cm
    else if Núm__Capas == 3
        12 cm
    = 0.06 m
d := h - r = 0.64 m
r = 0.06 m  # Recubrimiento Inferior de la Viga
d = 0.64 m  # Peralte Efectivo de la Viga
L := 6.90 m  # Luz de Eje a Eje de la Viga
l_n := 6.50 m  # Luz Libre de la Viga
A_t := 3.50 m  # Ancho Tributario del Elemento
Sistema__Estructural := "Muros Estructurales"  # Tipo de Sistema Estructural: A) Pórticos, B) Dual Tipo I, C) Dual Tipo II o D) Muros Estructurales
# 01.02. Propiedades Mecánicas de los Materiales
f'_c := 210 kgf/cm^2  # Resistencia a la Compresión del Concreto
f_y := 4200 kgf/cm^2  # Esfuerzo Cedente del Acero Corrugado
γ_c := 2.40 tonnef/m^3  # Peso Propio del Concreto
ϕ_Flexión := 0.90  # Factor de Reducción por Capacidad a Flexión
ϕ_Corte := 0.85  # Factor de Reducción por Capacidad a Corte
# 02. Metrado de Cargas
# 02.01. Peso Propio de la Viga
w_viga := γ_c*b*h
w_viga = 0.504 tonnef/m  # Carga del Peso Propio de la Viga por Metro Lineal
# 02.02. Peso de Losas
Tipo__de_Losa := "Losa Aligerada"  # Tipo de Losa: A) Aligerada o B) Maciza
Tipo__de_Aligerado := "02 Direcciones"  # Tipo Aligerado: A) 01 Dirección, B) 02 Direcciones o C) Ninguna
e_losa := 0.25 m  # Espesor de la Losa en Cuestión
w_losa :=
    if Tipo__de_Losa == "Losa Maciza"
        γ_c*e_losa
    else if Tipo__de_Losa == "Losa Aligerada" and Tipo__de_Aligerado == "01 Dirección"
        if e_losa == 0.17 m
            0.28*tonnef/m^2
        else if e_losa == 0.20 m
            0.30*tonnef/m^2
        else if e_losa == 0.25 m
            0.35*tonnef/m^2
        else if e_losa == 0.30 m
            0.42*tonnef/m^2
    else if Tipo__de_Losa == "Losa Aligerada" and Tipo__de_Aligerado == "02 Direcciones"
        γ_c*(0.05 m + (e_losa - 0.05 m)*0.25 + (e_losa - 0.05 m)*0.25*0.75)
w_losa = 0.33 tonnef/m^2  # Carga de Losa por Metro Cuadrado
# 02.03. Peso de Tabiquería
w_tabiquería := 0.210 tonnef/m^2  # Carga de Tabiquería por Metro Cuadrado
# 02.03. Peso de Acabados
w_acabados := 0.100 tonnef/m^2  # Carga de Acabados por Metro Cuadrado
# 02.04. Sobrecarga de Uso o Techo
w_uso := 0.500 tonnef/m^2  # Sobrecarga de Uso de Edificación o Techos según Norma
# 02.05. Resumen de Cargas
w_m := w_viga + (w_losa + w_tabiquería + w_acabados)*A_t
w_v := w_uso*A_t
w_u := 1.25*(w_m + w_v)
w_m = 2.744 tonnef/m  # Carga Muerta por Metro Lineal
w_v = 1.75 tonnef/m  # Carga Viva por Metro Lineal
w_u = 5.6175 tonnef/m  # Carga Última Amplificada por Metro Lineal
# 03. Cortante Sísmico en las Vigas
# 03.01. Efecto del Cortante Sísmico según Norma
# 03.01.01. Caso I: Sismo de Izquierda a Derecha
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# 1. Extremo Izquierdo: Acero
# Inferior
# 2. Extremo Derecho: Acero
# Superior
ϕ_dbi_inf := (3/4) in
ϕ_dbd_sup := (3/4) in
Núm__Varillas_i_inf := 3
Núm__Varillas_d_sup := 5
Núm__Capas_i_inf := 1
Núm__Capas_d_sup := 1
A_si_inf := (π*ϕ_dbi_inf^2/4)*Núm__Varillas_i_inf
A_sd_sup := (π*ϕ_dbd_sup^2/4)*Núm__Varillas_d_sup
d_i_inf := h - {
    if Núm__Capas_i_inf == 1
        6 cm
    else if Núm__Capas_i_inf == 2
        9 cm
}
d_d_sup := h - {
    if Núm__Capas_d_sup == 1
        6 cm
    else if Núm__Capas_d_sup == 2
        9 cm
}
a_i_inf := A_si_inf*f_y/(0.85*f'_c*b)
a_d_sup := A_sd_sup*f_y/(0.85*f'_c*b)
M_ni_inf := A_si_inf*f_y*(d_i_inf - a_i_inf/2)
M_nd_sup := A_sd_sup*f_y*(d_d_sup - a_d_sup/2)
M_pri_inf :=
    if Sistema__Estructural == "Pórticos"
        1.25*M_ni_inf
    else if Sistema__Estructural == "Dual Tipo I"
        M_ni_inf
    else if Sistema__Estructural == "Dual Tipo II"
        1.25*M_ni_inf
    else if Sistema__Estructural == "Muros Estructurales"
        M_ni_inf
M_prd_sup :=
    if Sistema__Estructural == "Pórticos"
        1.25*M_nd_sup
    else if Sistema__Estructural == "Dual Tipo I"
        M_nd_sup
    else if Sistema__Estructural == "Dual Tipo II"
        1.25*M_nd_sup
    else if Sistema__Estructural == "Muros Estructurales"
        M_nd_sup
A_si_inf = 8.55069 cm^2
A_sd_sup = 14.2511 cm^2
d_i_inf = 0.64 m
d_d_sup = 0.64 m
M_ni_inf = 21.78 tonnef*m
M_nd_sup = 34.962 tonnef*m
M_pri_inf = 21.78 tonnef*m
M_prd_sup = 34.962 tonnef*m
V_ud := (M_pri_inf + M_prd_sup)/l_n + w_u*l_n/2 = 26.9864 tonnef
# 03.01.02. Caso II: Sismo de Derecha a Izquierda
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# 1. Extremo Izquierdo: Acero
# Superior
# 2. Extremo Derecho: Acero
# Inferior
ϕ_dbi_sup := (3/4) in
ϕ_dbd_inf := (3/4) in
Núm__Varillas_i_sup := 3
Núm__Varillas_d_inf := 3
Núm__Capas_i_sup := 1
Núm__Capas_d_inf := 1
A_si_sup := (π*ϕ_dbi_sup^2/4)*Núm__Varillas_i_sup
A_sd_inf := (π*ϕ_dbd_inf^2/4)*Núm__Varillas_d_inf
d_i_sup := h - {
    if Núm__Capas_i_sup == 1
        6 cm
    else if Núm__Capas_i_sup == 2
        9 cm
}
d_d_inf := h - {
    if Núm__Capas_d_inf == 1
        6 cm
    else if Núm__Capas_d_inf == 2
        9 cm
}
a_i_sup := A_si_sup*f_y/(0.85*f'_c*b)
a_d_inf := A_sd_inf*f_y/(0.85*f'_c*b)
M_ni_sup := A_si_sup*f_y*(d_i_sup - a_i_sup/2)
M_nd_inf := A_sd_inf*f_y*(d_d_inf - a_d_inf/2)
M_pri_sup :=
    if Sistema__Estructural == "Pórticos"
        1.25*M_ni_sup
    else if Sistema__Estructural == "Dual Tipo I"
        M_ni_sup
    else if Sistema__Estructural == "Dual Tipo II"
        1.25*M_ni_sup
    else if Sistema__Estructural == "Muros Estructurales"
        M_ni_sup
M_prd_inf :=
    if Sistema__Estructural == "Pórticos"
        1.25*M_nd_inf
    else if Sistema__Estructural == "Dual Tipo I"
        M_nd_inf
    else if Sistema__Estructural == "Dual Tipo II"
        1.25*M_nd_inf
    else if Sistema__Estructural == "Muros Estructurales"
        M_nd_inf
A_si_sup = 8.55069 cm^2
A_sd_inf = 8.55069 cm^2
d_i_sup = 0.64 m
d_d_inf = 0.64 m
M_ni_sup = 21.78 tonnef*m
M_nd_inf = 21.78 tonnef*m
M_pri_sup = 21.78 tonnef*m
M_prd_inf = 21.78 tonnef*m
V_ui := (M_pri_sup + M_prd_inf)/l_n + w_u*l_n/2 = 24.9584 tonnef
# 03.02. Cortantes Máximos de Diseño
# 03.02.01. Resultados según Artículos 21.4.3. y/o 21.5.4.1.
V_ud = 26.9864 tonnef  # Fuerza Cortante Última (Sismo Izq. a Der.)
V_ui = 24.9584 tonnef  # Fuerza Cortante Última (Sismo Der. a Izq.)
# 03.02.02. Resultados según Programa (Etabs o SAP 2000)
V_ud_etabs := 14.018 tonnef  # Fuerza Cortante Última (Sismo Izq. a Der.)
V_ui_etabs := 13.413 tonnef  # Fuerza Cortante Última (Sismo Der. a Izq.)
# 03.02.03. Resultados Finales
V_ud_1 := max(V_ud, V_ud_etabs)
V_ui_1 := max(V_ui, V_ui_etabs)
V_u := max(V_ud_1, V_ui_1)
V_ud_1 = 26.9864 tonnef  # Fuerza Cortante Última (Lado Derecho)
V_ui_1 = 24.9584 tonnef  # Fuerza Cortante Última (Lado Izquierdo)
V_u = 26.9864 tonnef  # Fuerza Cortante Última
# 04. Cortante Resistente en las Vigas
ϕ_Corte*(V_c + V_s) ≥ V_u
# 04.01. Cortante Resistente del Concreto - Artículo 11.3.1.1.
V_c := 0.53*sqrt(f'_c*kgf/cm^2)*b*d
Verificación__Estribos :=
    if ϕ_Corte*V_c ≥ V_u
        "No Requiere Estribos, Refuerzo Mínimo"
    else
        "Requiere Uso de Estribos"
V_s :=
    if ϕ_Corte*V_c ≥ V_u
        0 tonnef
    else
        V_u/ϕ_Corte - V_c
V_s_max := 2.10*sqrt(f'_c*kgf/cm^2)*b*d
Verificación__Cortante_Máximo :=
    if V_s ≤ V_s_max
        "Si Cumple"
    else
        "No Cumple, Cambiar Sección"
Tipo__de_Falla :=
    if V_s ≤ V_s_max
        "Falla Dúctil"
    else
        "Falla Frágil"
V_c = 14.7464 tonnef  # Cortante Resistente del Concreto
Verificación__Estribos = "Requiere Uso de Estribos"
# 04.02. Cortante Resistente del Acero
V_s = 17.0023 tonnef  # Cortante Resistente del Acero
V_s_max = 58.4292 tonnef  # Cortante Resistente Máximo del Acero - Artículo 11.5.7.9.
Verificación__Cortante_Máximo = "Si Cumple"
Tipo__de_Falla = "Falla Dúctil"
# 05. Separación de Estribos por Confinamiento & Zona Central
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# 05.01. Límites para el Espaciamiento Máximo - Artículo 11.5.5.
V_s_lim := 1.10*sqrt(f'_c*kgf/cm^2)*b*d
s_máx_1 := d/2
s_máx_2 := 600 mm
s_máx :=
    if V_s < V_s_lim
        min(s_máx_1, s_máx_2)
    else if V_s ≥ V_s_lim
        min(s_máx_1, s_máx_2)/2
V_s_lim = 30.6058 tonnef  # Cortante del Acero Límite para Espaciamiento Máximo
s_máx_1 = 0.32 m  # Espaciamiento Máximo 01 en la Zona de Confinamiento
s_máx_2 = 0.6 m  # Espaciamiento Máximo 02 en la Zona de Confinamiento
s_máx = 0.32 m  # Espaciamiento Máximo en la Zona de Confinamiento
# 05.02. Acero a Colocar en los Estribos
ϕ_db_est := (3/8) in
A_db_est := π*ϕ_db_est^2/4 = 0.712557 cm^2
A_v := 2*A_db_est
A_v = 1.42511 cm^2  # Área de Refuerzo del Cortante con Espaciamiento "s"
# 05.03. Separación de Estribos
# 05.03.01. Separación en la Zona de Confinamiento Inicial
s_o_inicial := A_v*f_y*d/V_s
l_o := 2*h
s_1 := d/4
s_3 := 24*ϕ_db_est
s_4 := 300 mm
s_2 :=
    if Sistema__Estructural == "Pórticos"
        8*max(ϕ_dbi_inf, ϕ_dbi_sup, ϕ_dbd_inf, ϕ_dbd_sup)
    else if Sistema__Estructural == "Dual Tipo I"
        10*max(ϕ_dbi_inf, ϕ_dbi_sup, ϕ_dbd_inf, ϕ_dbd_sup)
    else if Sistema__Estructural == "Dual Tipo II"
        8*max(ϕ_dbi_inf, ϕ_dbi_sup, ϕ_dbd_inf, ϕ_dbd_sup)
    else if Sistema__Estructural == "Muros Estructurales"
        10*max(ϕ_dbi_inf, ϕ_dbi_sup, ϕ_dbd_inf, ϕ_dbd_sup)
s_o_inicial = 0.225305 m  # Separación de Estribos Inicial en la Zona de Confinamiento
l_o = 1.4 m  # Longitud de la Zona de Confinamiento
# 05.03.02. Requerimientos Sísmicos de Estribos en Vigas
s_1 = 0.16 m  # Espaciamiento de Estribos 01 según Efecto Sísmico
s_2 = 0.1905 m  # Espaciamiento de Estribos 02 según Efecto Sísmico
s_3 = 0.2286 m  # Espaciamiento de Estribos 03 según Efecto Sísmico
s_4 = 0.3 m  # Espaciamiento de Estribos 04 según Efecto Sísmico
# 05.03.03. Resultados Finales en la Zona de Confinamiento
s_o := Floor({
    if s_o_inicial == 0
        min(s_1, s_2, s_3, s_4)
    else
        min(s_o_inicial, s_1, s_2, s_3, s_4)
}, 5.00 cm)
s_c := Floor(d/2, 5.00 cm)
l_c := l_n - 10.00 cm - 2*l_o
Núm__est_ZC := floor(l_o/s_o)
Núm__est_C := floor(l_c/s_c)
s_o = 15 cm  # Separación de Estribos Final en la Zona de Confinamiento
Núm__est_ZC = 9  # Número de Estribos en la Zona de Confinamiento
# 05.03.04. Resultados Finales en la Zona Central
s_c = 30 cm  # Separación de Estribos Final en la Zona Central
l_c = 3.6 m  # Longitud de la Zona Central
Núm__est_C = 12  # Número de Estribos en la Zona Central
# 05.04. Verificaciones Finales
# 05.04.01. Verificación del Espaciamiento Máximo del Refuerzo Cortante
Verificación__Esp_Max :=
    if s_o ≤ s_máx
        "Si Cumple"
    else
        "No Cumple, Verificar"
V_u_max := 0.50*ϕ_Corte*V_c
Verificación__Uso_Refuerzo_Mínimo_Cortante :=
    if V_u > V_u_max
        "Requiere Área Mínima de Refuerzo"
    else
        "No Requiere Área Mínima de Refuerzo"
A_v_min :=
    if V_u ≤ V_u_max
        0.00 cm^2
    else
        max(0.20*sqrt(f'_c*kgf/cm^2)*b*s_o/f_y, (3.50 kgf/cm^2)*b*s_o/f_y)
Verificación__Refuerzo_Mínimo_Cortante :=
    if V_u ≤ V_u_max
        "Si Cumple"
    else
        if A_v ≥ A_v_min
            "Si Cumple"
        else
            "No Cumple, Verificar"
Verificación__Esp_Max = "Si Cumple"
# 05.04.02. Verificación del Refuerzo Mínimo de Cortante - Artículo 11.5.6.
V_u_max = 6.26723 tonnef  # Cortante Último Máximo según Artículo 11.5.6.1.
Verificación__Uso_Refuerzo_Mínimo_Cortante = "Requiere Área Mínima de Refuerzo"
A_v_min = 0.375 cm^2  # Área de Refuerzo del Cortante Mínima
Verificación__Refuerzo_Mínimo_Cortante = "Si Cumple"
# 06. Resistencia Final al Cortante
ϕ_Corte*(V_c + V_s) ≥ V_u
V_s_final := A_v*f_y*d/s_o
V_n := ϕ_Corte*(V_c + V_s_final)
Verificación__Resistencia_Corte_Nominal :=
    if V_n ≥ V_u
        "Si Cumple"
    else
        "No Cumple, Verificar"
V_c = 14.7464 tonnef  # Resistencia al Corte del Concreto
V_s_final = 25.5381 tonnef  # Resistencia al Corte Final del Acero
V_n = 34.2418 tonnef  # Resistencia Nominal al Cortante (Reducida)
V_u = 26.9864 tonnef  # Solicitación de Corte Última (Amplificada)
Verificación__Resistencia_Corte_Nominal = "Si Cumple"
