# Diseño Convencional de Vigas Peraltadas a Flexión
# Método en Base a la Norma E.060
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# 01. Datos Pre-Liminares / De Entrada
# 01.01. Propiedades Geométricas de la Sección
b := 0.30 m  # Ancho de la Viga
h := 0.70 m  # Peralte Total de la Viga
Núm__Capas := 1  # Número de Capas de la Sección: A) 1, B) 2 & C) 3
r :=
    if Núm__Capas == 1
        6 cm
    else if Núm__Capas == 2
        9 cm
    else if Núm__Capas == 3
        12 cm
    = 0.06 m
d := h - r = 0.64 m
r = 0.06 m  # Recubrimiento Inferior de la Viga
d = 0.64 m  # Peralte Efectivo de la Viga
d' := 0.06 m  # Recubrimiento Superior de la Viga
# 01.02. Propiedades Mecánicas de los Materiales
f'_c := 210 kgf/cm^2  # Resistencia a la Compresión del Concreto
E_c := 15000*sqrt(f'_c*kgf/cm^2)
β_1 :=
    if 170*kgf/cm^2 ≤ f'_c ≤ 280*kgf/cm^2
        0.85
    else if f'_c ≤ 350*kgf/cm^2
        0.80
    else if f'_c ≤ 420*kgf/cm^2
        0.75
    else if f'_c ≤ 490*kgf/cm^2
        0.70
    else if f'_c > 490*kgf/cm^2
        0.65
    = 0.85
E_c = 217371 kgf/cm^2  # Módulo de Elasticidad del Concreto
f_y := 4200 kgf/cm^2  # Esfuerzo Cedente del Acero Corrugado
E_s := 2.1*10^6 kgf/cm^2  # Módulo de Elasticidad del Acero Corrugado
ε_c := 0.0030  # Deformación Unitaria del Concreto a Compresión
ε_sy := 0.0021  # Deformación Unitaria del Acero a Fluencia
β_1 = 0.85  # Factor de Relación de Profundidad del Bloque Rectangular Equivalente de Esfuerzos de Compresión
ϕ_Flexión := 0.90  # Factor de Reducción por Capacidad a Flexión
M_u := 0.00 tonnef*m  # Momento Actuante sobre la Sección
# 02. Refuerzo Mínimo en Elementos Sometidos a Flexión (Artículo 10.5.)
# 02.01. Refuerzo Mínimo Según Artículo 10.5.1.
f_r := 2*sqrt(f'_c*kgf/cm^2) = 28.9828 kgf/cm^2
I_g := b*h^3/12 = 857500 cm^4
Y_t := h/2 = 0.35 m
M_cr := f_r*I_g/Y_t = 7.10077 tonnef*m
ϕM_n := 1.20*M_cr = 8.52093 tonnef*m
ρ_mín_1 := 0.85*f'_c/f_y*(1 - sqrt(1 - 2*ϕM_n/(ϕ_Flexión*b*d^2)/(0.85*f'_c))) = 0.00187588
As_mín_1 := ρ_mín_1*b*d
f_r = 28.9828 kgf/cm^2  # Módulo de Ruptura del Concreto
I_g = 857500 cm^4  # Inercia Bruta de la Sección
Y_t = 0.35 m  # Centroide de la Sección
M_cr = 7.10077 tonnef*m  # Momento de Agrietamiento de la Sección
ϕM_n = 8.52093 tonnef*m  # Verificación de ϕM_n ≥ 1.20*M_cr
ρ_mín_1 = 0.00187588  # Cuantía Mínima de Refuerzo por Agrietamiento
As_mín_1 = 3.6017 cm^2  # Acero Mínimo por Agrietamiento
# 02.02. Refuerzo Mínimo Según Artículo 10.5.2.
ρ_mín := 0.70*sqrt(f'_c*kgf/cm^2)/f_y
As_mín_2 := ρ_mín*b*d
As_mín := max(As_mín_1, As_mín_2)
ρ_mín = 0.00241523  # Cuantía Mínima de Refuerzo a Tracción
As_mín_2 = 4.63724 cm^2  # Acero Mínimo por Tracción
# 02.03. Refuerzo Mínimo Requerido
As_mín = 4.63724 cm^2  # Acero Mínimo de Refuerzo Requerido
# 03. Refuerzo Máximo en Elementos Sometidos a Flexión (Artículo 10.3.4.)
ρ_b := 0.85*β_1*f'_c/f_y*(ε_c*E_s/(ε_c*E_s + f_y))
A_sb := ρ_b*b*d
As_máx := 0.75*A_sb
ρ_b = 0.021675  # Cuantía Balanceada
A_sb = 41.616 cm^2  # Acero producido por la Falla Balanceada
As_máx = 31.212 cm^2  # Acero Máximo de Refuerzo Requerido
# 04. Refuerzo de Acero Requerido y sus Verificaciones
# 04.01. Refuerzo en la Zona Traccionada
A := 0.59
B := -1
D_1 := M_u/(ϕ_Flexión*f'_c*b*d^2)
A*w^2 + B*w + D == 0
w_1 := (-B + sqrt(B^2 - 4*A*D_1))/(2*A) = 1.69492
w_2 := (-B - sqrt(B^2 - 4*A*D_1))/(2*A) = 0
w := min(w_1, w_2)
ρ_req := w*f'_c/f_y
As_req := ρ_req*b*d
Verificación__Cuantía_Balanceada :=
    if As_req ≤ As_máx
        "Si Cumple"
    else
        "No Cumple, Verificar"
As :=
    if As_req < As_mín
        As_mín
    else
        As_req
w = 0  # Índice de Refuerzo de la Sección
ρ_req = 0  # Cuantía Requerida de la Sección
As_req = 0 cm^2  # Acero Requerido de la Sección
Verificación__Cuantía_Balanceada = "Si Cumple"
As = 4.63724 cm^2  # Acero a Utilizar en la Sección
# 04.02. Acero a Colocar y Separación Máxima
ϕ_db := (5/8) in
A_db := π*ϕ_db^2/4 = 1.97933 cm^2
Núm__Varillas := ceil(As/A_db) = 3  # Número de Varillas de Refuerzo
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Núm__Varillas_1er_Capa := 3  # Número de Varillas de Refuerzo en la 1er Capa
Núm__Varillas_2da_Capa := 0  # Número de Varillas de Refuerzo en la 2da Capa
s_1 := (b - 2*4 cm - 2*0.95 cm - Núm__Varillas_1er_Capa*ϕ_db)/(Núm__Varillas_1er_Capa - 1)
s_2 :=
    if Núm__Capas == 2
        (b - 2*4 cm - 2*0.95 cm - Núm__Varillas_2da_Capa*ϕ_db)/(Núm__Varillas_2da_Capa - 1)
    else
        "No Requiere"
Verificación__Separación_1er_Capa :=
    if s_1 ≥ 2.54 cm
        "Si Cumple"
    else
        "No Cumple"
Verificación__Separación_2da_Capa :=
    if Núm__Capas == 2
        if s_2 ≥ 2.54 cm
            "Si Cumple"
        else
            "No Cumple"
    else
        "No Requiere"
As_colocado := (Núm__Varillas_1er_Capa + Núm__Varillas_2da_Capa)*A_db = 5.93798 cm^2
Verificación__Acero_Colocado :=
    if As_colocado ≥ As
        "Si Cumple"
    else
        "No Cumple, Aumentar Diámetro"
s_1 = 7.66875 cm  # Separación de Aceros en la 1er Capa
s_2 = "No Requiere"  # Separación de Aceros en la 2da Capa
Verificación__Separación_1er_Capa = "Si Cumple"
Verificación__Separación_2da_Capa = "No Requiere"
As_colocado = 5.93798 cm^2  # Acero Colocado en la Sección
Verificación__Acero_Colocado = "Si Cumple"
# 04.03. Verificación de la Fluencia
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a := As_colocado*f_y/(0.85*f'_c*b)
c := a/β_1
ε_s := ε_c*(d - c)/c
μ := ε_s/ε_sy
Tipo__Falla :=
    if ε_s > ε_sy
        "Falla Dúctil"
    else
        "Falla Frágil"
M_r := As_colocado*f_y*(d - a/2)
Verificación__Resistencia :=
    if M_r ≥ M_u
        "Si Cumple"
    else
        "No Cumple, Verificar"
a = 4.65724 cm  # Altura del Bloque de Compresiones
c = 5.4791 cm  # Distancia al Eje Neutro de la Sección
ε_s = 0.0320422  # Deformación Unitaria del Acero
μ = 15.2582  # Ductilidad de la Sección
Tipo__Falla = "Falla Dúctil"  # Comportamiento de la Sección: A) Falla Dúctil o B) Falla Frágil
M_r = 15.3805 tonnef*m  # Momento Resistente de la Sección
Verificación__Resistencia = "Si Cumple"
# 05. Corte de Aceros
# 05.01. Primer Corte
Núm__Aceros_Cortados := 2
Núm__Aceros_Restantes := Núm__Varillas - Núm__Aceros_Cortados = 1
As_Restante := Núm__Aceros_Restantes*A_db = 1.97933 cm^2
# 06.02. Cálculo de Resistencia
a_Restante := As_Restante*f_y/(0.85*f'_c*b) = 1.55241 cm
M_r_Restante := As_Restante*f_y*(d - a_Restante/2) = 5.2559 tonnef*m
