# Análisis y Diseño de Vigas T a Flexión
# Método en Base a la Norma E.060
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# 01. Datos Pre-Liminares / De Entrada
# 01.01. Propiedades Geométricas de la Sección
b_w := 0.30 m  # Ancho de la Viga
h := 0.70 m  # Peralte Total de la Viga
h_f := 0.20 m  # Altura del Ala de la Viga - Espesor de la Losa
Núm__Capas := 1  # Número de Capas de la Sección: A) 1, B) 2 & C) 3
r :=
    if Núm__Capas == 1
        6 cm
    else if Núm__Capas == 2
        9 cm
    else if Núm__Capas == 3
        12 cm
    = 0.06 m
r = 0.06 m  # Recubrimiento Inferior de la Viga
d := h - r = 0.64 m  # Peralte Efectivo de la Viga
d' := 0.06 m  # Recubrimiento Superior de la Viga
l_n1 := 6.70 m  # Luz Libre entre Vigas del Lado Derecho
l_n2 := 6.70 m  # Luz Libre entre Vigas del Lado Izquierdo
L := 7.00 m  # Luz Total de la Viga en Análisis
# 01.02. Propiedades Mecánicas de los Materiales
f'_c := 210 kgf/cm^2  # Resistencia a la Compresión del Concreto
E_c := 15000*sqrt(f'_c*kgf/cm^2)
E_c = 217371 kgf/cm^2  # Módulo de Elasticidad del Concreto
f_y := 4200 kgf/cm^2  # Esfuerzo Cedente del Acero Corrugado
E_s := 2.1*10^6 kgf/cm^2  # Módulo de Elasticidad del Acero Corrugado
ε_c := 0.003  # Deformación Unitaria del Concreto a Compresión
ε_sy := 0.0021  # Deformación Unitaria del Acero a Fluencia
β_1 :=
    if 170*kgf/cm^2 ≤ f'_c ≤ 280*kgf/cm^2
        0.85
    else if f'_c ≤ 350*kgf/cm^2
        0.80
    else if f'_c ≤ 420*kgf/cm^2
        0.75
    else if f'_c ≤ 490*kgf/cm^2
        0.70
    else if f'_c > 490*kgf/cm^2
        0.65
    = 0.85
β_1 = 0.85  # Factor de Relación de Profundidad del Bloque Rectangular Equivalente de Esfuerzos de Compresión
ϕ_Flexión := 0.90  # Factor de Reducción por Capacidad a Flexión
# 01.03. Momentos Actuantes en la Viga
M_u_Positivo := 16.0745 tonnef*m  # Momento Positivo Actuante sobre la Sección
M_u_Negativo := 0.00 tonnef*m  # Momento Negativo Actuante sobre la Sección
# 01.04. Acero Colocado de Refuerzo
ϕ_db_1 := (5/8) in
A_db_1 := π*ϕ_db_1^2/4 = 1.97933 cm^2
As := 4*A_db_1 = 7.9173 cm^2
ϕ_db_2 := (5/8) in
A_db_2 := π*ϕ_db_2^2/4 = 1.97933 cm^2
A's := 7*A_db_2 = 13.8553 cm^2
# 02. Cálculo del Ancho Efectivo del Ala
Tipo__Viga := "Central"  # Tipo de Viga: 1) Central, 2) Externa y 3) Aislada
b_1 :=
    if Tipo__Viga == "Central"
        b_w + 16*h_f
    else if Tipo__Viga == "Externa"
        b_w + 12*h_f
    else if Tipo__Viga == "Aislada"
        0.00 m
b_2 :=
    if Tipo__Viga == "Central"
        b_w + (l_n1 + l_n2)/2
    else if Tipo__Viga == "Externa"
        b_w + l_n1/2
    else if Tipo__Viga == "Aislada"
        0.00 m
b_3 :=
    if Tipo__Viga == "Central"
        L/4
    else if Tipo__Viga == "Externa"
        b_w + L/12
    else if Tipo__Viga == "Aislada"
        0.00 m
b_f := Ceil({
    if Tipo__Viga == "Aislada"
        4*b_w
    else
        min(b_1, b_2, b_3)
}, 0.05 m)
Verificación__Peralte_del_Ala :=
    if Tipo__Viga == "Aislada"
        if h_f ≥ b_w/2
            "Si Cumple"
        else
            "No Cumple, Verificar"
    else
        "No se Necesita Verificar"
b_1 = 3.5 m  # Ancho del Ala 01 Máximo según Artículo 8.10.
b_2 = 7 m  # Ancho del Ala 02 Máximo según Artículo 8.10.
b_3 = 1.75 m  # Ancho del Ala 03 Máximo según Artículo 8.10.
b_f = 1.75 m  # Ancho Efectivo del Ala de la Viga
Verificación__Peralte_del_Ala = "No se Necesita Verificar"
# 04. Cálculo del Acero Mínimo
# 04.01. Datos Preliminares
y_b := (b_w*(h - h_f)*(h - h_f)/2 + b_f*h_f*(h_f/2 + (h - h_f)))/(b_w*(h - h_f) + b_f*h_f)
y_t := (b_w*(h - h_f)*((h - h_f)/2 + h_f) + b_f*h_f*h_f/2)/(b_w*(h - h_f) + b_f*h_f)
I_g := b_w*(h - h_f)^3/12 + b_w*(h - h_f)*(y_b - (h - h_f)/2)^2 + b_f*h_f^3/12 + b_f*h_f*(y_t - h_f/2)^2
f_r := 2*sqrt(f'_c*kgf/cm^2)
y_b = 49.5 cm  # Centroide de la Sección medido desde el Borde Inferior
y_t = 20.5 cm  # Centroide de la Sección medido desde el Borde Superior
I_g = 1715417 cm^4  # Inercia de la Sección Bruta de la Viga T
f_r = 28.9828 kgf/cm^2  # Módulo de Rotura de la Sección
# 04.02. Acero Mínimo Positivo
S_positivo := I_g/y_b
As_mín_positivo := 1.20*S_positivo*f_r/(0.90*f_y*(0.95*d))
Verificación__Acero_Mínimo_Positivo :=
    if As > As_mín_positivo
        "Si Cumple"
    else
        "No Cumple, Verificar"
S_positivo = 34654.9 cm^3  # Módulo de la Sección para Momento Positivo
As_mín_positivo = 5.24433 cm^2  # Acero Mínimo para Momento Positivo
Verificación__Acero_Mínimo_Positivo = "Si Cumple"
# 04.03. Acero Mínimo Negativo
S_negativo := I_g/y_t
As_mín_negativo := 1.20*S_negativo*f_r/(0.90*f_y*(0.95*d))
Verificación__Acero_Mínimo_Negativo :=
    if A's > As_mín_negativo
        "Si Cumple"
    else
        "No Cumple, Verificar"
S_negativo = 83678.9 cm^3  # Módulo de la Sección para Momento Negativo
As_mín_negativo = 12.6631 cm^2  # Acero Mínimo para Momento Negativo
Verificación__Acero_Mínimo_Negativo = "Si Cumple"
# 05. Cálculo del Acero Máximo - Cuantía Balanceada
# 05.01. Acero Máximo Positivo
c_b := 0.588*d
a_b := β_1*c_b
As_máx := 0.85*f'_c*(h_f*(b_f - b_w) + c_b*b_w)/f_y
As_b := 0.75*As_máx
Verificación__Cuantía_Balanceada :=
    if As < As_b
        "Si Cumple"
    else
        "No Cumple, Verificar"
c_b = 37.632 cm  # Distancia al Eje Neutro por la Falla Balanceada
a_b = 31.9872 cm  # Altura del Bloque de Compresiones por Falla Balanceada
As_máx = 171.231 cm^2  # Acero Máximo de la Sección de la Viga
As_b = 128.423 cm^2  # Acero Máximo por Norma de la Sección de la Viga
Verificación__Cuantía_Balanceada = "Si Cumple"
# 05.02. Acero Máximo Negativo
# Observación: Para al acero máximo negativo, el refuerzo necesario cuando se produce la falla balanceada ante un momento negativo, es el mismo que se requiere cuando la falla se produce en la sección rectangular de la viga (sin considerar las alas de la losa), por lo que dicha verificación se hace previa al "Análisis de la Viga T"
# 06. Análisis de la Sección en T
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# 06.01. Sección a Momento Positivo - Ala en Compresión
# Observación: Para la sección a "Momento Positivo", existe varios casos de análisis que son suposiciones, ya que después se corrobora si cumple o no. Para ello, se debe asumir si:
# -Caso I: La dimensión de "a" es menor al espesor del ala.
# -Caso II: La dimensión de "a" es igual al espesor del ala.
# -Caso III: La dimensión de "a" es mayor al espesor del ala.
Caso__Análisis_Positivo := "Caso I"  # Caso de Análisis de Ubicación del Bloque "a"
# 06.01.01. Calculo del Eje Neutro de la Sección
a_positivo :=
    if Caso__Análisis_Positivo == "Caso I"
        As*f_y/(0.85*f'_c*b_f)
    else if Caso__Análisis_Positivo == "Caso II"
        h_f
    else if Caso__Análisis_Positivo == "Caso III"
        (As*f_y - 0.85*f'_c*(b_f - b_w)*h_f)/(0.85*f'_c*b_w)
Verificación__Bloque_Compresión :=
    if Caso__Análisis_Positivo == "Caso I"
        if a_positivo < h_f
            "Si Cumple"
        else
            "No Cumple, Verificar"
    else if Caso__Análisis_Positivo == "Caso II"
        "Si Cumple"
    else if Caso__Análisis_Positivo == "Caso III"
        if a_positivo > h_f
            "Si Cumple"
        else
            "No Cumple, Verificar"
c_positivo := a_positivo/β_1
a_positivo = 1.06451 cm  # Altura del Bloque de Compresión para Momento (+)
c_positivo = 1.25237 cm  # Distancia al Eje Neutro de la Sección para Momento (+)
Verificación__Bloque_Compresión = "Si Cumple"
# 06.01.02. Verificación de la Fluencia de la Sección
ε_s_positivo := ε_c*(d - c_positivo)/c_positivo
Verificación__Fluencia_de_la_Sección_Positivo :=
    if ε_s_positivo > ε_sy
        "Fluye el Acero, Falla Dúctil"
    else
        "No Fluye el Acero, Falla Frágil"
ε_s_positivo = 0.15031  # Deformación Unitaria del Acero para Momento (+)
Verificación__Fluencia_de_la_Sección_Positivo = "Fluye el Acero, Falla Dúctil"
# 06.01.03. Resistencia Total de la Sección
M_nf := (0.85*f'_c*(b_f - b_w)*h_f/f_y)*f_y*(d - h_f/2)
M_nw := (0.85*f'_c*b_w*a_positivo/f_y)*f_y*(d - a_positivo/2)
M_n_positivo := M_nf + M_nw
Verificación__Resistencia_Positiva :=
    if ϕ_Flexión*M_n_positivo > M_u_Positivo
        "Si Cumple"
    else
        "No Cumple, Verificar"
M_nf = 279.531 tonnef*m  # Momento Nominal de la Sección - Aporte del Ala
M_nw = 3.61795 tonnef*m  # Momento Nominal de la Sección - Aporte del Alma
M_n_positivo = 283.149 tonnef*m  # Momento Nominal de la Sección Total
Verificación__Resistencia_Positiva = "Si Cumple"
# 06.02. Sección a Momento Negativo - Alma en Compresión
# Observación: Para la sección a "Momento Negativo", se analiza la sección como una viga rectangular, sin considerar el aporte del ala.
# 06.02.01. Calculo del Eje Neutro de la Sección
a_negativo := A's*f_y/(0.85*f'_c*b_w)
Verificación__Bloque_Compresión :=
    if a_negativo < (h - h_f)
        "Si Cumple"
    else
        "No Cumple, Verificar"
c_negativo := a_negativo/β_1
a_negativo = 10.8669 cm  # Altura del Bloque de Compresión para Momento (-)
c_negativo = 12.7846 cm  # Distancia al Eje Neutro de la Sección para Momento (-)
Verificación__Bloque_Compresión = "Si Cumple"
# 06.02.01. Verificación de la Fluencia de la Sección
ε_s_negativo := ε_c*(d - c_negativo)/c_negativo
Verificación__Fluencia_de_la_Sección_Negativo :=
    if ε_s_negativo > ε_sy
        "Fluye el Acero, Falla Dúctil"
    else
        "No Fluye el Acero, Falla Frágil"
ε_s_negativo = 0.0120181  # Deformación Unitaria del Acero para Momento (-)
Verificación__Fluencia_de_la_Sección_Negativo = "Fluye el Acero, Falla Dúctil"
# 06.01.03. Resistencia Total de la Sección
M_n_negativo := A's*f_y*(d - a_negativo/2)
Verificación__Resistencia_Negativa :=
    if ϕ_Flexión*M_n_negativo > M_u_Negativo
        "Si Cumple"
    else
        "No Cumple, Verificar"
M_n_negativo = 34.0812 tonnef*m  # Momento Nominal Negativo de la Sección
Verificación__Resistencia_Negativa = "Si Cumple"
