# Worksheet setting: ORIGIN = 1
# Diseño de Vigas con Altura (Peralte) Mayor a 0.90 m
# Método en Base a la Norma E.060
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# 01. Datos Pre-Liminares / De Entrada
# 01.01. Propiedades Geométricas de la Sección
b := 0.60 m  # Ancho de la Viga
h := 1.30 m  # Peralte Total de la Viga
rec := 4.00 cm  # Recubrimiento Mínimo de la Sección
r := rec + 0.95 cm
d := h - r
r = 4.95 cm  # Recubrimiento Inferior de la Viga
d = 1.2505 m  # Peralte Efectivo de la Viga
d' := 0.06 m  # Recubrimiento Superior de la Viga
# 01.02. Propiedades Mecánicas de los Materiales
f'_c := 210 kgf/cm^2  # Resistencia a la Compresión del Concreto
E_c := 15000*sqrt(f'_c*kgf/cm^2)
β_1 :=
    if 170*kgf/cm^2 ≤ f'_c ≤ 280*kgf/cm^2
        0.85
    else if f'_c ≤ 350*kgf/cm^2
        0.80
    else if f'_c ≤ 420*kgf/cm^2
        0.75
    else if f'_c ≤ 490*kgf/cm^2
        0.70
    else if f'_c > 490*kgf/cm^2
        0.65
E_c = 217371 kgf/cm^2  # Módulo de Elasticidad del Concreto
f_y := 4200 kgf/cm^2  # Esfuerzo Cedente del Acero Corrugado
E_s := 2.1*10^6 kgf/cm^2  # Módulo de Elasticidad del Acero Corrugado
ε_c := 0.003  # Deformación Unitaria del Concreto a Compresión
ε_sy := 0.0021  # Deformación Unitaria del Acero a Fluencia
β_1 = 0.85  # Factor de Relación de Profundidad del Bloque Rectangular Equivalente de Esfuerzos de Compresión
ϕ_Flexión := 0.90  # Factor de Reducción por Capacidad a Flexión
# 01.03. Momentos Actuantes en la Viga
M_s := 11.75 tonnef*m  # Momento de Servicio Actuante sobre la Sección
M_u := 18.67 tonnef*m  # Momento Último Actuante sobre la Sección
# 01.04. Acero Colocado de Refuerzo
# 01.04.01. Acero en la Zona Traccionada
ϕ_db_1 := 1 in
A_db_1 := π*ϕ_db_1^2/4 = 5.06707 cm^2
As := 4*A_db_1 = 20.2683 cm^2
# 01.04.02. Acero en la Zona Comprimida
ϕ_db_2 := 1 in
A_db_2 := π*ϕ_db_2^2/4 = 5.06707 cm^2
A's := 4*A_db_2 = 20.2683 cm^2
# 02. Espaciamiento de la Armadura Superficial
# 02.01. Recomendaciones según Artículo 9.9.6.
C_c := 4 cm + 0.95 cm
f_s := M_s/(0.90*d*As)
s_1 := 30 cm
s_2 := 38*cm*(2500*kgf/cm^2/f_s) - 2.50*C_c
s_3 := 30*cm*(2500*kgf/cm^2/f_s)
C_c = 4.95 cm  # Distancia del Refuerzo Superficial a la Cara Lateral de la Viga
f_s = 515.103 kgf/cm^2  # Esfuerzo del Acero en Base a Momentos de Servicio
s_1 = 30 cm  # Separación de la Armadura Superficial 01
s_2 = 172.054 cm  # Separación de la Armadura Superficial 02
s_3 = 145.602 cm  # Separación de la Armadura Superficial 03
# 02.02. Separación de la Armadura Superficial y Número de Barras
Caso__de_Análisis := "Caso III"  # Caso de Análisis: A) Caso I, B) Caso II & C) Caso III
s_máx := Ceil(min(s_1, s_2, s_3), 0.05 m)
Núm__de_Barras :=
    if Caso__de_Análisis == "Caso I"
        Ceil((h - 2*4 cm - 2*0.95 cm - 0.50*(ϕ_db_1 + ϕ_db_2))/2/s_máx, 1)
    else if Caso__de_Análisis == "Caso II"
        Ceil((h - 2*4 cm - 2*0.95 cm - 0.50*(ϕ_db_1 + ϕ_db_2))/2/s_máx, 1)
    else if Caso__de_Análisis == "Caso III"
        Ceil((h - 2*4 cm - 2*0.95 cm - 0.50*(ϕ_db_1 + ϕ_db_2))/s_máx - 1, 1)
s :=
    if Caso__de_Análisis == "Caso I"
        (h - 2*4 cm - 2*0.95 cm - 0.50*(ϕ_db_1 + ϕ_db_2))/2/Núm__de_Barras
    else if Caso__de_Análisis == "Caso II"
        (h - 2*4 cm - 2*0.95 cm - 0.50*(ϕ_db_1 + ϕ_db_2))/2/Núm__de_Barras
    else if Caso__de_Análisis == "Caso III"
        (h - 2*4 cm - 2*0.95 cm - 0.50*(ϕ_db_1 + ϕ_db_2))/(Núm__de_Barras + 1)
s_máx = 30 cm  # Separación Máxima de la Armadura Superficial
Núm__de_Barras = 3  # Número de Barras de la Armadura Superficial
s = 29.39 cm  # Separación entre Aceros de la Armadura Superficial
# 03. Análisis de la Viga con Refuerzo Distribuido en el Alma
# 03.01. Acero a Colocar
ϕ_db_3 := (3/4) in
A_db_3 := π*ϕ_db_3^2/4 = 2.85023 cm^2
As_k := 2*Núm__de_Barras*A_db_3
As_k = 17.1014 cm^2  # Acero de la Armadura Superficial en el Alma
# 03.02. Distribución del Refuerzo
# Distribución del Refuerzo Longitudinal y Repartido en el Alma - Varillas de Acero Corrugado en toda la Sección de la Viga
Barras := [
    ϕ_db_2, ϕ_db_2, ϕ_db_2, ϕ_db_2;
    ϕ_db_3, 0, 0, ϕ_db_3;
    ϕ_db_3, 0, 0, ϕ_db_3;
    ϕ_db_3, 0, 0, ϕ_db_3;
    ϕ_db_1, ϕ_db_1, ϕ_db_1, ϕ_db_1
]
# 03.03. Número de Filas y Columnas de Refuerzo
k := rows(Barras) = 5  # Número de Filas de Refuerzo
n := cols(Barras) = 4  # Número de Columnas de Refuerzo
# 03.04. Áreas en la Distribución del Refuerzo
As_sección := vectorize(π*Barras^2/4)
As_columna := sum(As_sección[:, i], i = 1 .. n)
l[1] := rec + 0.95 cm + Barras[k, 1]/2
i := 2 .. k
l[i] := l[i - 1] + s
# Distribución del Refuerzo Longitudinal y Repartido en el Alma - Áreas del Acero en toda la Sección de la Viga
As_sección = [
    5.06707, 5.06707, 5.06707, 5.06707;
    2.85023, 0, 0, 2.85023;
    2.85023, 0, 0, 2.85023;
    2.85023, 0, 0, 2.85023;
    5.06707, 5.06707, 5.06707, 5.06707
] cm^2
# 03.05. Área de Cada Capa de Refuerzo por Filas
# Distribución del Área de Refuerzo Longitudinal por Capas de Refuerzo Horizontales por Filas
As_columna = [20.2683; 5.70046; 5.70046; 5.70046; 20.2683] cm^2
# 03.06. Ubicación de cada Fila de Refuerzo
l[1] = 6.22 cm  # Distancia del Borde Superior de la Viga a la 1era Varilla Longitudinal
l = [6.22; 35.61; 65; 94.39; 123.78] cm  # Ubicación de Cada Grupo de Barras de Acero en la Sección, partiendo de un Extremo de la Viga
# 03.07. Proceso Iterativo Respecto al Eje Neutro de la Sección
c := 34.7413 cm  # Posición del Eje Neutro de la Sección (Iterar)
a := β_1*c
f_s(i) :=
    ε_s ← ε_c*(c - l[i])/c
    E_s*ε_s
Cc := 0.85*f'_c*a*b
Cs := sum(As_columna[i, 1]*f_s(i), i = 1 .. k)
a = 29.5301 cm  # Altura del Bloque de Compresiones
f_s(1) = 5172.06 kgf/cm^2  # Esfuerzo del Acero de la 1era Capa de Refuerzo
f_s(i) = [-157.53; -5487.12; -10816.7; -16146.3] kgf/cm^2  # Esfuerzo del Acero de las Capas de Refuerzo Restantes
# Observación: Se debe cumplir el equilibrio de la sección entre esfuerzos, por medio de la siguiente ecuación:
0.85*f'_c*a*b + Σf'_si*A_si == Σf'_sj*A_sj
sum(As_columna[i, 1]*f_s(i), i = 1 .. k) == Σf'_si*A_si - Σf'_sj*A_sj
Cc = 316.267 tonnef  # Esfuerzo del Concreto a Compresión
Cs = -316.267 tonnef  # Suma de Esfuerzos del Acero a Tracción y Compresión
Cc + Cs = 0.0007228 tonnef  # Equilibrio de Esfuerzos
# 03.08. Cálculo del Momento Resistente
M_n := sum(|As_columna[i, 1]*f_s(i)|*{
    if l[i] > a/2
        l[i] - a/2
    else
        a/2 - l[i]
}, i = 1 .. k)
M_n = 430.715 tonnef*m  # Momento Nominal de la Sección
ϕ_Flexión*M_n = 387.644 tonnef*m  # Momento Nominal Reducido de la Sección
# 04. Cálculo de la Cuantía Balanceada
# 04.01. Posición del Eje Neutro que Produce la Falla Balanceada
c_b := 0.588*d
a_b := β_1*c_b
f_sb(i) :=
    ε_sb ← ε_c*(c_b - l[i])/c_b
    E_s*ε_sb
Cc_b := 0.85*f'_c*a_b*b
Cs_b := sum(As_columna[i, 1]*f_sb(i), i = 1 .. k)
A_sb := 0.75*((Cc_b - Cs_b - As_columna[k, 1]*f_sb(k))/(E_s*ε_sy))
Verificación__Falla_Balanceada :=
    if As < A_sb
        "Si Cumple"
    else
        "No Cumple, Verificar"
c_b = 73.5294 cm  # Posición del Eje Neutro de la Sección
a_b = 62.5 cm  # Altura del Bloque de Compresiones
# 04.02. Cálculo de Esfuerzos que Produce la Falla Balanceada
Cc_b = 669.375 tonnef  # Esfuerzo del Concreto a Compresión
Cs_b = 42.1218 tonnef  # Suma de Esfuerzos del Acero a Tracción y Compresión
# 04.03. Cálculo del Acero Máximo de la Sección y Verificación
A_sb = 121.517 cm^2  # Acero Máximo que Produce la Falla Balanceada
Verificación__Falla_Balanceada = "Si Cumple"
