# DISEÑO DE ZAPATA AISLADA
f'_c := 210 kgf/cm^2
f_y := 4200 kgf/cm^2
D_f := 1.9 m
γ_terreno := 1.75 tonnef/m^3
sobrecarga := 1.06 tonnef/m^2
σ_admisible := 2.125 kgf/cm^2
γ_z := 2.4 tonnef/m^3
# Columna
Pcm := 92.5 tonnef
Mcm := 36.5 tonnef*m
Pcv := 73 tonnef
Mcv := 22.5 tonnef*m
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# b
# a
b := 60 cm
tw := 25 cm
a := 30 cm
tz := 25 cm
# Aceros longitudinales maximos
ϕ_vc := 1 in
ϕ_vc = 2.54 cm
# 1. DIMENSIONAMIENTO
ld1 := 0.08*ϕ_vc*f_y/sqrt(f'_c)*cm/kgf^0.5 = 58.893 cm
ld2 := 0.004*ϕ_vc*f_y*cm^2/kgf = 42.672 cm
ld3 := 20 cm
ld_max := max(ld1, ld2, ld3) = 58.893 cm
ld := 60 cm
# a. Calculamos el peralte efectivo es:
d := ld + 10 cm = 70 cm
# La altura de la zapata es:
h := d + 10 cm = 80 cm
# b. Capacidad portante neta del terreno
q_e := σ_admisible - (D_f - h)*γ_terreno - γ_z*h - sobrecarga
σ_admisible = 21.25 tonnef/m^2
D_f = 1.9 m
h = 0.8 m
γ_terreno = 1.75 tonnef/m^3
γ_z = 2.4 tonnef/m^3
sobrecarga = 1.06 tonnef/m^2
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q_e = 16.345 tonnef/m^2
# c. Área de la zapata
# Cargas de servicio
P := Pcm + Pcv = 165.5 tonnef
M := Mcm + Mcv = 59 tonnef*m
t := 0.08  # Considerando 8% de peso propio
A := (1 + t)*P/q_e = 10.9355 m^2
LmenosB := (b - a)/m = 0.3
LporB := A/m^2 = 10.9355
B := B^2 + LmenosB*B - LporB == 0 solve, B → [-3.46028008896; 3.16028008896]
B := 3.5 m
L := A/B = 3.12442 m
L := 3.8 m
LmenosB2 := (L - B)/m = 0.3
LmenosB := (b - a)/m = 0.3
if(LmenosB2 == LmenosB, "OK", "Verificar") = "Verificar"
# Verifica, si esta bien ignora lo de arriba
# d. Verificacion de la capacidad del terreno. Aqui se hace 3 ver. si viene con momento biaxial
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B = 3.5 m
L = 3.8 m
c := L/2 = 1.9 m
I := B*L^3/12 = 16.0043 m^4
A := B*L = 13.3 m^2
σ_max := P*(1 + t)/A + M*c/I = 20.4435 tonnef/m^2
σ_admisible = 21.25 tonnef/m^2
if(σ_max < σ_admisible, "OK", "Redimensionar") = "OK"
# 3. DISEÑO
# a. Calculamos las cargas últimas para el diseño
Pu := 1.4*Pcm + 1.7*Pcv = 253.6 tonnef  # O se multiplica *1.6 el esfuerzo max
Mu := 1.4*Mcm + 1.7*Mcv = 89.35 tonnef*m
# Excentricidad:
e := Mu/Pu = 0.352326 m
L_6 := L/6 = 0.633333 m
if(e < L_6, "Caso normal", "Caso momento grande") = "Caso normal"
# b. Calculamos las presionces para el diseño
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σ1 := Pu/A + Mu*c/I = 29.6751 tonnef/m^2
σ2 := Pu/A - Mu*c/I = 8.46023 tonnef/m^2
# c. Realizamos la verificación por cortante por flexión Vu menor o igual al cortante del concreto por su reducción
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ϕ := 0.85
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ϕVc := ϕ*0.53*sqrt(f'_c)*B*d*kgf^0.5/cm = 159.945 tonnef
# Se evalua la cortante a la distancia "d" de la cara de la columna
L = 3.8 m
B = 3.5 m
d = 0.7 m
Lado := L
b = 0.6 m
a = 0.3 m
x := (L + b)/2 + d = 2.9 m
σ1 = 29.6751 tonnef/m^2
σ2 = 8.46023 tonnef/m^2
σ3 := (σ1 - σ2)/L*x + σ2 = 24.6505 tonnef/m^2
Vu := (σ1 + σ3)/2*(Lado - x)*B = 85.5629 tonnef
ϕVc = 159.945 tonnef
if(Vu < ϕVc, "Cumple", "No cumple") = "Cumple"
# d. Verificamos la cortante por punzonamiento
# -Factor B0 de relación entre los lados de la columna (Lado mayor entre lado menor)
β0 := b/a = 2
d = 0.7 m
# -El perimetro de punzonamiento es: a "d/2" de las caras de la columna
bo := 2*(a + d + b + d) = 4.6 m
ϕVc := ϕ*(0.53 + 1.1/β0)*sqrt(f'_c)*bo*d*kgf^0.5/cm = 428.359 tonnef
σ3 = 24.6505 tonnef/m^2
L = 3.8 m
B = 3.5 m
d = 0.7 m
Lado := L
b = 0.6 m
a = 0.3 m
x := (L - b)/2 - d = 0.9 m
σ1 = 29.6751 tonnef/m^2
σ2 = 8.46023 tonnef/m^2
σ4 := (σ1 - σ2)/L*x + σ2 = 13.4848 tonnef/m^2
σ3 = 24.6505 tonnef/m^2
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σ4 = 13.4848 tonnef/m^2
At := L*B = 13.3 m^2
Ap := (a + d)*(b + d) = 1.3 m^2
Ap' := At - Ap = 12 m^2
Vu := (σ1 + σ2)/2*At - (σ3 + σ4)/2*Ap = 228.812 tonnef
ϕVc = 428.359 tonnef
if(Vu < ϕVc, "Cumple", "No cumple") = "Cumple"
# e. Diseño del refuerzo
# e.1. Diseño del refuerzo longitudinal
# Momento en la cara de la columna
L = 3.8 m
B = 3.5 m
d = 0.7 m
Lado := L
b = 0.6 m
a = 0.3 m
x := (L + b)/2 = 2.2 m
σ1 = 29.6751 tonnef/m^2
σ2 = 8.46023 tonnef/m^2
σ5 := (σ1 - σ2)/L*x + σ2 = 20.7425 tonnef/m^2
y := L - x = 1.6 m
# Momento en la cara de la columna para 1 m de profundidad
Mu := (σ5*y^2/2 + (σ1 - σ5)*y/2*2*y/3)*m = 34.1729 tonnef*m
b := 1 m
d = 0.7 m
# Acero minimo
Asmin := 0.0018*b*d = 12.6 cm^2
# Acero maximo
pb := 0.85*0.85*f'_c/f_y*(6000/(6000 + 4200)) = 0.02125
pmax := 0.75*pb = 0.0159375
Asmax := pmax*b*d = 111.562 cm^2
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φ := 0.9
B = 350 cm
k1 := (φ*f_y^2/(1.7*f'_c*b)) cm^3/kgf = 444.706
k2 := (φ*f_y*d)*cm/kgf = 264600
k3 := Mu/(kgf*cm) = 3417290
A_ss := k1*A_s^2 - k2*A_s + k3 == 0 solve, A_s → [13.2081312508; 581.791868749]
As_1 := round(A_ss[0, 0], 4)*cm^2 = 13.2081 cm^2
As_1 = 13.2081 cm^2
# Acero seleccionado:
As := As_1
# Empleando varillas de:
cm2 := cm^2
[ϕ_cm; As_var] := [list choice]  # options: 1/4", 3/8", 1/2", 5/8", 3/4", 1", 1 1/4", 1 3/8", 1 1/2"
table  # each column defines a variable
    ϕ_var | ϕ_diam (cm) | ϕ_area (cm^2)
    " 1/4" | 0.64 | 0.32
    " 3/8" | 0.95 | 0.71
    "1/2" | 1.27 | 1.27
    "5/8" | 1.59 | 1.98
    "3/4" | 1.91 | 2.85
    "1" | 2.54 | 5.07
    "1 1/4" | 3.18 | 7.94
    "1 3/8" | 3.49 | 9.57
    "1 1/2" | 3.81 | 11.4
end table
ϕ_cm = 1.91 cm
As_var = 2.85 cm^2
# Nº de varillas a colocar:
N := As*B/As_var*1/m = 16.2205
N := 16
# Separación:
r := 7.5 cm
S := (B - 2*r - ϕ_cm)/(N - 1) = 22.206 cm
S := 20 cm
B = 3.5 m
N = 16
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# e. Diseño del refuerzo transversal:
Pu = 253.6 tonnef
A = 13.3 m^2
σ_constante := Pu/A = 19.0677 tonnef/m^2
n := (B - a)/2 = 1.6 m
# Para una profundidad de 1m
b = 1 m
Mu := σ_constante*n^2/2*m = 24.4066 tonnef*m
φ := 0.9
L = 380 cm
k1 := (φ*f_y^2/(1.7*f'_c*b)) cm^3/kgf = 444.706
k2 := (φ*f_y*d)*cm/kgf = 264600
k3 := Mu/(kgf*cm) = 2440662
A_ss := k1*A_s^2 - k2*A_s + k3 == 0 solve, A_s → [9.3715743516; 585.628425648]
As_1 := round(A_ss[0, 0], 4)*cm^2 = 9.3716 cm^2
As_1 = 9.3716 cm^2
# Acero minimo
Asmin := 0.0018*b*d = 12.6 cm^2
# Acero seleccionado:
As := Asmin
# Empleando varillas de:
cm2 := cm^2
[ϕ_cm; As_var] := [list choice]  # options: 1/4", 3/8", 1/2", 5/8", 3/4", 1", 1 1/4", 1 3/8", 1 1/2"
table  # each column defines a variable
    ϕ_var | ϕ_diam (cm) | ϕ_area (cm^2)
    " 1/4" | 0.64 | 0.32
    " 3/8" | 0.95 | 0.71
    "1/2" | 1.27 | 1.27
    "5/8" | 1.59 | 1.98
    "3/4" | 1.91 | 2.85
    "1" | 2.54 | 5.07
    "1 1/4" | 3.18 | 7.94
    "1 3/8" | 3.49 | 9.57
    "1 1/2" | 3.81 | 11.4
end table
ϕ_cm = 1.91 cm
As_var = 2.85 cm^2
# Nº de varillas a colocar:
N := As*L/As_var*1/m = 16.8
N := 17
# Separación:
r := 7.5 cm
S := (L - 2*r - ϕ_cm)/(N - 1) = 22.6931 cm
S := 20 cm
L = 3.8 m
N = 17
