# DISEÑO DE ZAPATA AISLADA BIAXIAL
f'_c := 210 kgf/cm^2
f_y := 4200 kgf/cm^2
D_f := 2.1 m
γ_terreno := 1.75 tonnef/m^3
sobrecarga := 0 tonnef/m^2
σ_admisible := 2.9 kgf/cm^2
γ_z := 2.4 tonnef/m^3
# Columna
Pcm := 118 tonnef
McmX := 5 tonnef*m
Pcv := 35 tonnef
McvX := 3 tonnef*m
PcsX := 12 tonnef
McmY := 5 tonnef*m
PcsY := 7 tonnef
McvY := 3 tonnef*m
McsX := 10 tonnef*m
McsY := 5 tonnef*m
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# b
# a
b := 70 cm
a := 30 cm
# Aceros longitudinales maximos
ϕ_vc := 1 in
ϕ_vc = 2.54 cm
# 1. DIMENSIONAMIENTO
ld1 := 0.08*ϕ_vc*f_y/sqrt(f'_c)*cm/kgf^0.5 = 58.893 cm
ld2 := 0.004*ϕ_vc*f_y*cm^2/kgf = 42.672 cm
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ld3 := 20 cm
ld_max := max(ld1, ld2, ld3) = 58.893 cm
ld := 60 cm
# a. Calculamos el peralte efectivo es:
d := ld + 10 cm = 70 cm
# La altura de la zapata es:
h := d + 10 cm = 80 cm
# b. Capacidad portante neta del terreno
q_e := σ_admisible - (D_f - h)*γ_terreno - γ_z*h - sobrecarga
σ_admisible = 29 tonnef/m^2
D_f = 2.1 m
h = 0.8 m
γ_terreno = 1.75 tonnef/m^3
γ_z = 2.4 tonnef/m^3
sobrecarga = 0 tonnef/m^2
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q_e = 24.805 tonnef/m^2
# c. Área de la zapata
# Cargas de servicio
P := Pcm + Pcv = 153 tonnef
t := 0.08  # Considerando 8% de peso propio
A := (1 + t)*P/q_e = 6.66156 m^2
LmenosB := (b - a)/m = 0.4
LporB := A/m^2 = 6.66156
B := B^2 + LmenosB*B - LporB == 0 solve, B → [-2.78873717656; 2.38873717656]
B := 2.6 m
L := A/B = 2.56214 m
L := 3 m
LmenosB2 := (L - B)/m = 0.4
LmenosB := (b - a)/m = 0.4
if(LmenosB2 == LmenosB, "OK", "Verificar") = "Verificar"
# Verifica, si esta bien ignora lo de arriba
# d. Verificacion de la capacidad del terreno. Aqui se hace 3 ver. si viene con momento biaxial
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# PRIMERA VERIFICACIÓN -SIN SISMO
B = 2.6 m
L = 3 m
c := L/2 = 1.5 m
I := B*L^3/12 = 5.85 m^4
A := B*L = 7.8 m^2
P = 153 tonnef
t = 0.08
σ_1 := P*(1 + t)/(B*L) + 6*(McmX + McvX)/(B*L^2) + 6*(McmY + McvY)/(L*B^2) = 25.6028 tonnef/m^2
σ_1 = 25.6028 tonnef/m^2
σ_admisible = 29 tonnef/m^2
if(σ_1 < σ_admisible, "OK", "Redimensionar") = "OK"
# SEGUNDA VERIFICACIÓN - CON SISMO X-X
B = 2.6 m
L = 3 m
P = 153 tonnef
t = 0.08
σ_2 := (P + PcsX)*(1 + t)/(B*L) + 6*(McmX + McvX + McsX)/(B*L^2) + 6*(McmY + McvY)/(L*B^2)
σ_2 = 29.8284 tonnef/m^2
σ_admisible*1.3 = 37.7 tonnef/m^2
if(σ_2 < σ_admisible*1.3, "OK", "Redimensionar") = "OK"
# TERCERA VERIFICACIÓN - CON SISMO Y-Y
B = 2.6 m
L = 3 m
P = 153 tonnef
t = 0.08
σ_3 := (P + PcsY)*(1 + t)/(B*L) + 6*(McmX + McvX)/(B*L^2) + 6*(McmY + McvY + McsY)/(L*B^2)
σ_3 = 28.0513 tonnef/m^2
σ_admisible*1.3 = 37.7 tonnef/m^2
if(σ_3 < σ_admisible*1.3, "OK", "Redimensionar") = "OK"
σu1 := σ_1*1.6 = 40.9644 tonnef/m^2
σu3 := σ_3*1.25 = 35.0641 tonnef/m^2
σu2 := σ_2*1.25 = 37.2855 tonnef/m^2
σu := max(σu1, σu2, σu3) = 40.9644 tonnef/m^2
# 3. DISEÑO
# a. Calculamos las cargas últimas para el diseño
Pu1 := 1.4*Pcm + 1.7*Pcv = 224.7 tonnef  # O se multiplica *1.6 el esfuerzo max
Pu1x := 1.25*(Pcm + Pcv) + PcsX = 203.25 tonnef
Pu1y := 1.25*(Pcm + Pcv) + PcsY = 198.25 tonnef
McsX = 10 tonnef*m
McsY = 5 tonnef*m
Mu1x := 1.4*McmX + 1.7*McvX = 12.1 tonnef*m
Mu2x := 1.25*(McmX + McvX) + McsX = 20 tonnef*m
Mu1y := 1.4*McmY + 1.7*McvY = 12.1 tonnef*m
Mu2y := 1.25*(McmY + McvY) + McsY = 15 tonnef*m
# Excentricidad:
ex := Mu2x/Pu1 = 8.90076 cm
L_6 := L/6 = 50 cm
ey := Mu2y/Pu1 = 6.67557 cm
L_6 := B/6 = 43.3333 cm
if(e < L_6, "Caso normal", "Caso momento grande") =  # error: Estas unidades no son compatibles.
# b. Calculamos las presionces para el diseño
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σ1 := Pu/A + Mu*c/I  # error: Esta variable no está definida. Compruebe que el rótulo esté definido correctamente.
σ2 := Pu/A - Mu*c/I  # error: Esta variable no está definida. Compruebe que el rótulo esté definido correctamente.
σ1 := σu
σ2 := σu
# c. Realizamos la verificación por cortante por flexión Vu menor o igual al cortante del concreto por su reducción
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ϕ := 0.85
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ϕVc := ϕ*0.53*sqrt(f'_c)*B*d*kgf^0.5/cm = 118.816 tonnef
# Se evalua la cortante a la distancia "d" de la cara de la columna
L = 3 m
B = 2.6 m
d = 0.7 m
Lado := L
b = 0.7 m
a = 0.3 m
x := (L + b)/2 + d = 2.55 m
σ1 = 40.9644 tonnef/m^2
σ2 = 40.9644 tonnef/m^2
σ3 := (σ1 - σ2)/L*x + σ2 = 40.9644 tonnef/m^2
Vu := (σ1 + σ3)/2*(Lado - x)*B = 47.9284 tonnef
ϕVc = 118.816 tonnef
if(Vu < ϕVc, "Cumple", "No cumple") = "Cumple"
# d. Verificamos la cortante por punzonamiento
# -Factor B0 de relación entre los lados de la columna (Lado mayor entre lado menor)
β0 := b/a = 2.33333
d = 0.7 m
# -El perimetro de punzonamiento es: a "d/2" de las caras de la columna
bo := 2*(a + d + b + d) = 4.8 m
ϕVc := ϕ*(0.53 + 1.1/β0)*sqrt(f'_c)*bo*d*kgf^0.5/cm = 414.465 tonnef
σ3 = 40.9644 tonnef/m^2
L = 3 m
B = 2.6 m
d = 0.7 m
Lado := L
b = 0.7 m
a = 0.3 m
x := (L - b)/2 - d = 0.45 m
σ1 = 40.9644 tonnef/m^2
σ2 = 40.9644 tonnef/m^2
σ4 := (σ1 - σ2)/L*x + σ2 = 40.9644 tonnef/m^2
σ3 = 40.9644 tonnef/m^2
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σ4 = 40.9644 tonnef/m^2
At := L*B = 7.8 m^2
Ap := (a + d)*(b + d) = 1.4 m^2
Ap' := At - Ap = 6.4 m^2
Vu := (σ1 + σ2)/2*At - (σ3 + σ4)/2*Ap = 262.172 tonnef
ϕVc = 414.465 tonnef
if(Vu < ϕVc, "Cumple", "No cumple") = "Cumple"
# e. Diseño del refuerzo
# e.1. Diseño del refuerzo longitudinal
# Momento en la cara de la columna
L = 3 m
B = 2.6 m
d = 0.7 m
Lado := L
b = 0.7 m
a = 0.3 m
x := (L + b)/2 = 1.85 m
σ1 = 40.9644 tonnef/m^2
σ2 = 40.9644 tonnef/m^2
σ5 := (σ1 - σ2)/L*x + σ2 = 40.9644 tonnef/m^2
y := L - x = 1.15 m
# Momento en la cara de la columna para 1 m de profundidad
Mu := (σ5*y^2/2 + (σ1 - σ5)*y/2*2*y/3)*m = 27.0877 tonnef*m
b := 1 m
d = 0.7 m
# Acero minimo
Asmin := 0.0018*b*d = 12.6 cm^2
# Acero maximo
pb := 0.85*0.85*f'_c/f_y*(6000/(6000 + 4200)) = 0.02125
pmax := 0.75*pb = 0.0159375
Asmax := pmax*b*d = 111.562 cm^2
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φ := 0.9
B = 260 cm
k1 := (φ*f_y^2/(1.7*f'_c*b)) cm^3/kgf = 444.706
k2 := (φ*f_y*d)*cm/kgf = 264600
k3 := Mu/(kgf*cm) = 2708772
A_ss := k1*A_s^2 - k2*A_s + k3 == 0 solve, A_s → [10.4197051439; 584.580294856]
As_1 := round(A_ss[0, 0], 4)*cm^2 = 10.4197 cm^2
As_1 = 10.4197 cm^2
# Acero seleccionado:
As := As_1
# Empleando varillas de:
cm2 := cm^2
[ϕ_cm; As_var] := [list choice]  # options: 1/4", 3/8", 1/2", 5/8", 3/4", 1", 1 1/4", 1 3/8", 1 1/2"
table  # each column defines a variable
    ϕ_var | ϕ_diam (cm) | ϕ_area (cm^2)
    " 1/4" | 0.64 | 0.32
    " 3/8" | 0.95 | 0.71
    "1/2" | 1.27 | 1.27
    "5/8" | 1.59 | 1.98
    "3/4" | 1.91 | 2.85
    "1" | 2.54 | 5.07
    "1 1/4" | 3.18 | 7.94
    "1 3/8" | 3.49 | 9.57
    "1 1/2" | 3.81 | 11.4
end table
ϕ_cm = 1.91 cm
As_var = 2.85 cm^2
# Nº de varillas a colocar:
N := As*B/As_var*1/m = 9.50569
N := 16
# Separación:
r := 7.5 cm
S := (B - 2*r - ϕ_cm)/(N - 1) = 16.206 cm
S := 20 cm
B = 2.6 m
N = 16
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# e. Diseño del refuerzo transversal:
Pu =  # error: Esta variable no está definida. Compruebe que el rótulo esté definido correctamente.
A = 7.8 m^2
σ_constante := Pu/A  # error: Esta variable no está definida. Compruebe que el rótulo esté definido correctamente.
n := (B - a)/2 = 1.15 m
# Para una profundidad de 1m
b = 1 m
σ_constante := σu
Mu := σ_constante*n^2/2*m = 27.0877 tonnef*m
φ := 0.9
L = 300 cm
k1 := (φ*f_y^2/(1.7*f'_c*b)) cm^3/kgf = 444.706
k2 := (φ*f_y*d)*cm/kgf = 264600
k3 := Mu/(kgf*cm) = 2708772
A_ss := k1*A_s^2 - k2*A_s + k3 == 0 solve, A_s → [10.4197051439; 584.580294856]
As_1 := round(A_ss[0, 0], 4)*cm^2 = 10.4197 cm^2
As_1 = 10.4197 cm^2
# Acero minimo
Asmin := 0.0018*b*d = 12.6 cm^2
# Acero seleccionado:
As := Asmin
# Empleando varillas de:
cm2 := cm^2
[ϕ_cm; As_var] := [list choice]  # options: 1/4", 3/8", 1/2", 5/8", 3/4", 1", 1 1/4", 1 3/8", 1 1/2"
table  # each column defines a variable
    ϕ_var | ϕ_diam (cm) | ϕ_area (cm^2)
    " 1/4" | 0.64 | 0.32
    " 3/8" | 0.95 | 0.71
    "1/2" | 1.27 | 1.27
    "5/8" | 1.59 | 1.98
    "3/4" | 1.91 | 2.85
    "1" | 2.54 | 5.07
    "1 1/4" | 3.18 | 7.94
    "1 3/8" | 3.49 | 9.57
    "1 1/2" | 3.81 | 11.4
end table
ϕ_cm = 1.91 cm
As_var = 2.85 cm^2
# Nº de varillas a colocar:
N := As*L/As_var*1/m = 13.2632
N := 17
# Separación:
r := 7.5 cm
S := (L - 2*r - ϕ_cm)/(N - 1) = 17.6931 cm
S := 20 cm
L = 3 m
N = 17
