# DISEÑO DE ZAPATA AISLADA EN L
f'_c := 210 kgf/cm^2
f_y := 4200 kgf/cm^2
D_f := 2.2 m
γ_terreno := 1.70 tonnef/m^3
sobrecarga := 0.12 tonnef/m^2
σ_admisible := 2.3 kgf/cm^2
γ_z := 2.4 tonnef/m^3
# Columna
Pcm := 74 tonnef
Mcm := 50 tonnef*m
Pcv := 66 tonnef
Mcv := 48 tonnef*m
b := 50 cm
tw := 25 cm
a := 60 cm
tz := 25 cm
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# Aceros longitudinales maximos
ϕ_vc := 1 in
ϕ_vc = 2.54 cm
# 1. DIMENSIONAMIENTO
ld1 := 0.08*ϕ_vc*f_y/sqrt(f'_c)*cm/kgf^0.5 = 58.893 cm
ld2 := 0.004*ϕ_vc*f_y*cm^2/kgf = 42.672 cm
ld3 := 20 cm
ld_max := max(ld1, ld2, ld3) = 58.893 cm
ld := 60 cm
# a. Calculamos el peralte efectivo es:
d := ld + 10 cm = 70 cm
# La altura de la zapata es:
h := d + 10 cm = 80 cm
# b. Capacidad portante neta del terreno
q_e := σ_admisible - (D_f - h)*γ_terreno - γ_z*h - sobrecarga
σ_admisible = 23 tonnef/m^2
D_f = 2.2 m
h = 0.8 m
γ_terreno = 1.7 tonnef/m^3
γ_z = 2.4 tonnef/m^3
sobrecarga = 0.12 tonnef/m^2
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q_e = 18.58 tonnef/m^2
# c. Área de la zapata
# Cargas de servicio
σ_admisible = 2.3 kgf/cm^2
P := Pcm + Pcv = 140 tonnef
M := Mcm + Mcv = 98 tonnef*m
t := 0.08  # Considerando 8% de peso propio
A := (1 + t)*P/q_e = 8.13778 m^2
x_c := (a*tw^2/2 + ((b - tw)/2 + tw)*(b - tw)*tz)/(a*tw + (b - tw)*tz) = 19.8529 cm
y_c := (a^2*tw/2 + (b - tw)*tz^2/2)/(a*tw + (b - tw)*tz) = 24.8529 cm
LmenosB := (b - a)/m = -0.1
LporB := A/m^2 = 8.13778
B := B^2 + LmenosB*B - LporB == 0 solve, B → [-2.80311804205; 2.90311804205]
B := 4 m
L := A/B = 2.03445 m
L := 5 m
LmenosB2 := (L - B)/m = 1
LmenosB := (b - a)/m = -0.1
if(LmenosB2 == LmenosB, "OK", "Verificar") = "Verificar"
# Verifica, si esta bien ignora lo de arriba
# d. Verificacion de la capacidad del terreno. Aqui se hace 3 ver. si viene con momento biaxial
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B = 4 m
L = 5 m
c := L/2 = 2.5 m
I := B*L^3/12 = 41.6667 m^4
A := B*L = 20 m^2
P = 140 tonnef
σ_max := P*(1 + t)/A + M*c/I = 13.44 tonnef/m^2
σ_admisible = 23 tonnef/m^2
if(σ_max < σ_admisible, "OK", "Redimensionar") = "OK"
# 3. DISEÑO
# a. Calculamos las cargas últimas para el diseño
Pu := 1.4*Pcm + 1.7*Pcv = 215.8 tonnef  # O se multiplica *1.6 el esfuerzo max
Mu := 1.4*Mcm + 1.7*Mcv = 151.6 tonnef*m
# Excentricidad:
e := Mu/Pu = 0.702502 m
L_6 := L/6 = 0.833333 m
if(e < L_6, "Caso normal", "Caso momento grande") = "Caso normal"
# b. Calculamos las presionces para el diseño
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σ1 := Pu/A + Mu*c/I = 19.886 tonnef/m^2
σ2 := Pu/A - Mu*c/I = 1.694 tonnef/m^2
# c. Realizamos la verificación por cortante por flexión Vu menor o igual al cortante del concreto por su reducción
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ϕ := 0.85
ϕVc := ϕ*0.53*sqrt(f'_c)*B*d*kgf^0.5/cm = 182.794 tonnef
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# Se evalua la cortante a la distancia "d" de la cara de la columna
L = 5 m
B = 4 m
d = 0.7 m
Lado := L
b = 0.5 m
a = 0.6 m
σ1 = 19.886 tonnef/m^2
σ2 = 1.694 tonnef/m^2
# Las coordenadas xc y yc están desde la esquina inferior izquierda de la columna
x_c = 19.8529 cm
y_c = 24.8529 cm
b1 := x_c
b2 := b - b1 = 30.1471 cm
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x := L/2 + b2 + d = 3.50147 m
σ3 := (σ1 - σ2)/Lado*x + σ2 = 14.4338 tonnef/m^2
Vu := (σ1 + σ3)/2*(Lado - x)*B = 102.858 tonnef
ϕVc = 182.794 tonnef
if(Vu < ϕVc, "Cumple", "No cumple") = "Cumple"
# d. Verificamos la cortante por punzonamiento
# -Factor B0 de relación entre los lados de la columna (Lado mayor entre lado menor)
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β0 := a/b = 1.2
d = 0.7 m
# -El perimetro de punzonamiento es: a "d/2" de las caras de la columna
bo := 2*(a + d + b + d) = 5 m  # El bo por AutoCAD sacalo nomas, el programado está mal
ϕVc := ϕ*(0.53 + 1.1/β0)*sqrt(f'_c)*bo*d*kgf^0.5/cm = 623.685 tonnef
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σ3 = 14.4338 tonnef/m^2
b1 = 19.8529 cm
b2 = 30.1471 cm
L = 5 m
B = 4 m
d = 0.7 m
Lado := L
b = 0.5 m
a = 0.6 m
x := (L - b1)/2 - d = 1.70074 m
σ1 = 19.886 tonnef/m^2
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σ2 = 1.694 tonnef/m^2
σ4 := (σ1 - σ2)/Lado*x + σ2 = 7.88196 tonnef/m^2
σ3 = 14.4338 tonnef/m^2
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σ4 = 7.88196 tonnef/m^2
# El Ap por AutoCAD sacalo nomas, el programado está mal
At := L*B = 20 m^2
Ap := (a + d)*(tw + d) + (b - tw - d/2 + d/2)*(tz + d) = 1.4725 m^2
Ap' := At - Ap = 18.5275 m^2
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Vu := (σ1 + σ2)/2*At - (σ3 + σ4)/2*Ap = 199.37 tonnef
ϕVc = 623.685 tonnef
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if(Vu < ϕVc, "Cumple", "No cumple") = "Cumple"
# e. Diseño del refuerzo
# e.1. Diseño del refuerzo longitudinal
# Momento en la cara de la columna
L = 5 m
B = 4 m
d = 0.7 m
Lado := L
b = 0.5 m
a = 0.6 m
x := (L - b1 + tw)/2 = 2.52574 m
σ1 = 19.886 tonnef/m^2
σ2 = 1.694 tonnef/m^2
σ5 := (σ1 - σ2)/Lado*x + σ2 = 10.8836 tonnef/m^2
y := L - x = 2.47426 m
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# Momento en la cara de la columna para 1 m de profundidad
Mu := (σ5*y^2/2 + (σ1 - σ5)*y/2*2*y/3)*m = 51.6855 tonnef*m
b := 1 m
d = 0.7 m
# El y es el m
# Acero minimo
Asmin := 0.0018*b*d = 12.6 cm^2
# Acero maximo
pb := 0.85*0.85*f'_c/f_y*(6000/(6000 + 4200)) = 0.02125
pmax := 0.75*pb = 0.0159375
Asmax := pmax*b*d = 111.562 cm^2
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φ := 0.9
B = 400 cm
k1 := (φ*f_y^2/(1.7*f'_c*b)) cm^3/kgf = 444.706
k2 := (φ*f_y*d)*cm/kgf = 264600
k3 := Mu/(kgf*cm) = 5168551
A_ss := k1*A_s^2 - k2*A_s + k3 == 0 solve, A_s → [20.2206352006; 574.779364799]
As_1 := round(A_ss[0, 0], 4)*cm^2 = 20.2206 cm^2
As_1 = 20.2206 cm^2
# Acero seleccionado:
As := As_1
# Empleando varillas de:
cm2 := cm^2
[ϕ_cm; As_var] := [list choice]  # options: 1/4", 3/8", 1/2", 5/8", 3/4", 1", 1 1/4", 1 3/8", 1 1/2"
table  # each column defines a variable
    ϕ_var | ϕ_diam (cm) | ϕ_area (cm^2)
    " 1/4" | 0.64 | 0.32
    " 3/8" | 0.95 | 0.71
    "1/2" | 1.27 | 1.27
    "5/8" | 1.59 | 1.98
    "3/4" | 1.91 | 2.85
    "1" | 2.54 | 5.07
    "1 1/4" | 3.18 | 7.94
    "1 3/8" | 3.49 | 9.57
    "1 1/2" | 3.81 | 11.4
end table
ϕ_cm = 1.91 cm
As_var = 2.85 cm^2
# Nº de varillas a colocar:
N := As*B/As_var*1/m = 28.3798
N := 29
# Separación:
r := 7.5 cm
S := (B - 2*r - ϕ_cm)/(N - 1) = 13.6818 cm
S := 10 cm
B = 4 m
N = 29
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# e. Diseño del refuerzo transversal:
Pu = 215.8 tonnef
A = 20 m^2
σ_constante := Pu/A = 10.79 tonnef/m^2
y_c = 24.8529 cm
a1 := y_c
a2 := a - a1 = 35.1471 cm
n := (B/2 - a1 + tz) = 2.00147 m  # n debe ser el maximo posible, sino usar B - (todo es)
# Para una profundidad de 1m
b = 1 m
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Mu := σ_constante*n^2/2*m = 21.6117 tonnef*m
φ := 0.9
L = 500 cm
k1 := (φ*f_y^2/(1.7*f'_c*b)) cm^3/kgf = 444.706
k2 := (φ*f_y*d)*cm/kgf = 264600
k3 := Mu/(kgf*cm) = 2161175
A_ss := k1*A_s^2 - k2*A_s + k3 == 0 solve, A_s → [8.28301289456; 586.716987105]
As_1 := round(A_ss[0, 0], 4)*cm^2 = 8.283 cm^2
As_1 = 8.283 cm^2
# Acero minimo
Asmin := 0.0018*b*d = 12.6 cm^2
# Acero seleccionado:
As := Asmin
# Empleando varillas de:
cm2 := cm^2
[ϕ_cm; As_var] := [list choice]  # options: 1/4", 3/8", 1/2", 5/8", 3/4", 1", 1 1/4", 1 3/8", 1 1/2"
table  # each column defines a variable
    ϕ_var | ϕ_diam (cm) | ϕ_area (cm^2)
    " 1/4" | 0.64 | 0.32
    " 3/8" | 0.95 | 0.71
    "1/2" | 1.27 | 1.27
    "5/8" | 1.59 | 1.98
    "3/4" | 1.91 | 2.85
    "1" | 2.54 | 5.07
    "1 1/4" | 3.18 | 7.94
    "1 3/8" | 3.49 | 9.57
    "1 1/2" | 3.81 | 11.4
end table
ϕ_cm = 1.91 cm
As_var = 2.85 cm^2
# Nº de varillas a colocar:
N := As*L/As_var*1/m = 22.1053
N := 22
# Separación:
r := 7.5 cm
S := (L - 2*r - ϕ_cm)/(N - 1) = 23.0043 cm
S := 20 cm
L = 5 m
N = 22
