# DISEÑO DE ZAPATA COMBINADA
f'_c := 210 kgf/cm^2
f_y := 4200 kgf/cm^2
D_f := 2 m
γ_terreno := 1.9 tonnef/m^3
sobrecarga := 0 tonnef/m^2
q_a := 2.5 kgf/cm^2
γ_z := 2.4 tonnef/m^3
# Columna 1 | Columna 2
Pcm1 := 40 tonnef
Pcm2 := 55 tonnef
Pcv1 := 32 tonnef
Pcv2 := 45 tonnef
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# a1
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# a2
# b1
# b2
L_c := 4.5 m
a1 := 35 cm
a2 := 40 cm
b1 := 35 cm
b2 := 40 cm
# Aceros longitudinales
ϕ_max := 1 in = 2.54 cm
# 1. DIMENSIONAMIENTO
ld1 := 0.08*ϕ_max*f_y/sqrt(f'_c)*cm/kgf^0.5 = 58.893 cm
ld2 := 0.004*ϕ_max*f_y*cm^2/kgf = 42.672 cm
ld3 := 20 cm
ld_max := max(ld1, ld2, ld3) = 58.893 cm
ld_5 := 5*round(ld_max/(5 cm), 0) cm = 60 cm
ld_10 := 10*round(ld_max/(10 cm), 0) cm = 60 cm
ld := ld_10
# El peralte efectivo es:
d := ld + 10 cm = 70 cm
# La altura de la zapata es:
h := d + 10 cm = 80 cm
# 1.2. Capacidad portante neta del terreno
q_e := q_a - (D_f - h)*γ_terreno - γ_z*h
q_e = 20.8 tonnef/m^2
# 1.3. Área de la zapata
# Cargas de servicio
Ps1 := Pcm1 + Pcv1 = 72 tonnef
Ps2 := Pcm2 + Pcv2 = 100 tonnef
# Peso de servicio total:
Ps := Ps1 + Ps2 = 172 tonnef
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# Carga última
Pu1 := 1.4*Pcm1 + 1.7*Pcv1 = 110.4 tonnef
Pu2 := 1.4*Pcm2 + 1.7*Pcv2 = 153.5 tonnef
Pu := Pu1 + Pu2 = 263.9 tonnef
A := Ps/q_e = 8.26923 m^2
# 1.3.1. Longitud de la zapata
x := Ps2*L_c/Ps = 2.61628 m
x' := x + a1/2 = 2.79128 m
L := 2*x' = 5.58256 m
L_5 := 5*round(L/(5 cm), 0) cm = 5.6 m
L_10 := 10*round(L/(10 cm), 0) cm = 5.6 m
L := min(L_5, L_10) = 5.6 m
# 1.3.2. Ancho de la zapata
B := A/L = 1.47665 m
B_5 := 5*round(B/(5 cm), 0) cm = 1.5 m
B_10 := 10*round(B/(10 cm), 0) cm = 1.5 m
B := min(B_5, B_10) = 1.5 m
# Se aumenta B para que no halla necesidad de colocar viga transversal
B := if((B - 2*max(a1/m, a2/m)*m)/2 ≥ h, B, max(a1/m, a2/m)*m + 2*h + 10 cm)
B = 2.1 m
B_5 := 5*round(B/(5 cm), 0) cm = 2.1 m
B_10 := 10*round(B/(10 cm), 0) cm = 2.1 m
B := min(B_5, B_10) = 2.1 m
# 1.3.3. Área de la zapata final
A_z := B*L = 11.76 m^2
# 2. Presiones de diseño
q'u := Pu/A_z = 22.4405 tonnef/m^2
qu := q'u*B = 47.125 tonnef/m
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Pe := Pu1
Pi := Pu2
Wi := qu
te := a1
ti := a2
a := L - L_c - a1/2 - a2/2 = 0.725 m
x_o := Pe/Wi = 2.34271 m
FC1 := Pe - Wi*te = 93.9063 tonnef
FC2 := Pi - Wi*(a + ti) = 100.484 tonnef
FC3 := Wi*a = 34.1656 tonnef
x_o2 := FC2/(Pi/ti - Wi) = 0.298505 m
M_max1 := Pe*(x_o - te/2) - Wi*x_o^2/2 = 109.997 tonnef*m
M_1 := Wi*(a + ti)^2/2 - Pi*ti/2 = -0.878711 tonnef*m
M_2 := Wi*a^2/2 = 12.385 tonnef*m
M_3 := M_1 + x_o2*FC2/2 = 14.1189 tonnef*m
M_max2 := max(M_1, M_2, M_3) = 14.1189 tonnef*m
# 3. Verificación por flexión
# 3.1. Verificación por cortante
# Columna 1
ϕ := 0.85
ϕVc := ϕ*0.53*sqrt(f'_c)*B*d*kgf^0.5/cm = 95.967 tonnef
# Se evalua la cortante a la distancia "d" de la cara de la columna
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x_o3 := x_o - a1 = 1.99271 m
Vu_d := FC1/x_o3*(x_o3 - d) = 60.9188 tonnef
if(Vu_d ≤ ϕVc, "OK", "ERROR") = "OK"
# Columna 2
ϕ := 0.85
ϕVc := ϕ*0.53*sqrt(f'_c)*B*d*kgf^0.5/cm = 95.967 tonnef
# Se evalua la cortante a la distancia "d" de la cara de la columna
x_o3 := L_c + a1/2 - a2/2 - x_o = 2.13229 m
Vu_d := FC2/x_o3*(x_o3 - d) = 67.4969 tonnef
if(Vu_d ≤ ϕVc, "OK", "ERROR") = "OK"
# 4. Verificación de corte por punzonamiento
# 4.1. Verificación por cortante
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# 4.1.1. Columna exterior 1
ϕ := 0.85
b0_1 := 2*(a1 + d/2) + (b1 + d/2*2) = 245 cm
A0_1 := (a1 + d/2)*(b1 + d/2*2) = 7350 cm^2
ϕVc := ϕ*1.1*sqrt(f'_c)*b0_1*d*kgf^0.5/cm = 232.373 tonnef
Vu1 := Pu1 - q'u*A0_1 = 93.9063 tonnef
if(Vu1 ≤ ϕVc, "OK", "ERROR") = "OK"
# 4.1.2. Columna interior 2
ϕ := 0.85
b0_2 := 2*(a2 + d/2*2) + 2*(b2 + d/2*2) → 280*cm + 160*cm = 440 cm
A0_2 := (a2 + d/2*2)*(b2 + d/2*2) → (70*cm + 40*cm)^2 = 12100 cm^2
ϕVc := ϕ*1.1*sqrt(f'_c)*b0_2*d*kgf^0.5/cm = 417.323 tonnef
Vu2 := Pu2 - q'u*A0_2 = 126.347 tonnef
if(Vu2 ≤ ϕVc, "OK", "ERROR") = "OK"
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# 2. Diseño
# 2.5. Diseño del refuerzo
# 2.5.1. Diseño del refuerzo longitudinal
# Acero negativo
Mu := round(M_max1/(tonnef*m), 2)*tonnef*m = 110 tonnef*m
φ := 0.9
B = 210 cm
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k1 := (φ*f_y^2/(1.7*f'_c*B)) cm^3/kgf = 211.765
k2 := (φ*f_y*d)*cm/kgf = 264600
k3 := Mu/(kgf*cm) = 11000000
A_ss := k1*A_s^2 - k2*A_s + k3 == 0 solve, A_s → [43.0558208512; 1206.44417915]
As_1 := round(A_ss[0, 0], 2)*cm^2 = 43.06 cm^2
# Acero minimo
A_smin1 := 0.0018*B*d = 26.46 cm^2
A_smin2 := 0.7*sqrt(f'_c)/f_y*(kgf/cm^2)^0.5*B*d = 35.5039 cm^2
As_min := min(A_smin1, A_smin2) = 26.46 cm^2
# As seleccionado:
table  # each column defines a variable
    ϕ_var | ϕ_diam (cm) | ϕ_area (cm^2)
    " 1/4" | 0.64 | 0.32
    " 3/8" | 0.95 | 0.71
    "1/2" | 1.27 | 1.27
    "5/8" | 1.59 | 1.98
    "3/4" | 1.91 | 2.85
    "1" | 2.54 | 5.07
    "1 1/4" | 3.18 | 7.94
    "1 3/8" | 3.49 | 9.57
    "1 1/2" | 3.81 | 11.4
end table
As := max(As_1, As_min) = 43.06 cm^2
# Acero minimo:
cm2 := cm^2
[ϕ_cm; As_var] := [list choice]  # options: 1/4", 3/8", 1/2", 5/8", 3/4", 1", 1 1/4", 1 3/8", 1 1/2"
ϕ_cm = 1.91 cm
As_var = 2.85 cm^2
# Número de varillas:
N := As_min/As_var = 9.28421
N := if((round(N, 0) - N) < 0, round(N, 0) + 1, round(N, 0)) = 10
N = 10
# Separación
r := 7.5 cm
S := (B - 2*r - ϕ_cm)/(N - 1) = 21.4544 cm
S := if(5*round(S/(5 cm), 0)*cm > S, 5*round(S/(5 cm), 0) - 5, 5*round(S/(5 cm), 0))
S := S*cm = 20 cm
ϕ_Alnegativomin := ϕ_cm
N_Alnegativomin := N
S_Alnegativomin := S
# Acero en momento negativo
As2 := As - As_min = 16.6 cm^2
table  # each column defines a variable
    ϕ_var | ϕ_diam (cm) | ϕ_area (cm^2)
    " 1/4" | 0.64 | 0.32
    " 3/8" | 0.95 | 0.71
    "1/2" | 1.27 | 1.27
    "5/8" | 1.59 | 1.98
    "3/4" | 1.91 | 2.85
    "1" | 2.54 | 5.07
    "1 1/4" | 3.18 | 7.94
    "1 3/8" | 3.49 | 9.57
    "1 1/2" | 3.81 | 11.4
end table
[ϕ_cm; As_var] := [list choice]  # options: 1/4", 3/8", 1/2", 5/8", 3/4", 1", 1 1/4", 1 3/8", 1 1/2"
ϕ_cm = 1.91 cm
As_var = 2.85 cm^2
# Número de varillas:
N := As2/As_var = 5.82456
N := if((round(N, 0) - N) < 0, round(N, 0) + 1, round(N, 0)) = 6
N = 6
# Separación
r := 7.5 cm
S := (B - 2*r - ϕ_cm)/(N - 1) = 38.618 cm
S := if(5*round(S/(5 cm), 0)*cm > S, 5*round(S/(5 cm), 0) - 5, 5*round(S/(5 cm), 0))
S := S*cm = 35 cm
ϕ_Alnegativoextra := ϕ_cm
N_Alnegativoextra := N
S_Alnegativoextra := S
# Acero Positivo
Mu := round(M_max2/(tonnef*m), 2)*tonnef*m = 14.12 tonnef*m
φ := 0.9
B = 210 cm
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k1 := (φ*f_y^2/(1.7*f'_c*B)) cm^3/kgf = 211.765
k2 := (φ*f_y*d)*cm/kgf = 264600
k3 := Mu/(kgf*cm) = 1412000
A_ss := k1*A_s^2 - k2*A_s + k3 == 0 solve, A_s → [5.35934401444; 1244.14065599]
As_1 := round(A_ss[0, 0], 2)*cm^2 = 5.36 cm^2
# Acero minimo
A_smin1 := 0.0018*B*d = 26.46 cm^2
A_smin2 := 0.7*sqrt(f'_c)/f_y*(kgf/cm^2)^0.5*B*d = 35.5039 cm^2
As_min := min(A_smin1, A_smin2) = 26.46 cm^2
# As seleccionado:
table  # each column defines a variable
    ϕ_var | ϕ_diam (cm) | ϕ_area (cm^2)
    " 1/4" | 0.64 | 0.32
    " 3/8" | 0.95 | 0.71
    "1/2" | 1.27 | 1.27
    "5/8" | 1.59 | 1.98
    "3/4" | 1.91 | 2.85
    "1" | 2.54 | 5.07
    "1 1/4" | 3.18 | 7.94
    "1 3/8" | 3.49 | 9.57
    "1 1/2" | 3.81 | 11.4
end table
As := max(As_1, As_min) = 26.46 cm^2
cm2 := cm^2
[ϕ_cm; As_var] := [list choice]  # options: 1/4", 3/8", 1/2", 5/8", 3/4", 1", 1 1/4", 1 3/8", 1 1/2"
ϕ_cm = 1.91 cm
As_var = 2.85 cm^2
# Número de varillas:
N := As_min/As_var = 9.28421
N := if((round(N, 0) - N) < 0, round(N, 0) + 1, round(N, 0)) = 10
N = 10
# Separación
r := 7.5 cm
S := (B - 2*r - ϕ_cm)/(N - 1) = 21.4544 cm
S := if(5*round(S/(5 cm), 0)*cm > S, 5*round(S/(5 cm), 0) - 5, 5*round(S/(5 cm), 0))
S := S*cm = 20 cm
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ϕ_Alpositivomin := ϕ_cm
N_Alpositivomin := N
S_Alpositivomin := S
ϕ_Alpositivoextra := 0 cm
N_Alpositivoextra := 0
S_Alpositivoextra := 0 cm
# Porque el acero minimo cubrió todo
# 2.5. Diseño del refuerzo
# 2.5.1. Diseño del refuerzo transversal
# Columna 1
w1 := Pu1/B = 52.5714 tonnef/m
l1 := (B - b1)/2 = 0.875 m
Mu1 := w1*l1^2/2 = 20.125 tonnef*m
b := 1 m
As_min := 0.0018*b*d = 12.6 cm^2
φ := 0.9
B = 210 cm
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k1 := (φ*f_y^2/(1.7*f'_c*b)) cm^3/kgf = 444.706
k2 := (φ*f_y*d)*cm/kgf = 264600
k3 := Mu1/(kgf*cm) = 2012500
A_ss := k1*A_s^2 - k2*A_s + k3 == 0 solve, A_s → [7.70561248182; 587.294387518]
Asd := round(A_ss[0, 0], 2)*cm^2 = 7.71 cm^2
Astd := Asd*(a1 + d/2)*1/m = 5.397 cm^2
table  # each column defines a variable
    ϕ_var | ϕ_diam (cm) | ϕ_area (cm^2)
    " 1/4" | 0.64 | 0.32
    " 3/8" | 0.95 | 0.71
    "1/2" | 1.27 | 1.27
    "5/8" | 1.59 | 1.98
    "3/4" | 1.91 | 2.85
    "1" | 2.54 | 5.07
    "1 1/4" | 3.18 | 7.94
    "1 3/8" | 3.49 | 9.57
    "1 1/2" | 3.81 | 11.4
end table
[ϕ_cm; As_var] := [list choice]  # options: 1/4", 3/8", 1/2", 5/8", 3/4", 1", 1 1/4", 1 3/8", 1 1/2"
ϕ_cm = 1.91 cm
As_var = 2.85 cm^2
# Número de varillas:
N := As_min*(a1 + d/2)/m/As_var = 3.09474
N := if((round(N, 0) - N) < 0, round(N, 0) + 1, round(N, 0)) = 4
N = 4
# Separación
r := 7.5 cm
S := (b - r - ϕ_cm)/(N - 1) = 30.1967 cm
S := if(5*round(S/(5 cm), 0)*cm > S, 5*round(S/(5 cm), 0) - 5, 5*round(S/(5 cm), 0))
S := S*cm = 30 cm
ϕ_Atc1 := ϕ_cm
N_Atc1 := N
S_Atc1 := S
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# Columna 2
w2 := Pu2/B = 73.0952 tonnef/m
l1 := (B - b2)/2 = 0.85 m
Mu2 := w2*l1^2/2 = 26.4057 tonnef*m
b := 1 m
As_min := 0.0018*b*d = 12.6 cm^2
φ := 0.9
B = 210 cm
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k1 := (φ*f_y^2/(1.7*f'_c*b)) cm^3/kgf = 444.706
k2 := (φ*f_y*d)*cm/kgf = 264600
k3 := Mu2/(kgf*cm) = 2640565
A_ss := k1*A_s^2 - k2*A_s + k3 == 0 solve, A_s → [10.1527005694; 584.847299431]
Asd := round(A_ss[0, 0], 2)*cm^2 = 10.15 cm^2
Astd := Asd*(a2 + d)*1/m = 11.165 cm^2
As_min = 12.6 cm^2
table  # each column defines a variable
    ϕ_var | ϕ_diam (cm) | ϕ_area (cm^2)
    " 1/4" | 0.64 | 0.32
    " 3/8" | 0.95 | 0.71
    "1/2" | 1.27 | 1.27
    "5/8" | 1.59 | 1.98
    "3/4" | 1.91 | 2.85
    "1" | 2.54 | 5.07
    "1 1/4" | 3.18 | 7.94
    "1 3/8" | 3.49 | 9.57
    "1 1/2" | 3.81 | 11.4
end table
[ϕ_cm; As_var] := [list choice]  # options: 1/4", 3/8", 1/2", 5/8", 3/4", 1", 1 1/4", 1 3/8", 1 1/2"
ϕ_cm = 1.91 cm
As_var = 2.85 cm^2
# Número de varillas:
N := As_min*(a2 + d)*1/m/As_var = 4.86316
N := if((round(N, 0) - N) < 0, round(N, 0) + 1, round(N, 0)) = 5
N = 5
# Separación
r := 7.5 cm
S := (b - r - ϕ_cm)/(N - 1) = 22.6475 cm
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S := if(5*round(S/(5 cm), 0)*cm > S, 5*round(S/(5 cm), 0) - 5, 5*round(S/(5 cm), 0))
S := S*cm = 20 cm
ϕ_Atc2 := ϕ_cm
N_Atc2 := N
S_Atc2 := S
# 2.5. Diseño del refuerzo
# 2.5.1. Diseño del montaje
b := 100 cm
As_m := 0.0018*b*h = 14.4 cm^2
table  # each column defines a variable
    ϕ_var | ϕ_diam (cm) | ϕ_area (cm^2)
    " 1/4" | 0.64 | 0.32
    " 3/8" | 0.95 | 0.71
    "1/2" | 1.27 | 1.27
    "5/8" | 1.59 | 1.98
    "3/4" | 1.91 | 2.85
    "1" | 2.54 | 5.07
    "1 1/4" | 3.18 | 7.94
    "1 3/8" | 3.49 | 9.57
    "1 1/2" | 3.81 | 11.4
end table
[ϕ_cm; As_var] := [list choice]  # options: 1/4", 3/8", 1/2", 5/8", 3/4", 1", 1 1/4", 1 3/8", 1 1/2"
ϕ_cm = 1.91 cm
As_var = 2.85 cm^2
# Número de varillas:
N := As_m/As_var = 5.05263
N := if((round(N, 0) - N) < 0, round(N, 0) + 1, round(N, 0)) = 6
N = 6
# Separación
S := b*As_var/As_m = 19.7917 cm
S := if(5*round(S/(5 cm), 0)*cm ≥ S, 5*round(S/(5 cm), 0) - 5, 5*round(S/(5 cm), 0))
S := S*cm = 15 cm
ϕ_mon := ϕ_cm
N_mon := N
S_mon := S
# RESUMEN
ϕ_Alnegativomin = 1.91 cm
N_Alnegativomin = 10
S_Alnegativomin = 20 cm
ϕ_Alnegativoextra = 1.91 cm
N_Alnegativoextra = 6
S_Alnegativoextra = 35 cm
ϕ_Alpositivomin = 1.91 cm
N_Alpositivomin = 10
S_Alpositivomin = 20 cm
ϕ_Atc1 = 1.91 cm
N_Atc1 = 4
S_Atc1 = 30 cm
ϕ_Atc2 = 1.91 cm
N_Atc2 = 5
S_Atc2 = 20 cm
ϕ_mon = 1.91 cm
N_mon = 6
S_mon = 15 cm
l_trans1 := a1 + d/2 = 0.7 m
l_trans2 := a2 + d = 1.1 m
