# DISEÑO DE ZAPATA CONECTADA RECTANGULAR-CIRCULAR
f'_c := 280 kgf/cm^2
f_y := 4200 kgf/cm^2
D_f := 2.5 m
γ_terreno := 1.82 tonnef/m^3
sobrecarga := 0.5 tonnef/m^2
σ_admisible := 3.2 kgf/cm^2
γ_z := 2.4 tonnef/m^3
L_c := 7.25*m = 7.25 m
# C-1
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# b
b_1 := 55 cm
# a
a_1 := 55 cm
Pcm_1 := 105 tonnef
Pcv_1 := 60 tonnef
# Dirección longitudinal | Dirección transversal
Mcm_l1 := 0 tonnef*m
Mcm_t1 := 0 tonnef*m
Mcv_l1 := 0 tonnef*m
Mcv_t1 := 0 tonnef*m
# Sismo | Sismo
Psx_1 := 0 tonnef
Psy_1 := 0 tonnef
Msx_1 := 0 tonnef*m
Msy_1 := 0 tonnef*m
# C-2
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# D2
D2 := 75 cm
Pcm_2 := 142 tonnef
Pcv_2 := 74 tonnef
# Dirección longitudinal | Dirección transversal
Mcm_l2 := 0 tonnef*m
Mcm_t2 := 0 tonnef*m
Mcv_l2 := 0 tonnef*m
Mcv_t2 := 0 tonnef*m
# Sismo | Sismo
Psx_2 := 0 tonnef
Psy_2 := 0 tonnef
Msx_2 := 0 tonnef*m
Msy_2 := 0 tonnef*m
# Aceros longitudinales maximos
ϕ_vc := 1 in
ϕ_vc = 2.54 cm
# 1. DIMENSIONAMIENTO
ld1 := 0.08*ϕ_vc*f_y/sqrt(f'_c)*cm/kgf^0.5 = 51.0028 cm
ld2 := 0.004*ϕ_vc*f_y*cm^2/kgf = 42.672 cm
ld3 := 20 cm
ld_max := max(ld1, ld2, ld3) = 51.0028 cm
ld := 60 cm
# a. Calculamos el peralte efectivo es:
d := ld + 10 cm = 70 cm
# La altura de la zapata es:
h := d + 10 cm = 80 cm
# Capacidad portante neta del terreno
q_e := σ_admisible - (D_f - h)*γ_terreno - γ_z*h - sobrecarga
σ_admisible = 32 tonnef/m^2
D_f = 2.5 m
h = 0.8 m
γ_terreno = 1.82 tonnef/m^3
γ_z = 2.4 tonnef/m^3
sobrecarga = 0.5 tonnef/m^2
q_e = 26.486 tonnef/m^2
# Área de la zapata
# ZAPATA 1
# Cargas de servicio
P1 := Pcm_1 + Pcv_1 = 165 tonnef
M1 := Mcm_l1 + Mcv_l1 = 0 tonnef*m
q_e = 26.486 tonnef/m^2
A1 := 1.2*P1/q_e = 7.47565 m^2
LmenosB := (b_1 - a_1)/m = 0
LporB := A1/m^2 = 7.47565
B. := B^2 + LmenosB*B - LporB == 0 solve, B → [-2.73416303682; 2.73416303682]
B1 := 4 m
L.1 := A1/B1 = 1.86891 m
L1 := 1.9 m
L1*2 = 3.8 m
L1*2.5 = 4.75 m
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# La zapata 1 es L1xB1
# L
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L1 = 1.9 m
# B
B1 = 4 m
LmenosB2 := (L1 - B1)/m = -2.1
LmenosB := (b_1 - a_1)/m = 0
if(LmenosB2 == LmenosB, "OK", "Verificar") = "Verificar"
# Verifica, si esta bien ignora lo de arriba. Ignorar para zapatas conectadas
# EXCENTRICIDAD:
e := (L1 - b_1)/2 = 0.675 m
# Entonces:
L := L_c - e = 6.575 m
Voladox1 := L1 - b_1 = 1.35 m
Voladoy1 := (B1 - a_1)/2 = 1.725 m
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# 1 PRIMERA VERIFICACION - SIN SISMO
P1 := Pcm_1 + Pcv_1 = 165 tonnef
P1 = 165 tonnef
M1 := Mcm_l1 + Mcv_l1 = 0 tonnef*m
M1 = 0 tonnef*m
P2 := Pcm_2 + Pcv_2 = 216 tonnef
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M2 := Mcm_l2 + Mcv_l2 = 0 tonnef*m
P11 := P1
M11 := M1
P12 := P2
M12 := M2
R1 := P1 + (P1*e/L) - (M1 + M2)/L = 181.939 tonnef
t := 0.08  # Considerando 5% de peso propio (suelo bueno)
# Fijarse si cumple
σ1 := R1*(1 + t)/(B1*L1) + 6*(Mcm_t1 + Mcv_t1)/(L1*B1^2) = 25.8545 tonnef/m^2
σ_admisible = 32 tonnef/m^2
σ2 := R1*(1 + t)/(B1*L1) - 6*(Mcm_t1 + Mcv_t1)/(L1*B1^2) = 25.8545 tonnef/m^2
σ_admisible = 32 tonnef/m^2
P13 := R1 - P1
# ZAPATA 2
R2 := P2 - (P1*e/L) + (M1 + M2)/L = 199.061 tonnef
A2 := R2*(1 + t)/q_e = 8.11696 m^2
q_e = 26.486 tonnef/m^2
# Como es columna circular, B y L se recomienda iguales
sqrt(A2) = 2.84903 m
B2 := 2.9 m
L.2 := A2/B2 = 2.79895 m
L2 := 2.9 m
# La zapata 2 es L2xB2
# L
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L2 = 2.9 m
# B
B2 = 2.9 m
# Se recomienda que cumpla, para que tenga volados iguales
# Fijarse si cumple
σ1 := R2*(1 + t)/(B2*L2) + 6*(Mcm_t2 + Mcv_t2)/(L2*B2^2) = 25.5631 tonnef/m^2
σ_admisible = 32 tonnef/m^2
σ2 := R2*(1 + t)/(B2*L2) - 6*(Mcm_t2 + Mcv_t2)/(L2*B2^2) = 25.5631 tonnef/m^2
σ_admisible = 32 tonnef/m^2
# 2 SEGUNDA VERIFICACIÓN
# Con momentos de sismo en dirección longitudinal y en sentido antihorario
# ZAPATA 1
L = 6.575 m
P1 := Pcm_1 + Pcv_1 + Psx_1 = 165 tonnef
Pcm_1 = 105 tonnef
M1 := Mcm_l1 + Mcv_l1 - Msx_1 = 0 tonnef*m
Pcv_1 = 60 tonnef
Psx_1 = 0 tonnef
P2 := Pcm_2 + Pcv_2 + Psx_2 = 216 tonnef
M2 := Mcm_l2 + Mcv_l2 - Msx_2 = 0 tonnef*m
P21 := P1
R1 := P1 + (P1*e/L) - (M1 + M2)/L = 181.939 tonnef
M21 := M1
P22 := P2
M22 := M2  # Fijarse si cumple
σ1 := R1*(1 + t)/(B1*L1) + 6*(Mcm_t1 + Mcv_t1)/(L1*B1^2) = 25.8545 tonnef/m^2
σ_admisible*1.3 = 41.6 tonnef/m^2
σ2 := R1*(1 + t)/(B1*L1) - 6*(Mcm_t1 + Mcv_t1)/(L1*B1^2) = 25.8545 tonnef/m^2
σ_admisible*1.3 = 41.6 tonnef/m^2
# ZAPATA 2
R2 := P2 - (P1*e/L) + (M1 + M2)/L = 199.061 tonnef  # Fijarse si cumple
σ1 := R2*(1 + t)/(B2*L2) + 6*(Mcm_t2 + Mcv_t2)/(L2*B2^2) = 25.5631 tonnef/m^2
σ_admisible*1.3 = 41.6 tonnef/m^2
σ2 := R2*(1 + t)/(B2*L2) - 6*(Mcm_t2 + Mcv_t2)/(L2*B2^2) = 25.5631 tonnef/m^2
σ_admisible*1.3 = 41.6 tonnef/m^2
P23 := R1 - P1
# 3 TERCERA VERIFICACIÓN
# Con momentos de sismo en dirección longitudinal y en sentido horario
# ZAPATA 1
P1 := Pcm_1 + Pcv_1 - Psx_1 = 165 tonnef
L = 6.575 m
M1 := Mcm_l1 + Mcv_l1 + Msx_1 = 0 tonnef*m
P2 := Pcm_2 + Pcv_2 - Psx_2 = 216 tonnef
M2 := Mcm_l2 + Mcv_l2 + Msx_2 = 0 tonnef*m
R1 := P1 + (P1*e/L) - (M1 + M2)/L = 181.939 tonnef
# Fijarse si cumple
σ1 := R1*(1 + t)/(B1*L1) + 6*(Mcm_t1 + Mcv_t1)/(L1*B1^2) = 25.8545 tonnef/m^2
σ_admisible*1.3 = 41.6 tonnef/m^2
σ2 := R1*(1 + t)/(B1*L1) - 6*(Mcm_t1 + Mcv_t1)/(L1*B1^2) = 25.8545 tonnef/m^2
σ_admisible*1.3 = 41.6 tonnef/m^2
# ZAPATA 2
R2 := P2 - (P1*e/L) + (M1 + M2)/L = 199.061 tonnef  # Fijarse si cumple
σ1 := R2*(1 + t)/(B2*L2) + 6*(Mcm_t2 + Mcv_t2)/(L2*B2^2) = 25.5631 tonnef/m^2
σ_admisible*1.3 = 41.6 tonnef/m^2
σ2 := R2*(1 + t)/(B2*L2) - 6*(Mcm_t2 + Mcv_t2)/(L2*B2^2) = 25.5631 tonnef/m^2
σ_admisible*1.3 = 41.6 tonnef/m^2
P31 := P1
M31 := M1
P32 := P2
M32 := M2
P33 := R1 - P1
# 4 CUARTA VERIFICACIÓN
# Con momentos de sismo en dirección transversal
# ZAPATA 1
P1 := Pcm_1 + Pcv_1 = 165 tonnef
L = 6.575 m
M1 := Mcm_l1 + Mcv_l1 = 0 tonnef*m
P2 := Pcm_2 + Pcv_2 = 216 tonnef
M2 := Mcm_l2 + Mcv_l2 = 0 tonnef*m
R1 := P1 + (P1*e/L) - (M1 + M2)/L = 181.939 tonnef
σ1 := (R1 + Psy_1)*(1 + t)/(B1*L1) + 6*(Mcm_t1 + Mcv_t1 + Msy_1)/(L1*B1^2) = 25.8545 tonnef/m^2
σ1 = 25.8545 tonnef/m^2
σ_admisible*1.3 = 41.6 tonnef/m^2  # Fijarse si cumple
σ2 := (R1 + Psy_1)*(1 + t)/(B1*L1) - 6*(Mcm_t1 + Mcv_t1 + Msy_1)/(L1*B1^2) = 25.8545 tonnef/m^2
σ2 = 25.8545 tonnef/m^2
σ_admisible*1.3 = 41.6 tonnef/m^2  # Fijarse si cumple
# ZAPATA 2
R2 := P2 - (P1*e/L) + (M1 + M2)/L = 199.061 tonnef
σ1 := (R2 + Psy_2)*(1 + t)/(B2*L2) + 6*(Mcm_t2 + Mcv_t2 + Msy_2)/(L2*B2^2) = 25.5631 tonnef/m^2
σ1 = 25.5631 tonnef/m^2
σ_admisible*1.3 = 41.6 tonnef/m^2  # Fijarse si cumple
σ2 := (R2 + Psy_2)*(1 + t)/(B2*L2) - 6*(Mcm_t2 + Mcv_t2 + Msy_2)/(L2*B2^2) = 25.5631 tonnef/m^2
σ2 = 25.5631 tonnef/m^2
σ_admisible*1.3 = 41.6 tonnef/m^2  # Fijarse si cumple
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P41 := P1
M41 := M1
P42 := P2
M42 := M2
P43 := R1 - P1
# Eliges los esfuerzos máximos menores a 40 ton/m2 de cada zapata
# Esfuerzos ultimos
# Para la zapata 1:
σ1_max := 25.563
σ1u := σ1_max*1.6*tonnef/m^2 = 40.9008 tonnef/m^2
# Para la zapata 2:
σ2_max := 25.563
σ2u := σ2_max*1.6*tonnef/m^2 = 40.9008 tonnef/m^2
# DISEÑO
# Zapata 1
# Diseño por punzonamiento
# Asumiendo un peralte efectivo de:
d = 0.7 m
h := d + 10 cm = 80 cm
Ao := (b_1 + d/2)*(d + a_1) = 1.125 m^2
b_1 = 0.55 m
a_1 = 0.55 m
A1 := B1*L1 = 7.6 m^2
B1 = 4 m
L1 = 1.9 m
bo := (b_1 + d/2)*2 + (d + a_1) = 3.05 m
# Corte de diseño por punzonamiento:
Vu := σ1u*(A1 - Ao) = 264.833 tonnef
# Corte resistente por punzonamiento:
d. := d/cm = 70
bo. := bo/cm = 305
f'c. := f'_c/(kgf/cm^2) = 280
# -Factor B0 de relación entre los lados de la columna (Lado mayor entre lado menor)
β0 := b_1/a_1 = 1
a_1 = 55 cm
b_1 = 55 cm
ϕVc := 0.85*((0.53 + 1.1/β0)*sqrt(f'c.)*bo.*d.)*tonnef/1000 = 494.975 tonnef
# el tonnef/1000 no se escribe en la resolución.
# Si no cumple, se aumenta el peralte efectivo "d"
if(Vu < ϕVc, "Cumple", "No cumple") = "Cumple"
# Diseño por cortante
# Trabajando por metro de ancho en el volado más grande
# Volado más grande de:
Voladoy1 = 1.725 m
σ1u = 40.9008 tonnef/m^2
Vu := σ1u*(Voladoy1 - d)*m = 41.9233 tonnef
b. := 100  # cm
d. = 70  # cm
f'c. = 280  # kgf/cm2
ϕVc := 0.85*(0.53*sqrt(f'c.)*b.*d.)*tonnef/1000 = 52.7681 tonnef
if(Vu < ϕVc, "Cumple", "No cumple") = "Cumple"
# Diseño por flexión
# Volado en el eje y
Voladoy1 = 1.725 m
Vola := Voladoy1 = 1.725 m
σ1u = 40.9008 tonnef/m^2
Mu := σ1u*Vola^2/2*m = 60.8527 tonnef*m
b := 1 m
d = 0.7 m
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φ := 0.9
L1 = 190 cm
k1 := (φ*f_y^2/(1.7*f'_c*b)) cm^3/kgf = 333.529
k2 := (φ*f_y*d)*cm/kgf = 264600
k3 := Mu/(kgf*cm) = 6085272
A_ss := k1*A_s^2 - k2*A_s + k3 == 0 solve, A_s → [23.7064001545; 769.626933179]
As_1 := round(A_ss[0, 0], 4)*cm^2 = 23.7064 cm^2
As_1 = 23.7064 cm^2
# Acero minimo
Asmin := 0.0018*b*d = 12.6 cm^2
As := As_1 = 23.7064 cm^2
# Empleando varillas de:
cm2 := cm^2
[ϕ_cm; As_var] := [list choice]  # options: 1/4", 3/8", 1/2", 5/8", 3/4", 1", 1 1/4", 1 3/8", 1 1/2"
table  # each column defines a variable
    ϕ_var | ϕ_diam (cm) | ϕ_area (cm^2)
    " 1/4" | 0.64 | 0.32
    " 3/8" | 0.95 | 0.71
    "1/2" | 1.27 | 1.27
    "5/8" | 1.59 | 1.98
    "3/4" | 1.91 | 2.85
    "1" | 2.54 | 5.07
    "1 1/4" | 3.18 | 7.94
    "1 3/8" | 3.49 | 9.57
    "1 1/2" | 3.81 | 11.4
end table
ϕ_cm = 1.91 cm
As_var = 2.85 cm^2
# Nº de varillas a colocar:
N := As*b/As_var*1/m = 8.31804
N := 8
# Separación:
S := (b - ϕ_cm)/(N - 1) = 14.0129 cm
S := 10 cm
# Ya que se analizó para un metro lineal de profundidad, solo se toma en cuenta las varillas y su separación
ϕ_cm = 1.91 cm
# Cada
S = 10 cm
As_var = 2.85 cm^2
# Diseño por flexión
# Volado en el eje x
Voladox1 = 1.35 m
Vola := Voladox1 = 1.35 m
Mu := σ1u*Vola^2/2*m = 37.2709 tonnef*m
b := 1 m
d = 0.7 m
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φ := 0.9
L1 = 190 cm
k1 := (φ*f_y^2/(1.7*f'_c*b)) cm^3/kgf = 333.529
k2 := (φ*f_y*d)*cm/kgf = 264600
k3 := Mu/(kgf*cm) = 3727085
A_ss := k1*A_s^2 - k2*A_s + k3 == 0 solve, A_s → [14.3451245228; 778.988208811]
As_1 := round(A_ss[0, 0], 4)*cm^2 = 14.3451 cm^2
As_1 = 14.3451 cm^2
# Acero minimo
Asmin := 0.0018*b*d = 12.6 cm^2
As := As_1 = 14.3451 cm^2
# Empleando varillas de:
cm2 := cm^2
[ϕ_cm; As_var] := [list choice]  # options: 1/4", 3/8", 1/2", 5/8", 3/4", 1", 1 1/4", 1 3/8", 1 1/2"
table  # each column defines a variable
    ϕ_var | ϕ_diam (cm) | ϕ_area (cm^2)
    " 1/4" | 0.64 | 0.32
    " 3/8" | 0.95 | 0.71
    "1/2" | 1.27 | 1.27
    "5/8" | 1.59 | 1.98
    "3/4" | 1.91 | 2.85
    "1" | 2.54 | 5.07
    "1 1/4" | 3.18 | 7.94
    "1 3/8" | 3.49 | 9.57
    "1 1/2" | 3.81 | 11.4
end table
ϕ_cm = 1.91 cm
As_var = 2.85 cm^2
# Nº de varillas a colocar:
N := As*b/As_var*1/m = 5.03337
N := 6
# Separación:
S := (b - ϕ_cm)/(N - 1) = 19.618 cm
S := 15 cm
# Ya que se analizó para un metro lineal de profundidad, solo se toma en cuenta las varillas y su separación
ϕ_cm = 1.91 cm
# Cada
S = 15 cm
As_var = 2.85 cm^2
# Zapata 2
# Diseño por punzonamiento
# Asumiendo un peralte efectivo de:
d = 0.7 m
h := d + 10 cm = 0.8 m
Ao := π*(D2 + d)^2/4 = 1.6513 m^2
D2 = 75 cm
A2 := B2*L2 = 8.41 m^2
B2 = 2.9 m
L2 = 2.9 m
bo := π*(D2 + d) = 4.55531 m
# Corte de diseño por punzonamiento:
Vu := σ2u*(A2 - Ao) = 276.436 tonnef
σ2u = 40.9008 tonnef/m^2
# Corte resistente por punzonamiento:
d. := d/cm = 70
bo. := bo/cm = 455.531
f'c. := f'_c/(kgf/cm^2) = 280
β0 := 1
ϕVc := 0.85*((0.53 + 1.1/β0)*sqrt(f'c.)*bo.*d.)*tonnef/1000 = 739.267 tonnef
# el tonnef/1000 no se escribe en la resolución.
# Si no cumple, se aumenta el peralte efectivo "d"
if(Vu < ϕVc, "Cumple", "No cumple") = "Cumple"
# Diseño por cortante
# Trabajando por metro de ancho en el volado más grande
# Volado más grande de:
# Pasamos a columna cuadrada
a_2 := sqrt((π*D2^2/4)) = 0.66467 m
Voladoy2 := (B2 - a_2)/2 = 1.11766 m
Vu := σ2u*(Voladoy2 - d)*m = 17.0828 tonnef
b. := 100  # cm
d. = 70  # cm
f'c. = 280  # kgf/cm2
ϕVc := 0.85*(0.53*sqrt(f'c.)*b.*d.)*tonnef/1000 = 52.7681 tonnef
if(Vu < ϕVc, "Cumple", "No cumple") = "Cumple"
# Diseño por flexión
# Volado en el eje y
Voladoy2 = 1.11766 m
Vola := Voladoy2 = 1.11766 m
Mu := σ2u*Vola^2/2*m = 25.5461 tonnef*m
b := 1 m
d = 0.7 m
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φ := 0.9
L2 = 290 cm
k1 := (φ*f_y^2/(1.7*f'_c*b)) cm^3/kgf = 333.529
k2 := (φ*f_y*d)*cm/kgf = 264600
k3 := Mu/(kgf*cm) = 2554613
A_ss := k1*A_s^2 - k2*A_s + k3 == 0 solve, A_s → [9.7750637359; 783.558269597]
As_1 := round(A_ss[0, 0], 4)*cm^2 = 9.7751 cm^2
As_1 = 9.7751 cm^2
# Acero minimo
Asmin := 0.0018*b*d = 12.6 cm^2
As := As_1 = 9.7751 cm^2
# Empleando varillas de:
cm2 := cm^2
[ϕ_cm; As_var] := [list choice]  # options: 1/4", 3/8", 1/2", 5/8", 3/4", 1", 1 1/4", 1 3/8", 1 1/2"
table  # each column defines a variable
    ϕ_var | ϕ_diam (cm) | ϕ_area (cm^2)
    " 1/4" | 0.64 | 0.32
    " 3/8" | 0.95 | 0.71
    "1/2" | 1.27 | 1.27
    "5/8" | 1.59 | 1.98
    "3/4" | 1.91 | 2.85
    "1" | 2.54 | 5.07
    "1 1/4" | 3.18 | 7.94
    "1 3/8" | 3.49 | 9.57
    "1 1/2" | 3.81 | 11.4
end table
ϕ_cm = 1.91 cm
As_var = 2.85 cm^2
# Nº de varillas a colocar:
N := As*b/As_var*1/m = 3.42986
N := 5
# Separación:
S := (b - ϕ_cm)/(N - 1) = 24.5225 cm
S := 20 cm
# Ya que se analizó para un metro lineal de profundidad, solo se toma en cuenta las varillas y su separación
ϕ_cm = 1.91 cm
# Cada
S = 20 cm
As_var = 2.85 cm^2
# Diseño por flexión
# Volado en el eje x
# Lo mismo que en y, no se hace esto
b_2 := a_2
Voladox2 := (L2 - b_2)/2 = 1.11766 m
Vola := Voladox2 = 1.11766 m
Mu := σ2u*Vola^2/2*m = 25.5461 tonnef*m
b := 1 m
d = 0.7 m
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φ := 0.9
B2 = 290 cm
k1 := (φ*f_y^2/(1.7*f'_c*b)) cm^3/kgf = 333.529
k2 := (φ*f_y*d)*cm/kgf = 264600
k3 := Mu/(kgf*cm) = 2554613
A_ss := k1*A_s^2 - k2*A_s + k3 == 0 solve, A_s → [9.7750637359; 783.558269597]
As_1 := round(A_ss[0, 0], 4)*cm^2 = 9.7751 cm^2
As_1 = 9.7751 cm^2
# Acero minimo
Asmin := 0.0018*b*d = 12.6 cm^2
As := As_1 = 9.7751 cm^2
# Empleando varillas de:
cm2 := cm^2
[ϕ_cm; As_var] := [list choice]  # options: 1/4", 3/8", 1/2", 5/8", 3/4", 1", 1 1/4", 1 3/8", 1 1/2"
table  # each column defines a variable
    ϕ_var | ϕ_diam (cm) | ϕ_area (cm^2)
    " 1/4" | 0.64 | 0.32
    " 3/8" | 0.95 | 0.71
    "1/2" | 1.27 | 1.27
    "5/8" | 1.59 | 1.98
    "3/4" | 1.91 | 2.85
    "1" | 2.54 | 5.07
    "1 1/4" | 3.18 | 7.94
    "1 3/8" | 3.49 | 9.57
    "1 1/2" | 3.81 | 11.4
end table
ϕ_cm = 1.91 cm
As_var = 2.85 cm^2
# Nº de varillas a colocar:
N := As*b/As_var*1/m = 3.42986
N := 6
# Separación:
S := (b - ϕ_cm)/(N - 1) = 19.618 cm
S := 20 cm
# Ya que se analizó para un metro lineal de profundidad, solo se toma en cuenta las varillas y su separación
ϕ_cm = 1.91 cm
# Cada
S = 20 cm
As_var = 2.85 cm^2
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# Puntos para envolvente
# DMF
e = 0.675 m  # excentricidad
L = 6.575 m
# 1er linea | 2da linea
M11 = 0 tonnef*m
M21 = 0 tonnef*m
e = 0.675 m
e = 0.675 m
M13_e := P11*e - M11 = 111.375 tonnef*m
M23_e := P21*e - M21 = 111.375 tonnef*m
L = 6.575 m
L = 6.575 m
M12 = 0 tonnef*m
M22 = 0 tonnef*m
# 3era linea | 4ta linea = 1era linea
M31 = 0 tonnef*m
M41 = 0 tonnef*m
e = 0.675 m
e = 0.675 m
M33_e := P31*e - M31 = 111.375 tonnef*m
M43_e := P41*e - M41 = 111.375 tonnef*m
L = 6.575 m
L = 6.575 m
M32 = 0 tonnef*m
M42 = 0 tonnef*m
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# Puntos para envolvente
# DFC
e = 0.675 m  # excentricidad
L = 6.575 m
# 1er linea | 2da linea
P11 = 165 tonnef
P21 = 165 tonnef
e = 0.675 m
e = 0.675 m
P13 = 16.9392 tonnef
P23 = 16.9392 tonnef
L = 6.575 m
L = 6.575 m
# 3era linea | 4ta linea = 1ra linea
P31 = 165 tonnef
P41 = 165 tonnef
e = 0.675 m
e = 0.675 m
P33 = 16.9392 tonnef
P43 = 16.9392 tonnef
L = 6.575 m
L = 6.575 m
# DISEÑO DE VIGA DE CIMENTACIÓN
# Se asume una viga de:
b_v := 0.4 m
h_v := 1.2 m  # entonces:
d_v := h_v - 10 cm = 1.1 m
# Diseño por cortante:
Vu := max(P13, P23, P33) = 16.9392 tonnef
# Cortante resistente:
b. := b_v/cm = 40  # cm
d. := d_v/cm = 110  # cm
f'c. = 280  # kgf/cm2
ϕVc := 0.85*(0.53*sqrt(f'c.)*b.*d.)*tonnef/1000 = 33.1686 tonnef
if(Vu < ϕVc, "Cumple", "No cumple") = "Cumple"  # Si no cumple se aumenta la altura de la viga o su ancho o se agrega estribos
Vs := (Vu/0.85) - ϕVc/0.85 = -19.0934 tonnef
# Empleando varillas de:
cm2 := cm^2
[ϕ_cm; As_var] := [list choice]  # options: 1/4", 3/8", 1/2", 5/8", 3/4", 1", 1 1/4", 1 3/8", 1 1/2"
table  # each column defines a variable
    ϕ_var | ϕ_diam (cm) | ϕ_area (cm^2)
    " 1/4" | 0.64 | 0.32
    " 3/8" | 0.95 | 0.71
    "1/2" | 1.27 | 1.27
    "5/8" | 1.59 | 1.98
    "3/4" | 1.91 | 2.85
    "1" | 2.54 | 5.07
    "1 1/4" | 3.18 | 7.94
    "1 3/8" | 3.49 | 9.57
    "1 1/2" | 3.81 | 11.4
end table
ϕ_cm = 0.95 cm
As_var = 0.71 cm^2
Asv := As_var*2 = 1.42 cm^2
f_y = 4200 kgf/cm^2
# Separación:
d_v = 1.1 m
S := Asv*f_y*d_v/Vs = -34.3595 cm
# Sabiendo que debemos evitar fisuración, se coloca 30 cm
S := 30 cm
# Estribos
ϕ_cm = 0.95 cm
# Cada
S = 30 cm
As_var = 0.71 cm^2
# Para la viga de conexión
Mu := max(M13_e, M23_e, M33_e, M43_e) = 111.375 tonnef*m
b := b_v = 0.4 m
d := d_v = 1.1 m
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φ := 0.9
k1 := (φ*f_y^2/(1.7*f'_c*b)) cm^3/kgf = 833.824
k2 := (φ*f_y*d)*cm/kgf = 415800
k3 := Mu/(kgf*cm) = 11137500
A_ss := k1*A_s^2 - k2*A_s + k3 == 0 solve, A_s → [28.4035520589; 470.263114608]
As_1 := round(A_ss[0, 0], 4)*cm^2 = 28.4036 cm^2
As_1 = 28.4036 cm^2
# Acero minimo
Asmin := 0.0018*b*d = 7.92 cm^2
As := As_1 = 28.4036 cm^2
# Empleando varillas de:
cm2 := cm^2
[ϕ_cm; As_var] := [list choice]  # options: 1/4", 3/8", 1/2", 5/8", 3/4", 1", 1 1/4", 1 3/8", 1 1/2"
table  # each column defines a variable
    ϕ_var | ϕ_diam (cm) | ϕ_area (cm^2)
    " 1/4" | 0.64 | 0.32
    " 3/8" | 0.95 | 0.71
    "1/2" | 1.27 | 1.27
    "5/8" | 1.59 | 1.98
    "3/4" | 1.91 | 2.85
    "1" | 2.54 | 5.07
    "1 1/4" | 3.18 | 7.94
    "1 3/8" | 3.49 | 9.57
    "1 1/2" | 3.81 | 11.4
end table
ϕ_cm = 2.54 cm
As_var = 5.07 cm^2
# Nº de varillas a colocar:
N := As/As_var = 5.60229
N := 10
# Separación:
r := 7.5 cm
S := (b - ϕ_cm - r)/(N - 1) = 3.32889 cm
S := 5 cm
ϕ_cm = 2.54 cm
# Cada
S = 5 cm
N = 10
As_var = 5.07 cm^2
# Para la parte de abajo
Mu := max(M11, M21, M31, M41) = 0 tonnef*m
b := b_v = 0.4 m
d := d_v = 1.1 m
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φ := 0.9
k1 := (φ*f_y^2/(1.7*f'_c*b)) cm^3/kgf = 833.824
k2 := (φ*f_y*d)*cm/kgf = 415800
k3 := Mu/(kgf*cm) = 0
A_ss := k1*A_s^2 - k2*A_s + k3 == 0 solve, A_s → [0.0; 498.666666667]
As_1 := round(A_ss[0, 0], 4)*cm^2 = 0 cm^2
As_1 = 0 cm^2
# Acero minimo
Asmin := 0.0018*b*d = 7.92 cm^2
As := Asmin = 7.92 cm^2
# Empleando varillas de:
cm2 := cm^2
[ϕ_cm; As_var] := [list choice]  # options: 1/4", 3/8", 1/2", 5/8", 3/4", 1", 1 1/4", 1 3/8", 1 1/2"
table  # each column defines a variable
    ϕ_var | ϕ_diam (cm) | ϕ_area (cm^2)
    " 1/4" | 0.64 | 0.32
    " 3/8" | 0.95 | 0.71
    "1/2" | 1.27 | 1.27
    "5/8" | 1.59 | 1.98
    "3/4" | 1.91 | 2.85
    "1" | 2.54 | 5.07
    "1 1/4" | 3.18 | 7.94
    "1 3/8" | 3.49 | 9.57
    "1 1/2" | 3.81 | 11.4
end table
ϕ_cm = 2.54 cm
As_var = 5.07 cm^2
# Nº de varillas a colocar:
N := As/As_var = 1.56213
N := 3
# Separación:
r := 7.5 cm
S := (b - ϕ_cm - r)/(N - 1) = 14.98 cm
S := 20 cm
ϕ_cm = 2.54 cm
# Cada
S = 20 cm
N = 3
As_var = 5.07 cm^2
# Completando con bastones donde sea necesario y se coloca acero para evitar fisuramiento
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