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# I. PROPIEDADES DE LOS MATERIALES
# a. Concreto
#
# f'c := 210 kgf/cm^2
# ε_c := 15100*sqrt(f'c*kgf/cm^2)
# P_esp_c := 2.4 tonnef/m^3
# b. Acero
#
# fy := 4200 kgf/cm^2
# ε_s := 2.1*10^6 kgf/cm^2
# II. PREDIMENSIONAMIENTO DE LOSAS ALIGERADA UNIDIRECCIONAL
# El peralte de las losas aligeradas podrá ser dimensionado considerando los siguientes criterios y expresiones:
#
# - luces menores de 4m  :h=17cm
# - luces comprendidas entre 4 y 5.5m  :h=20cm
# - luces comprendidas entre 5 y 6.5m  :h=25cm
# - luces comprendidas entre 6 y 7.50m  :h=30cm
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# l_n1: luz libre en la dirección más corta
l_n1 := 4.37 m
h_losa := l_n1/25 = 0.1748 m
# Adoptamos: h_losa := 0.20 m
# III. PREDIMENSIONAMIENTO DE LOSAS ALIGERADA BIDIRECCIONAL
# Las losas aligeradas armadas en dos direcciones se usan generalmente cuando se tiene paños más o menos cuadrados y de luces mayores a los 6.00 m, así también podrá ser dimensionado utilizando la siguiente expresión:
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l_n2 := 5.50 m
l_n3 := 5.35 m
h_b_losa := (2*l_n2 + 2*l_n3)/180 = 0.120556 m  # ;
l_n2/40 = 0.1375 m
# Adoptamos: h_b_losa := 0.15 m
# IV. PREDIMENSIONAMIENTO DE LOSAS MACIZAS
# Las losas macizas pueden ser dimensionados en forma aproximada considerando espesores menores en 5 cm a los indicados para losas aligeradas; así se podrá tener:
#
# - luces menores o iguales a 4m  : h=12 ó 13 cm
# - luces menores o iguales a 5.50m  : h=15cm
# - luces menores o iguales a 6.50m  : h=20cm
# - luces menores o iguales a 7.50m  : h=25cm
#
# se debe tener en cuenta que este dimensionamiento podrá disminuirse si se considera losas armadas en dos direcciones, así también podrá utilizarse la siguiente expresión:
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l_n4 := 4.37 m
h_l_maciza := l_n4/30 = 0.145667 m  # Adoptamos: h_l_maciza := 0.15 m
# V. PREDIMENSIONAMIENTO DE VIGAS
# Las vigas son elementos sometidos a flexión, es entonces que debido a esto el peralte esta en función de la longitud y carga, por ende para determinar el peralte efectivo de la viga se recomienda los siguientes valores:
# [Excel component]
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# Donde:
# h: Peralte efectivo de viga
# b: Ancho de viga
# L_n: Luz libre entre caras internas de columnas
# L_1: Luz de paño 1
# L_2: Luz de paño 2
# - Determinación de peralte y ancho de viga en el eje x-x:
L_n_xx := 5.95 m
L_1_xx := 3.01 m
L_2_xx := 2.47 m
h_1 := L_n_xx/11 = 0.540909 m  # ;
h_2 := L_n_xx/10 = 0.595 m  # ;
h_3 := L_n_xx/9 = 0.661111 m  # ;
h_4 := L_n_xx/12 = 0.495833 m
# Adoptamos: h_xx := 0.60 m
# para determinar el ancho de la viga se recomienda:
bx_1 := h_xx/2 = 0.3 m  # ;
B := L_1_xx + L_2_xx
bx_2 := B/20 = 0.274 m  # ;
bx_3 := 0.25 m
# Adoptamos: bx := 0.30 m
# - Determinación de peralte y ancho de viga en el eje y-y:
L_n_yy := 6.05 m
L_1_yy := 2.83 m
L_2_yy := 2.98 m
h_1 := L_n_yy/11 = 0.55 m  # ;
h_2 := L_n_yy/10 = 0.605 m  # ;
h_3 := L_n_yy/9 = 0.672222 m  # ;
h_4 := L_n_yy/12 = 0.504167 m
# Adoptamos: h_yy := 0.60 m
# para determinar el ancho de la viga se recomienda:
by_1 := h_yy/2 = 0.3 m  # ;
B := L_1_yy + L_2_yy
by_2 := B/20 = 0.2905 m  # ;
by_3 := 0.25 m
# Adoptamos: by := 0.30 m
# - Verificación de peralte mínimo en el eje x-x; y-y:
# Para vigas no pre-esforzadas que no soporten ni estén ligadas a participaciones u otro tipo de elementos susceptibles de dañarse debido a deflexiones grandes, la altura total de la viga (h), no debe ser menor que los siguientes limites:
#
# - Simplemente apoyado  : Ln/16
# - Con un extremo continuo  : Ln/18.5
# - Ambos extremos continuos : Ln/21
# - En voladizo  : Ln/8
hv_x :=
    hv_x[1] ← L_n_xx/16
    hv_x[2] ← L_n_xx/18.5
    hv_x[3] ← L_n_xx/21
    hv_x[4] ← L_n_xx/8
    hv_x
    = [0; 0.371875; 0.321622; 0.283333; 0.74375] m
hv_y :=
    hv_y[1] ← L_n_yy/16
    hv_y[2] ← L_n_yy/18.5
    hv_y[3] ← L_n_yy/21
    hv_y[4] ← L_n_yy/8
    hv_y
    = [0; 0.378125; 0.327027; 0.288095; 0.75625] m
# VI. PREDIMENSIONAMIENTO DE COLUMNAS
# Las columnas al ser sometidas a carga axial y momento flector, tienen que ser dimensionadas considerando los dos efectos, además de esto se debe de tener en cuenta al momento del predimencionamiento que el tipo de falla a inducir a una columnas debe ser del tipo dúctil, es así que se tiene los siguientes valores y expresiones:
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# [Excel component]
# Datos:
#
# Ps := 1000 kgf/m^2  Peso tributario de servicio
# A_T := 31.79 m^2  Área tributaria
#
# N := 9  Número total de niveles
#
# H_n := 2.43 m  Altura libre de entrepiso
#
# n := 0.30  Factor de ductilidad
#
# P_G := Ps*A_T*N = 315.382 tonf  carga tributaria total
#
# P := 1.1*P_G = 346.921 tonf  carga total que soporta la columna (ver tabla)
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# bD := P/(n*f'c) = 4995.57 cm^2
# Asumiendo un ancho b := 0.60 m ; D := bD/b = 0.832595 m
# Adoptamos: D := 0.80 m
# VII. PREDIMENSIONAMIENTO DE MUROS DE CONCRETO ARMADO
# Los muros de concreto armado tienen como principal función absorber las fuerzas de sismo, mientras más grande la sección esta tomará un mayor porcentaje del cortante sísmico total, es así que se tienen los siguientes valores y expresiones:
# [Excel component]
Vb == ZUCS/R*P_Te
Lm == Vb/(0.85*(0.53*sqrt(f'c)*bw*d + Av*fy*d/s))
# Datos:
#
# A_TT := 472.08 m^2  Área total de la edificación
#
# H_n := 22.01 m  Altura total de la edificación
#
# Ct := 35*m  Expresión que depende del S.E
#
# P_Te := Ps*A_TT*N = 4683.41 tonf  Peso total de la estructura
# Z := 0.45
# U := 1.00
# S := 1.00
# T_p := 0.40
# T_l := 2.50
# T := H_n/Ct = 0.628857
# C := if T > T_l C ← 2.5*(T_p*T_l/T^2) else if T > T_p C ← 2.5*(T_p/T) else C ← 2.5 = 1.59019
#
# R := 8
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# Vb := Z*U*C*S/R*P_Te = 418.922 tonf  Cortante Basal
# bw := 25 cm  Ancho del muro
#
# d := 80 cm  Longitud efectiva del muro (0.8L)
#
# Av := 1.27 cm^2*2 = 2.54 cm^2  Refuerzo de la malla
#
# s := 20 cm  Espaciamiento de varillas
#
# Lm := Vb/(0.85*(0.53*f'c*bw*d + Av*fy*d/s)) = 1.68546
#
# debido a que el sistema estructural elegido es el mismo para ambas direcciones
#
# Adoptamos Lm=Lmx=Lmy:  Lm := 1.70 m
# - Verificación de espesor mínimo del muro
# el espesor mínimo debe cumplir con la relación 1/25 de la altura de entrepiso o según la tabla 11.3.1.1 "Espesor Mínimo del muro, h" ACI 318-19
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# h := 2.43 m
#
# b_muro := 1/25*h = 0.0972 m
